<?xml version="1.0" encoding="UTF-8"?>
<neuroml xmlns="http://www.neuroml.org/schema/neuroml2" xmlns:xsi="http://www.w3.org/2001/XMLSchema-instance" xsi:schemaLocation="http://www.neuroml.org/schema/neuroml2  https://raw.githubusercontent.com/NeuroML/NeuroML2/development/Schemas/NeuroML2/NeuroML_v2beta4.xsd" id="VC3">

    <include href="LeakConductance.channel.nml"/>

    <cell id="VC3">

        <notes>
Motor Neuron
</notes>

        <morphology id="morphology_VC3">

            <segment id="0" name="Seg0_soma_0">
                <proximal x="-1.4499999" y="-6.45" z="-54.000004" diameter="2.787472"/>
                <distal x="-1.4499999" y="-6.45" z="-54.000004" diameter="2.787472"/>
            </segment>

            <segment id="1" name="Seg0_axon_0">
                <parent segment="0"/>
                <proximal x="-1.4499999" y="-6.45" z="-54.000004" diameter="0.71414286"/>
                <distal x="-1.4499999" y="-5.45" z="-53.750004" diameter="0.71414286"/>
            </segment>

            <segment id="2" name="Seg2_axon_0">
                <parent segment="1"/>
                <distal x="-1.4499999" y="-3.4499998" z="-53.250004" diameter="0.4358899"/>
            </segment>

            <segment id="3" name="Seg3_axon_0">
                <parent segment="2"/>
                <distal x="-1.4499999" y="3.7500002" z="-50.050003" diameter="0.4358899"/>
            </segment>

            <segment id="4" name="Seg4_axon_0">
                <parent segment="3"/>
                <distal x="-1.4499999" y="32.2" z="-35.350002" diameter="0.42426404"/>
            </segment>

            <segment id="5" name="Seg5_axon_0">
                <parent segment="4"/>
                <distal x="-4.35" y="36.1" z="-30.55" diameter="0.46904156"/>
            </segment>

            <segment id="6" name="Seg6_axon_0">
                <parent segment="5"/>
                <distal x="-10.625" y="42.05" z="-24.449999" diameter="0.55"/>
            </segment>

            <segment id="7" name="Seg7_axon_0">
                <parent segment="6"/>
                <distal x="-13.349999" y="47.600002" z="-19.875" diameter="0.4387482"/>
            </segment>

            <segment id="8" name="Seg8_axon_0">
                <parent segment="7"/>
                <distal x="-13.45" y="56.199997" z="-14.45" diameter="0.42426404"/>
            </segment>

            <segment id="9" name="Seg9_axon_0">
                <parent segment="8"/>
                <distal x="-10.375" y="61.85" z="-12.65" diameter="0.45"/>
            </segment>

            <segment id="10" name="Seg10_axon_0">
                <parent segment="9"/>
                <distal x="-5.85" y="65.525" z="-10.75" diameter="0.45"/>
            </segment>

            <segment id="11" name="Seg11_axon_0">
                <parent segment="10"/>
                <distal x="-2.2" y="69.5" z="-11.85" diameter="0.41231057"/>
            </segment>

            <segment id="12" name="Seg12_axon_0">
                <parent segment="11"/>
                <distal x="-1.85" y="77.8" z="-6.3500004" diameter="0.42426404"/>
            </segment>

            <segment id="13" name="Seg13_axon_0">
                <parent segment="12"/>
                <distal x="-1.4499999" y="84.75" z="-2.0" diameter="0.50990194"/>
            </segment>

            <segment id="14" name="Seg14_axon_0">
                <parent segment="13"/>
                <distal x="-1.4499999" y="89.3" z="-0.5" diameter="0.5"/>
            </segment>

            <segment id="15" name="Seg15_axon_0">
                <parent segment="14"/>
                <distal x="-1.5" y="109.4" z="3.25" diameter="0.5"/>
            </segment>

            <segment id="16" name="Seg16_axon_0">
                <parent segment="15"/>
                <distal x="-1.5" y="109.8" z="3.3500001" diameter="0.5"/>
            </segment>

            <segment id="51" name="Seg0_dendrit_2">
                <parent segment="0"/>
                <proximal x="-1.4499999" y="-6.45" z="-54.000004" diameter="0.71414286"/>
                <distal x="-1.4499999" y="-7.4500003" z="-54.25" diameter="0.71414286"/>
            </segment>

            <segment id="52" name="Seg52_dendrite_0">
                <parent segment="51"/>
                <distal x="-1.4499999" y="-10.400001" z="-55.1" diameter="0.5"/>
            </segment>

            <segment id="53" name="Seg53_dendrite_0">
                <parent segment="52"/>
                <distal x="-1.4499999" y="-47.15" z="-65.85" diameter="0.4358899"/>
            </segment>

            <segment id="54" name="Seg54_dendrite_0">
                <parent segment="53"/>
                <distal x="-1.4499999" y="-53.3" z="-67.049995" diameter="0.42426404"/>
            </segment>

            <segment id="55" name="Seg55_dendrite_0">
                <parent segment="54"/>
                <distal x="-1.4499999" y="-84.15" z="-66.649994" diameter="0.4358899"/>
            </segment>

            <segment id="56" name="Seg56_dendrite_0">
                <parent segment="55"/>
                <distal x="-1.4499999" y="-102.35" z="-64.0" diameter="0.50990194"/>
            </segment>

            <segment id="57" name="Seg57_dendrite_0">
                <parent segment="56"/>
                <distal x="-1.4499999" y="-118.49999" z="-60.2" diameter="0.5"/>
            </segment>

            <segment id="58" name="Seg58_dendrite_0">
                <parent segment="57"/>
                <distal x="-1.4499999" y="-135.45001" z="-53.95" diameter="0.4358899"/>
            </segment>

            <segment id="59" name="Seg59_dendrite_0">
                <parent segment="58"/>
                <distal x="-1.4499999" y="-162.85" z="-40.05" diameter="0.4358899"/>
            </segment>

            <segment id="60" name="Seg60_dendrite_0">
                <parent segment="59"/>
                <distal x="-1.4499999" y="-167.6" z="-37.6" diameter="0.5"/>
            </segment>

            <segment id="61" name="Seg61_dendrite_0">
                <parent segment="60"/>
                <distal x="-1.4499999" y="-210.2" z="-8.4" diameter="0.5"/>
            </segment>

            <segment id="62" name="Seg62_dendrite_0">
                <parent segment="61"/>
                <distal x="-1.4499999" y="-214.94998" z="-5.25" diameter="0.4358899"/>
            </segment>

            <segment id="63" name="Seg63_dendrite_0">
                <parent segment="62"/>
                <distal x="-1.4499999" y="-234.45001" z="8.55" diameter="0.4358899"/>
            </segment>

            <segment id="64" name="Seg64_dendrite_0">
                <parent segment="63"/>
                <distal x="-1.4499999" y="-238.84999" z="11.55" diameter="0.4358899"/>
            </segment>

            <segment id="17" name="Seg17_neurite_0">
                <parent segment="16"/>
                <proximal x="-1.5" y="109.8" z="3.3500001" diameter="0.5"/>
                <distal x="-1.5" y="110.2" z="3.4" diameter="0.56568545"/>
            </segment>

            <segment id="18" name="Seg18_neurite_0">
                <parent segment="17"/>
                <distal x="-1.5" y="110.950005" z="3.5" diameter="0.5744563"/>
            </segment>

            <segment id="19" name="Seg19_neurite_0">
                <parent segment="18"/>
                <proximal x="-1.5" y="110.950005" z="3.5" diameter="0.5744563"/>
                <distal x="-1.3000001" y="111.12501" z="3.525" diameter="0.51478153"/>
            </segment>

            <segment id="20" name="Seg20_neurite_0">
                <parent segment="19"/>
                <distal x="-1.0" y="111.12501" z="3.5500002" diameter="0.39051247"/>
            </segment>

            <segment id="21" name="Seg21_neurite_0">
                <parent segment="20"/>
                <distal x="-0.1" y="111.09999" z="3.5500002" diameter="0.2236068"/>
            </segment>

            <segment id="22" name="Seg22_neurite_0">
                <parent segment="21"/>
                <distal x="1.05" y="111.09999" z="3.5500002" diameter="0.24494897"/>
            </segment>

            <segment id="23" name="Seg23_neurite_0">
                <parent segment="22"/>
                <distal x="1.5" y="110.65" z="3.5500002" diameter="0.24494897"/>
            </segment>

            <segment id="24" name="Seg24_neurite_0">
                <parent segment="23"/>
                <distal x="1.525" y="109.2" z="3.5500002" diameter="0.26925823"/>
            </segment>

            <segment id="25" name="Seg25_neurite_0">
                <parent segment="18"/>
                <proximal x="-1.5" y="110.950005" z="3.5" diameter="0.5744563"/>
                <distal x="-1.5" y="111.3" z="3.5500002" diameter="0.5"/>
            </segment>

            <segment id="26" name="Seg26_neurite_0">
                <parent segment="25"/>
                <distal x="-1.4499999" y="112.399994" z="3.7500002" diameter="0.42426404"/>
            </segment>

            <segment id="27" name="Seg27_neurite_0">
                <parent segment="26"/>
                <proximal x="-1.4499999" y="112.399994" z="3.7500002" diameter="0.42426404"/>
                <distal x="-1.6" y="112.65" z="3.8" diameter="0.64031243"/>
            </segment>

            <segment id="28" name="Seg28_neurite_0">
                <parent segment="27"/>
                <distal x="-1.9" y="112.65" z="3.8" diameter="0.36055514"/>
            </segment>

            <segment id="29" name="Seg29_neurite_0">
                <parent segment="28"/>
                <distal x="-2.55" y="112.625" z="3.8" diameter="0.26925823"/>
            </segment>

            <segment id="30" name="Seg30_neurite_0">
                <parent segment="29"/>
                <distal x="-2.875" y="113.049995" z="3.8" diameter="0.41533118"/>
            </segment>

            <segment id="31" name="Seg31_neurite_0">
                <parent segment="30"/>
                <distal x="-2.8999999" y="113.90001" z="4.05" diameter="0.36055514"/>
            </segment>

            <segment id="32" name="Seg32_neurite_0">
                <parent segment="31"/>
                <distal x="-2.95" y="119.1" z="4.4500003" diameter="0.42426404"/>
            </segment>

            <segment id="33" name="Seg33_neurite_0">
                <parent segment="32"/>
                <distal x="-2.95" y="123.09999" z="4.4500003" diameter="0.31622776"/>
            </segment>

            <segment id="34" name="Seg34_neurite_0">
                <parent segment="26"/>
                <proximal x="-1.4499999" y="112.399994" z="3.7500002" diameter="0.42426404"/>
                <distal x="-1.4499999" y="112.899994" z="3.85" diameter="0.42426404"/>
            </segment>

            <segment id="35" name="Seg35_neurite_0">
                <parent segment="34"/>
                <distal x="-1.4499999" y="116.2" z="4.4500003" diameter="0.42426404"/>
            </segment>

            <segment id="36" name="Seg36_neurite_0">
                <parent segment="35"/>
                <distal x="-1.4499999" y="119.149994" z="4.4500003" diameter="0.4358899"/>
            </segment>

            <segment id="37" name="Seg37_neurite_0">
                <parent segment="26"/>
                <proximal x="-1.4499999" y="112.399994" z="3.7500002" diameter="0.42426404"/>
                <distal x="-1.3000001" y="112.65" z="3.8" diameter="0.53851646"/>
            </segment>

            <segment id="38" name="Seg38_neurite_0">
                <parent segment="37"/>
                <distal x="-0.9" y="112.65" z="3.8" diameter="0.36055514"/>
            </segment>

            <segment id="39" name="Seg39_neurite_0">
                <parent segment="38"/>
                <distal x="0.70000005" y="112.65" z="3.8" diameter="0.36055514"/>
            </segment>

            <segment id="40" name="Seg40_neurite_0">
                <parent segment="39"/>
                <distal x="2.2" y="112.65" z="4.1749997" diameter="0.5024938"/>
            </segment>

            <segment id="41" name="Seg41_neurite_0">
                <parent segment="40"/>
                <distal x="2.6499999" y="112.15" z="4.5499997" diameter="0.4358899"/>
            </segment>

            <segment id="42" name="Seg42_neurite_0">
                <parent segment="41"/>
                <distal x="2.85" y="111.399994" z="4.975" diameter="0.4609772"/>
            </segment>

            <segment id="43" name="Seg43_neurite_0">
                <parent segment="42"/>
                <distal x="2.85" y="109.1" z="5.35" diameter="0.42426404"/>
            </segment>

            <segment id="44" name="Seg44_neurite_0">
                <parent segment="26"/>
                <proximal x="-1.4499999" y="112.399994" z="3.7500002" diameter="0.42426404"/>
                <distal x="-1.4499999" y="112.899994" z="3.85" diameter="0.42426404"/>
            </segment>

            <segment id="45" name="Seg45_neurite_0">
                <parent segment="16"/>
                <proximal x="-1.5" y="109.8" z="3.3500001" diameter="0.5"/>
                <distal x="-1.7" y="110.0" z="3.3750002" diameter="0.53150725"/>
            </segment>

            <segment id="46" name="Seg46_neurite_0">
                <parent segment="45"/>
                <distal x="-1.9" y="110.0" z="3.3500001" diameter="0.2236068"/>
            </segment>

            <segment id="47" name="Seg47_neurite_0">
                <parent segment="46"/>
                <distal x="-2.1" y="110.0" z="3.3500001" diameter="0.2236068"/>
            </segment>

            <segment id="48" name="Seg48_neurite_0">
                <parent segment="47"/>
                <distal x="-2.45" y="110.075" z="3.3500001" diameter="0.28722814"/>
            </segment>

            <segment id="49" name="Seg49_neurite_0">
                <parent segment="48"/>
                <distal x="-2.75" y="110.5" z="3.3500001" diameter="0.31622776"/>
            </segment>

            <segment id="50" name="Seg50_neurite_0">
                <parent segment="49"/>
                <distal x="-2.85" y="112.0" z="3.3500001" diameter="0.31622776"/>
            </segment>

            <segmentGroup id="Soma" neuroLexId="sao864921383">    <!--
                This group contains an unbranched set of segments, and all of the segmentGroups marked with
                neuroLexId = sao864921383 form a non-overlapping set of all of the segments.
                These segmentGroups correspond to the 'cables' of NeuroML v1.8.1. -->

                <member segment="0"/>
            </segmentGroup>

            <segmentGroup id="Axon" neuroLexId="sao864921383">    <!--
                This group contains an unbranched set of segments, and all of the segmentGroups marked with
                neuroLexId = sao864921383 form a non-overlapping set of all of the segments.
                These segmentGroups correspond to the 'cables' of NeuroML v1.8.1. -->

                <member segment="1"/>

                <member segment="2"/>

                <member segment="3"/>

                <member segment="4"/>

                <member segment="5"/>

                <member segment="6"/>

                <member segment="7"/>

                <member segment="8"/>

                <member segment="9"/>

                <member segment="10"/>

                <member segment="11"/>

                <member segment="12"/>

                <member segment="13"/>

                <member segment="14"/>

                <member segment="15"/>

                <member segment="16"/>
            </segmentGroup>

            <segmentGroup id="Dendrite2" neuroLexId="sao864921383">    <!--
                This group contains an unbranched set of segments, and all of the segmentGroups marked with
                neuroLexId = sao864921383 form a non-overlapping set of all of the segments.
                These segmentGroups correspond to the 'cables' of NeuroML v1.8.1. -->

                <member segment="51"/>

                <member segment="52"/>

                <member segment="53"/>

                <member segment="54"/>

                <member segment="55"/>

                <member segment="56"/>

                <member segment="57"/>

                <member segment="58"/>

                <member segment="59"/>

                <member segment="60"/>

                <member segment="61"/>

                <member segment="62"/>

                <member segment="63"/>

                <member segment="64"/>
            </segmentGroup>

            <segmentGroup id="Neurite3" neuroLexId="sao864921383">    <!--
                This group contains an unbranched set of segments, and all of the segmentGroups marked with
                neuroLexId = sao864921383 form a non-overlapping set of all of the segments.
                These segmentGroups correspond to the 'cables' of NeuroML v1.8.1. -->

                <member segment="17"/>

                <member segment="18"/>
            </segmentGroup>

            <segmentGroup id="Neurite4" neuroLexId="sao864921383">    <!--
                This group contains an unbranched set of segments, and all of the segmentGroups marked with
                neuroLexId = sao864921383 form a non-overlapping set of all of the segments.
                These segmentGroups correspond to the 'cables' of NeuroML v1.8.1. -->

                <member segment="19"/>

                <member segment="20"/>

                <member segment="21"/>

                <member segment="22"/>

                <member segment="23"/>

                <member segment="24"/>
            </segmentGroup>

            <segmentGroup id="Neurite5" neuroLexId="sao864921383">    <!--
                This group contains an unbranched set of segments, and all of the segmentGroups marked with
                neuroLexId = sao864921383 form a non-overlapping set of all of the segments.
                These segmentGroups correspond to the 'cables' of NeuroML v1.8.1. -->

                <member segment="25"/>

                <member segment="26"/>
            </segmentGroup>

            <segmentGroup id="Neurite6" neuroLexId="sao864921383">    <!--
                This group contains an unbranched set of segments, and all of the segmentGroups marked with
                neuroLexId = sao864921383 form a non-overlapping set of all of the segments.
                These segmentGroups correspond to the 'cables' of NeuroML v1.8.1. -->

                <member segment="27"/>

                <member segment="28"/>

                <member segment="29"/>

                <member segment="30"/>

                <member segment="31"/>

                <member segment="32"/>

                <member segment="33"/>
            </segmentGroup>

            <segmentGroup id="Neurite7" neuroLexId="sao864921383">    <!--
                This group contains an unbranched set of segments, and all of the segmentGroups marked with
                neuroLexId = sao864921383 form a non-overlapping set of all of the segments.
                These segmentGroups correspond to the 'cables' of NeuroML v1.8.1. -->

                <member segment="34"/>

                <member segment="35"/>

                <member segment="36"/>
            </segmentGroup>

            <segmentGroup id="Neurite8" neuroLexId="sao864921383">    <!--
                This group contains an unbranched set of segments, and all of the segmentGroups marked with
                neuroLexId = sao864921383 form a non-overlapping set of all of the segments.
                These segmentGroups correspond to the 'cables' of NeuroML v1.8.1. -->

                <member segment="37"/>

                <member segment="38"/>

                <member segment="39"/>

                <member segment="40"/>

                <member segment="41"/>

                <member segment="42"/>

                <member segment="43"/>
            </segmentGroup>

            <segmentGroup id="Neurite9" neuroLexId="sao864921383">    <!--
                This group contains an unbranched set of segments, and all of the segmentGroups marked with
                neuroLexId = sao864921383 form a non-overlapping set of all of the segments.
                These segmentGroups correspond to the 'cables' of NeuroML v1.8.1. -->

                <member segment="44"/>
            </segmentGroup>

            <segmentGroup id="Neurite10" neuroLexId="sao864921383">    <!--
                This group contains an unbranched set of segments, and all of the segmentGroups marked with
                neuroLexId = sao864921383 form a non-overlapping set of all of the segments.
                These segmentGroups correspond to the 'cables' of NeuroML v1.8.1. -->

                <member segment="45"/>

                <member segment="46"/>

                <member segment="47"/>

                <member segment="48"/>

                <member segment="49"/>

                <member segment="50"/>
            </segmentGroup>

            <segmentGroup id="all">
                <include segmentGroup="Soma"/>
                <include segmentGroup="Axon"/>
                <include segmentGroup="Dendrite2"/>
                <include segmentGroup="Neurite3"/>
                <include segmentGroup="Neurite4"/>
                <include segmentGroup="Neurite5"/>
                <include segmentGroup="Neurite6"/>
                <include segmentGroup="Neurite7"/>
                <include segmentGroup="Neurite8"/>
                <include segmentGroup="Neurite9"/>
                <include segmentGroup="Neurite10"/>
            </segmentGroup>

            <segmentGroup id="soma_group" neuroLexId="GO:0043025">    <!--Soma group-->

                <include segmentGroup="Soma"/>
            </segmentGroup>

            <segmentGroup id="axon_group" neuroLexId="GO:0030424">    <!--Axon group-->

                <include segmentGroup="Axon"/>
            </segmentGroup>

            <segmentGroup id="dendrite_group" neuroLexId="GO:0030425">    <!--Dendrite group-->

                <include segmentGroup="Dendrite2"/>
                <include segmentGroup="Neurite3"/>
                <include segmentGroup="Neurite4"/>
                <include segmentGroup="Neurite5"/>
                <include segmentGroup="Neurite6"/>
                <include segmentGroup="Neurite7"/>
                <include segmentGroup="Neurite8"/>
                <include segmentGroup="Neurite9"/>
                <include segmentGroup="Neurite10"/>
            </segmentGroup>

        </morphology>

            <!--Adding the biophysical parameters-->

        <biophysicalProperties id="biophys">

            <membraneProperties>

                <channelDensity condDensity="0.025 mS_per_cm2" id="LeakConductance_all" ionChannel="LeakConductance" ion="non_specific" erev="-65.0 mV"/>

                <spikeThresh value="0 mV"/>

                <specificCapacitance value="1.0 uF_per_cm2"/>

                <initMembPotential value="-65.0 mV"/>

            </membraneProperties>

            <intracellularProperties>

                <resistivity value="0.03 kohm_cm"/>

            </intracellularProperties>

        </biophysicalProperties>

    </cell>

</neuroml>
