<?xml version="1.0" encoding="UTF-8"?>
<neuroml xmlns="http://www.neuroml.org/schema/neuroml2" xmlns:xsi="http://www.w3.org/2001/XMLSchema-instance" xsi:schemaLocation="http://www.neuroml.org/schema/neuroml2  https://raw.githubusercontent.com/NeuroML/NeuroML2/development/Schemas/NeuroML2/NeuroML_v2beta4.xsd" id="AWCL">

    <include href="LeakConductance.channel.nml"/>

    <cell id="AWCL">

        <notes>
SensoryNeuron
</notes>

        <morphology id="morphology_AWCL">

            <segment id="0" name="Seg0_soma_0">
                <proximal x="3.8" y="-267.95" z="38.95" diameter="2.7676706"/>
                <distal x="3.8" y="-267.95" z="38.95" diameter="2.7676706"/>
            </segment>

            <segment id="17" name="Seg0_axon_0">
                <parent segment="0"/>
                <proximal x="3.8" y="-267.95" z="38.95" diameter="0.6"/>
                <distal x="3.8" y="-267.5" z="38.100002" diameter="0.6"/>
            </segment>

            <segment id="18" name="Seg18_axon_0">
                <parent segment="17"/>
                <distal x="3.85" y="-267.25" z="37.3" diameter="0.46904156"/>
            </segment>

            <segment id="19" name="Seg19_axon_0">
                <parent segment="18"/>
                <distal x="3.9" y="-266.35" z="34.0" diameter="0.5"/>
            </segment>

            <segment id="20" name="Seg20_axon_0">
                <parent segment="19"/>
                <distal x="3.85" y="-265.55" z="30.25" diameter="0.4358899"/>
            </segment>

            <segment id="21" name="Seg21_axon_0">
                <parent segment="20"/>
                <distal x="2.6499999" y="-266.1" z="28.85" diameter="0.50990194"/>
            </segment>

            <segment id="22" name="Seg22_axon_0">
                <parent segment="21"/>
                <distal x="-1.05" y="-267.575" z="26.4" diameter="0.5408327"/>
            </segment>

            <segment id="23" name="Seg23_axon_0">
                <parent segment="22"/>
                <distal x="-1.85" y="-268.30002" z="26.499998" diameter="0.41231057"/>
            </segment>

            <segment id="24" name="Seg24_axon_0">
                <parent segment="23"/>
                <distal x="-1.85" y="-271.35" z="30.4" diameter="0.46904156"/>
            </segment>

            <segment id="25" name="Seg25_axon_0">
                <parent segment="24"/>
                <distal x="-1.85" y="-272.75" z="36.0" diameter="0.42426404"/>
            </segment>

            <segment id="26" name="Seg26_axon_0">
                <parent segment="25"/>
                <distal x="-1.1" y="-273.05" z="37.6" diameter="0.41231057"/>
            </segment>

            <segment id="27" name="Seg27_axon_0">
                <parent segment="26"/>
                <distal x="0.65000004" y="-273.15" z="38.125" diameter="0.35000002"/>
            </segment>

            <segment id="28" name="Seg28_axon_0">
                <parent segment="27"/>
                <distal x="2.8999999" y="-273.42502" z="39.825" diameter="0.43011624"/>
            </segment>

            <segment id="29" name="Seg29_axon_0">
                <parent segment="28"/>
                <distal x="4.475" y="-273.775" z="42.449997" diameter="0.44158804"/>
            </segment>

            <segment id="30" name="Seg30_axon_0">
                <parent segment="29"/>
                <distal x="4.975" y="-274.2" z="45.5" diameter="0.42720017"/>
            </segment>

            <segment id="31" name="Seg31_axon_0">
                <parent segment="30"/>
                <distal x="4.4500003" y="-274.65" z="48.525" diameter="0.4924429"/>
            </segment>

            <segment id="32" name="Seg32_axon_0">
                <parent segment="31"/>
                <distal x="2.8999999" y="-275.0" z="51.1" diameter="0.48989794"/>
            </segment>

            <segment id="33" name="Seg33_axon_0">
                <parent segment="32"/>
                <distal x="0.6" y="-275.3" z="52.824997" diameter="0.5123476"/>
            </segment>

            <segment id="34" name="Seg34_axon_0">
                <parent segment="33"/>
                <distal x="-2.1" y="-275.35" z="53.399998" diameter="0.5"/>
            </segment>

            <segment id="35" name="Seg35_axon_0">
                <parent segment="34"/>
                <distal x="-4.8500004" y="-275.3" z="52.824997" diameter="0.33541018"/>
            </segment>

            <segment id="36" name="Seg36_axon_0">
                <parent segment="35"/>
                <distal x="-7.1000004" y="-275.0" z="51.1" diameter="0.34641016"/>
            </segment>

            <segment id="37" name="Seg37_axon_0">
                <parent segment="36"/>
                <distal x="-8.65" y="-274.65" z="48.525" diameter="0.42720017"/>
            </segment>

            <segment id="1" name="Seg0_dendrit_2">
                <parent segment="0"/>
                <proximal x="3.8" y="-267.95" z="38.95" diameter="0.6"/>
                <distal x="3.8" y="-268.4" z="39.8" diameter="0.6"/>
            </segment>

            <segment id="2" name="Seg2_dendrite_0">
                <parent segment="1"/>
                <distal x="3.85" y="-268.9" z="40.149998" diameter="0.46904156"/>
            </segment>

            <segment id="3" name="Seg3_dendrite_0">
                <parent segment="2"/>
                <distal x="5.25" y="-271.8" z="41.55" diameter="0.46904156"/>
            </segment>

            <segment id="4" name="Seg4_dendrite_0">
                <parent segment="3"/>
                <distal x="6.0" y="-278.4" z="46.9" diameter="0.56568545"/>
            </segment>

            <segment id="5" name="Seg5_dendrite_0">
                <parent segment="4"/>
                <distal x="6.0" y="-282.55" z="48.45" diameter="0.50990194"/>
            </segment>

            <segment id="6" name="Seg6_dendrite_0">
                <parent segment="5"/>
                <distal x="7.4" y="-289.05002" z="51.050003" diameter="0.50990194"/>
            </segment>

            <segment id="7" name="Seg7_dendrite_0">
                <parent segment="6"/>
                <distal x="7.9000006" y="-293.19998" z="52.100002" diameter="0.56568545"/>
            </segment>

            <segment id="8" name="Seg8_dendrite_0">
                <parent segment="7"/>
                <distal x="7.9000006" y="-296.6" z="52.8" diameter="0.56568545"/>
            </segment>

            <segment id="9" name="Seg9_dendrite_0">
                <parent segment="8"/>
                <distal x="7.5000005" y="-299.8" z="53.3" diameter="0.56568545"/>
            </segment>

            <segment id="10" name="Seg10_dendrite_0">
                <parent segment="9"/>
                <distal x="6.2" y="-304.6" z="54.100002" diameter="0.56568545"/>
            </segment>

            <segment id="11" name="Seg11_dendrite_0">
                <parent segment="10"/>
                <distal x="5.0" y="-320.15" z="56.0" diameter="0.5744563"/>
            </segment>

            <segment id="12" name="Seg12_dendrite_0">
                <parent segment="11"/>
                <distal x="3.1" y="-331.95" z="57.200005" diameter="0.5744563"/>
            </segment>

            <segment id="13" name="Seg13_dendrite_0">
                <parent segment="12"/>
                <distal x="2.3" y="-337.15" z="57.8" diameter="0.5744563"/>
            </segment>

            <segment id="14" name="Seg14_dendrite_0">
                <parent segment="13"/>
                <distal x="1.3000001" y="-342.8" z="58.600002" diameter="0.56568545"/>
            </segment>

            <segment id="15" name="Seg15_dendrite_0">
                <parent segment="14"/>
                <distal x="0.70000005" y="-348.6" z="58.899998" diameter="0.56568545"/>
            </segment>

            <segment id="16" name="Seg16_dendrite_0">
                <parent segment="15"/>
                <distal x="0.70000005" y="-349.44998" z="58.999996" diameter="0.5744563"/>
            </segment>

            <segmentGroup id="Soma" neuroLexId="sao864921383">    <!--
                This group contains an unbranched set of segments, and all of the segmentGroups marked with
                neuroLexId = sao864921383 form a non-overlapping set of all of the segments.
                These segmentGroups correspond to the 'cables' of NeuroML v1.8.1. -->

                <member segment="0"/>
            </segmentGroup>

            <segmentGroup id="Axon" neuroLexId="sao864921383">    <!--
                This group contains an unbranched set of segments, and all of the segmentGroups marked with
                neuroLexId = sao864921383 form a non-overlapping set of all of the segments.
                These segmentGroups correspond to the 'cables' of NeuroML v1.8.1. -->

                <member segment="17"/>

                <member segment="18"/>

                <member segment="19"/>

                <member segment="20"/>

                <member segment="21"/>

                <member segment="22"/>

                <member segment="23"/>

                <member segment="24"/>

                <member segment="25"/>

                <member segment="26"/>

                <member segment="27"/>

                <member segment="28"/>

                <member segment="29"/>

                <member segment="30"/>

                <member segment="31"/>

                <member segment="32"/>

                <member segment="33"/>

                <member segment="34"/>

                <member segment="35"/>

                <member segment="36"/>

                <member segment="37"/>
            </segmentGroup>

            <segmentGroup id="Dendrite2" neuroLexId="sao864921383">    <!--
                This group contains an unbranched set of segments, and all of the segmentGroups marked with
                neuroLexId = sao864921383 form a non-overlapping set of all of the segments.
                These segmentGroups correspond to the 'cables' of NeuroML v1.8.1. -->

                <member segment="1"/>

                <member segment="2"/>

                <member segment="3"/>

                <member segment="4"/>

                <member segment="5"/>

                <member segment="6"/>

                <member segment="7"/>

                <member segment="8"/>

                <member segment="9"/>

                <member segment="10"/>

                <member segment="11"/>

                <member segment="12"/>

                <member segment="13"/>

                <member segment="14"/>

                <member segment="15"/>

                <member segment="16"/>
            </segmentGroup>

            <segmentGroup id="all">
                <include segmentGroup="Soma"/>
                <include segmentGroup="Axon"/>
                <include segmentGroup="Dendrite2"/>
            </segmentGroup>

            <segmentGroup id="soma_group" neuroLexId="GO:0043025">    <!--Soma group-->

                <include segmentGroup="Soma"/>
            </segmentGroup>

            <segmentGroup id="axon_group" neuroLexId="GO:0030424">    <!--Axon group-->

                <include segmentGroup="Axon"/>
            </segmentGroup>

            <segmentGroup id="dendrite_group" neuroLexId="GO:0030425">    <!--Dendrite group-->

                <include segmentGroup="Dendrite2"/>
            </segmentGroup>

        </morphology>

            <!--Adding the biophysical parameters-->

        <biophysicalProperties id="biophys">

            <membraneProperties>

                <channelDensity condDensity="0.025 mS_per_cm2" id="LeakConductance_all" ionChannel="LeakConductance" ion="non_specific" erev="-65.0 mV"/>

                <spikeThresh value="0 mV"/>

                <specificCapacitance value="1.0 uF_per_cm2"/>

                <initMembPotential value="-65.0 mV"/>

            </membraneProperties>

            <intracellularProperties>

                <resistivity value="0.03 kohm_cm"/>

            </intracellularProperties>

        </biophysicalProperties>

    </cell>

</neuroml>
