<?xml version="1.0" encoding="UTF-8"?>
<neuroml xmlns="http://www.neuroml.org/schema/neuroml2" xmlns:xsi="http://www.w3.org/2001/XMLSchema-instance" xsi:schemaLocation="http://www.neuroml.org/schema/neuroml2  https://raw.githubusercontent.com/NeuroML/NeuroML2/development/Schemas/NeuroML2/NeuroML_v2beta4.xsd" id="I6">

    <include href="LeakConductance.channel.nml"/>

    <cell id="I6">

        <notes>
Interneuron
</notes>

        <morphology id="morphology_I6">

            <segment id="0" name="Seg0_soma_0">
                <proximal x="1.7" y="-251.65" z="43.05" diameter="4.535416"/>
                <distal x="1.7" y="-251.65" z="43.05" diameter="4.535416"/>
            </segment>

            <segment id="10" name="Seg0_axon_0">
                <parent segment="0"/>
                <proximal x="1.7" y="-251.65" z="43.05" diameter="0.85440034"/>
                <distal x="1.7" y="-250.05" z="42.899998" diameter="0.85440034"/>
            </segment>

            <segment id="11" name="Seg11_axon_0">
                <parent segment="10"/>
                <distal x="1.7" y="-247.19998" z="42.399998" diameter="0.56568545"/>
            </segment>

            <segment id="12" name="Seg12_axon_0">
                <parent segment="11"/>
                <distal x="1.7" y="-244.0" z="42.1" diameter="0.6"/>
            </segment>

            <segment id="13" name="Seg13_axon_0">
                <parent segment="12"/>
                <distal x="1.6" y="-243.75" z="42.225" diameter="0.6422616"/>
            </segment>

            <segment id="14" name="Seg14_axon_0">
                <parent segment="13"/>
                <distal x="0.275" y="-243.54999" z="43.375" diameter="0.6284902"/>
            </segment>

            <segment id="15" name="Seg15_axon_0">
                <parent segment="14"/>
                <distal x="-1.25" y="-243.65001" z="44.0" diameter="0.6480741"/>
            </segment>

            <segment id="16" name="Seg16_axon_0">
                <parent segment="15"/>
                <distal x="-3.225" y="-243.54999" z="44.0" diameter="0.6873864"/>
            </segment>

            <segment id="17" name="Seg17_axon_0">
                <parent segment="16"/>
                <distal x="-5.0" y="-243.65001" z="43.149998" diameter="0.61644137"/>
            </segment>

            <segment id="18" name="Seg18_axon_0">
                <parent segment="17"/>
                <distal x="-5.9500003" y="-243.65001" z="42.125" diameter="0.68007356"/>
            </segment>

            <segment id="19" name="Seg19_axon_0">
                <parent segment="18"/>
                <distal x="-6.1" y="-243.9" z="41.925003" diameter="0.61846584"/>
            </segment>

            <segment id="20" name="Seg20_axon_0">
                <parent segment="19"/>
                <distal x="-6.1" y="-244.5" z="41.95" diameter="0.41231057"/>
            </segment>

            <segment id="21" name="Seg21_axon_0">
                <parent segment="20"/>
                <distal x="-6.05" y="-249.95" z="42.75" diameter="0.51961523"/>
            </segment>

            <segment id="22" name="Seg22_axon_0">
                <parent segment="21"/>
                <distal x="-5.15" y="-257.9" z="43.825" diameter="0.5024938"/>
            </segment>

            <segment id="23" name="Seg23_axon_0">
                <parent segment="22"/>
                <distal x="-5.1" y="-258.69998" z="43.55" diameter="0.36055514"/>
            </segment>

            <segment id="24" name="Seg24_axon_0">
                <parent segment="23"/>
                <distal x="-5.175" y="-259.69998" z="42.399998" diameter="0.28722814"/>
            </segment>

            <segment id="25" name="Seg25_axon_0">
                <parent segment="24"/>
                <distal x="-5.25" y="-260.6" z="40.95" diameter="0.31622776"/>
            </segment>

            <segment id="1" name="Seg0_dendrit_2">
                <parent segment="0"/>
                <proximal x="1.7" y="-251.65" z="43.05" diameter="0.85440034"/>
                <distal x="1.7" y="-253.25" z="43.2" diameter="0.85440034"/>
            </segment>

            <segment id="2" name="Seg2_dendrite_0">
                <parent segment="1"/>
                <distal x="1.7" y="-256.3" z="43.6" diameter="0.56568545"/>
            </segment>

            <segment id="3" name="Seg3_dendrite_0">
                <parent segment="2"/>
                <distal x="1.7" y="-258.94998" z="43.399998" diameter="0.5744563"/>
            </segment>

            <segment id="4" name="Seg4_dendrite_0">
                <parent segment="3"/>
                <distal x="1.35" y="-282.25" z="50.550003" diameter="0.4358899"/>
            </segment>

            <segment id="5" name="Seg5_dendrite_0">
                <parent segment="4"/>
                <distal x="1.35" y="-284.55" z="51.6" diameter="0.50990194"/>
            </segment>

            <segment id="6" name="Seg6_neurite_0">
                <parent segment="5"/>
                <proximal x="1.35" y="-284.55" z="51.6" diameter="0.50990194"/>
                <distal x="1.35" y="-284.75" z="51.45" diameter="0.4358899"/>
            </segment>

            <segment id="7" name="Seg7_neurite_0">
                <parent segment="6"/>
                <distal x="1.35" y="-285.05002" z="50.35" diameter="0.4358899"/>
            </segment>

            <segment id="8" name="Seg8_neurite_0">
                <parent segment="5"/>
                <proximal x="1.35" y="-284.55" z="51.6" diameter="0.50990194"/>
                <distal x="1.35" y="-284.65" z="51.8" diameter="0.42426404"/>
            </segment>

            <segment id="9" name="Seg9_neurite_0">
                <parent segment="8"/>
                <distal x="1.35" y="-284.55" z="52.649998" diameter="0.4358899"/>
            </segment>

            <segmentGroup id="Soma" neuroLexId="sao864921383">    <!--
                This group contains an unbranched set of segments, and all of the segmentGroups marked with
                neuroLexId = sao864921383 form a non-overlapping set of all of the segments.
                These segmentGroups correspond to the 'cables' of NeuroML v1.8.1. -->

                <member segment="0"/>
            </segmentGroup>

            <segmentGroup id="Axon" neuroLexId="sao864921383">    <!--
                This group contains an unbranched set of segments, and all of the segmentGroups marked with
                neuroLexId = sao864921383 form a non-overlapping set of all of the segments.
                These segmentGroups correspond to the 'cables' of NeuroML v1.8.1. -->

                <member segment="10"/>

                <member segment="11"/>

                <member segment="12"/>

                <member segment="13"/>

                <member segment="14"/>

                <member segment="15"/>

                <member segment="16"/>

                <member segment="17"/>

                <member segment="18"/>

                <member segment="19"/>

                <member segment="20"/>

                <member segment="21"/>

                <member segment="22"/>

                <member segment="23"/>

                <member segment="24"/>

                <member segment="25"/>
            </segmentGroup>

            <segmentGroup id="Dendrite2" neuroLexId="sao864921383">    <!--
                This group contains an unbranched set of segments, and all of the segmentGroups marked with
                neuroLexId = sao864921383 form a non-overlapping set of all of the segments.
                These segmentGroups correspond to the 'cables' of NeuroML v1.8.1. -->

                <member segment="1"/>

                <member segment="2"/>

                <member segment="3"/>

                <member segment="4"/>

                <member segment="5"/>
            </segmentGroup>

            <segmentGroup id="Neurite3" neuroLexId="sao864921383">    <!--
                This group contains an unbranched set of segments, and all of the segmentGroups marked with
                neuroLexId = sao864921383 form a non-overlapping set of all of the segments.
                These segmentGroups correspond to the 'cables' of NeuroML v1.8.1. -->

                <member segment="6"/>

                <member segment="7"/>
            </segmentGroup>

            <segmentGroup id="Neurite4" neuroLexId="sao864921383">    <!--
                This group contains an unbranched set of segments, and all of the segmentGroups marked with
                neuroLexId = sao864921383 form a non-overlapping set of all of the segments.
                These segmentGroups correspond to the 'cables' of NeuroML v1.8.1. -->

                <member segment="8"/>

                <member segment="9"/>
            </segmentGroup>

            <segmentGroup id="all">
                <include segmentGroup="Soma"/>
                <include segmentGroup="Axon"/>
                <include segmentGroup="Dendrite2"/>
                <include segmentGroup="Neurite3"/>
                <include segmentGroup="Neurite4"/>
            </segmentGroup>

            <segmentGroup id="soma_group" neuroLexId="GO:0043025">    <!--Soma group-->

                <include segmentGroup="Soma"/>
            </segmentGroup>

            <segmentGroup id="axon_group" neuroLexId="GO:0030424">    <!--Axon group-->

                <include segmentGroup="Axon"/>
            </segmentGroup>

            <segmentGroup id="dendrite_group" neuroLexId="GO:0030425">    <!--Dendrite group-->

                <include segmentGroup="Dendrite2"/>
                <include segmentGroup="Neurite3"/>
                <include segmentGroup="Neurite4"/>
            </segmentGroup>

        </morphology>

            <!--Adding the biophysical parameters-->

        <biophysicalProperties id="biophys">

            <membraneProperties>

                <channelDensity condDensity="0.025 mS_per_cm2" id="LeakConductance_all" ionChannel="LeakConductance" ion="non_specific" erev="-65.0 mV"/>

                <spikeThresh value="0 mV"/>

                <specificCapacitance value="1.0 uF_per_cm2"/>

                <initMembPotential value="-65.0 mV"/>

            </membraneProperties>

            <intracellularProperties>

                <resistivity value="0.03 kohm_cm"/>

            </intracellularProperties>

        </biophysicalProperties>

    </cell>

</neuroml>
