<?xml version="1.0" encoding="UTF-8"?>
<neuroml xmlns="http://www.neuroml.org/schema/neuroml2" xmlns:xsi="http://www.w3.org/2001/XMLSchema-instance" xsi:schemaLocation="http://www.neuroml.org/schema/neuroml2  https://raw.githubusercontent.com/NeuroML/NeuroML2/development/Schemas/NeuroML2/NeuroML_v2beta4.xsd" id="IL1L">

    <include href="LeakConductance.channel.nml"/>

    <cell id="IL1L">

        <notes>
PolymodalNeuron
</notes>

        <morphology id="morphology_IL1L">

            <segment id="0" name="Seg0_soma_0">
                <proximal x="3.8" y="-282.67502" z="47.850002" diameter="3.1448371"/>
                <distal x="3.8" y="-282.67502" z="47.850002" diameter="3.1448371"/>
            </segment>

            <segment id="14" name="Seg0_axon_0">
                <parent segment="0"/>
                <proximal x="3.8" y="-282.67502" z="47.850002" diameter="0.50990194"/>
                <distal x="3.8" y="-281.75" z="47.25" diameter="0.50990194"/>
            </segment>

            <segment id="15" name="Seg15_axon_0">
                <parent segment="14"/>
                <distal x="4.35" y="-280.1" z="45.55" diameter="0.46904156"/>
            </segment>

            <segment id="16" name="Seg16_axon_0">
                <parent segment="15"/>
                <distal x="6.7500005" y="-278.09998" z="44.25" diameter="0.46904156"/>
            </segment>

            <segment id="17" name="Seg17_axon_0">
                <parent segment="16"/>
                <distal x="7.1500006" y="-275.67502" z="44.05" diameter="0.42720017"/>
            </segment>

            <segment id="18" name="Seg18_axon_0">
                <parent segment="17"/>
                <distal x="7.05" y="-272.875" z="44.05" diameter="0.4924429"/>
            </segment>

            <segment id="19" name="Seg19_axon_0">
                <parent segment="18"/>
                <distal x="6.3" y="-272.30002" z="44.75" diameter="0.5"/>
            </segment>

            <segment id="20" name="Seg20_axon_0">
                <parent segment="19"/>
                <distal x="5.4" y="-272.625" z="45.3" diameter="0.5678908"/>
            </segment>

            <segment id="21" name="Seg21_axon_0">
                <parent segment="20"/>
                <distal x="5.0" y="-273.8" z="45.35" diameter="0.5"/>
            </segment>

            <segment id="22" name="Seg22_axon_0">
                <parent segment="21"/>
                <distal x="4.975" y="-274.02502" z="45.35" diameter="0.39370042"/>
            </segment>

            <segment id="1" name="Seg0_dendrit_2">
                <parent segment="0"/>
                <proximal x="3.8" y="-282.67502" z="47.850002" diameter="0.53851646"/>
                <distal x="3.8" y="-283.6" z="48.45" diameter="0.53851646"/>
            </segment>

            <segment id="2" name="Seg2_dendrite_0">
                <parent segment="1"/>
                <distal x="5.1" y="-286.3" z="49.5" diameter="0.56568545"/>
            </segment>

            <segment id="3" name="Seg3_dendrite_0">
                <parent segment="2"/>
                <distal x="7.4" y="-289.8" z="51.1" diameter="0.56568545"/>
            </segment>

            <segment id="4" name="Seg4_dendrite_0">
                <parent segment="3"/>
                <distal x="7.9000006" y="-293.19998" z="52.100002" diameter="0.56568545"/>
            </segment>

            <segment id="5" name="Seg5_dendrite_0">
                <parent segment="4"/>
                <distal x="7.9000006" y="-296.6" z="52.8" diameter="0.56568545"/>
            </segment>

            <segment id="6" name="Seg6_dendrite_0">
                <parent segment="5"/>
                <distal x="7.5000005" y="-299.8" z="53.3" diameter="0.56568545"/>
            </segment>

            <segment id="7" name="Seg7_dendrite_0">
                <parent segment="6"/>
                <distal x="6.2" y="-304.6" z="54.100002" diameter="0.56568545"/>
            </segment>

            <segment id="8" name="Seg8_dendrite_0">
                <parent segment="7"/>
                <distal x="5.0" y="-320.15" z="56.0" diameter="0.5744563"/>
            </segment>

            <segment id="9" name="Seg9_dendrite_0">
                <parent segment="8"/>
                <distal x="3.1" y="-331.95" z="57.200005" diameter="0.5744563"/>
            </segment>

            <segment id="10" name="Seg10_dendrite_0">
                <parent segment="9"/>
                <distal x="2.3" y="-337.15" z="57.8" diameter="0.5744563"/>
            </segment>

            <segment id="11" name="Seg11_dendrite_0">
                <parent segment="10"/>
                <distal x="1.3000001" y="-342.8" z="58.600002" diameter="0.56568545"/>
            </segment>

            <segment id="12" name="Seg12_dendrite_0">
                <parent segment="11"/>
                <distal x="0.70000005" y="-348.6" z="58.899998" diameter="0.56568545"/>
            </segment>

            <segment id="13" name="Seg13_dendrite_0">
                <parent segment="12"/>
                <distal x="0.70000005" y="-349.44998" z="58.999996" diameter="0.5744563"/>
            </segment>

            <segment id="23" name="Seg23_neurite_0">
                <parent segment="22"/>
                <proximal x="4.975" y="-274.02502" z="45.35" diameter="0.39370042"/>
                <distal x="4.95" y="-274.15" z="45.2" diameter="0.42426404"/>
            </segment>

            <segment id="24" name="Seg24_neurite_0">
                <parent segment="23"/>
                <distal x="4.475" y="-273.775" z="42.449997" diameter="0.44158804"/>
            </segment>

            <segment id="25" name="Seg25_neurite_0">
                <parent segment="24"/>
                <distal x="3.85" y="-273.65" z="41.575" diameter="0.40311286"/>
            </segment>

            <segment id="26" name="Seg26_neurite_0">
                <parent segment="22"/>
                <proximal x="4.975" y="-274.02502" z="45.35" diameter="0.39370042"/>
                <distal x="4.975" y="-274.2" z="45.5" diameter="0.42720017"/>
            </segment>

            <segment id="27" name="Seg27_neurite_0">
                <parent segment="26"/>
                <distal x="4.4500003" y="-274.65" z="48.525" diameter="0.4924429"/>
            </segment>

            <segment id="28" name="Seg28_neurite_0">
                <parent segment="27"/>
                <distal x="3.8" y="-274.8" z="49.475" diameter="0.45"/>
            </segment>

            <segmentGroup id="Soma" neuroLexId="sao864921383">    <!--
                This group contains an unbranched set of segments, and all of the segmentGroups marked with
                neuroLexId = sao864921383 form a non-overlapping set of all of the segments.
                These segmentGroups correspond to the 'cables' of NeuroML v1.8.1. -->

                <member segment="0"/>
            </segmentGroup>

            <segmentGroup id="Axon" neuroLexId="sao864921383">    <!--
                This group contains an unbranched set of segments, and all of the segmentGroups marked with
                neuroLexId = sao864921383 form a non-overlapping set of all of the segments.
                These segmentGroups correspond to the 'cables' of NeuroML v1.8.1. -->

                <member segment="14"/>

                <member segment="15"/>

                <member segment="16"/>

                <member segment="17"/>

                <member segment="18"/>

                <member segment="19"/>

                <member segment="20"/>

                <member segment="21"/>

                <member segment="22"/>
            </segmentGroup>

            <segmentGroup id="Dendrite2" neuroLexId="sao864921383">    <!--
                This group contains an unbranched set of segments, and all of the segmentGroups marked with
                neuroLexId = sao864921383 form a non-overlapping set of all of the segments.
                These segmentGroups correspond to the 'cables' of NeuroML v1.8.1. -->

                <member segment="1"/>

                <member segment="2"/>

                <member segment="3"/>

                <member segment="4"/>

                <member segment="5"/>

                <member segment="6"/>

                <member segment="7"/>

                <member segment="8"/>

                <member segment="9"/>

                <member segment="10"/>

                <member segment="11"/>

                <member segment="12"/>

                <member segment="13"/>
            </segmentGroup>

            <segmentGroup id="Neurite3" neuroLexId="sao864921383">    <!--
                This group contains an unbranched set of segments, and all of the segmentGroups marked with
                neuroLexId = sao864921383 form a non-overlapping set of all of the segments.
                These segmentGroups correspond to the 'cables' of NeuroML v1.8.1. -->

                <member segment="23"/>

                <member segment="24"/>

                <member segment="25"/>
            </segmentGroup>

            <segmentGroup id="Neurite4" neuroLexId="sao864921383">    <!--
                This group contains an unbranched set of segments, and all of the segmentGroups marked with
                neuroLexId = sao864921383 form a non-overlapping set of all of the segments.
                These segmentGroups correspond to the 'cables' of NeuroML v1.8.1. -->

                <member segment="26"/>

                <member segment="27"/>

                <member segment="28"/>
            </segmentGroup>

            <segmentGroup id="all">
                <include segmentGroup="Soma"/>
                <include segmentGroup="Axon"/>
                <include segmentGroup="Dendrite2"/>
                <include segmentGroup="Neurite3"/>
                <include segmentGroup="Neurite4"/>
            </segmentGroup>

            <segmentGroup id="soma_group" neuroLexId="GO:0043025">    <!--Soma group-->

                <include segmentGroup="Soma"/>
            </segmentGroup>

            <segmentGroup id="axon_group" neuroLexId="GO:0030424">    <!--Axon group-->

                <include segmentGroup="Axon"/>
            </segmentGroup>

            <segmentGroup id="dendrite_group" neuroLexId="GO:0030425">    <!--Dendrite group-->

                <include segmentGroup="Dendrite2"/>
                <include segmentGroup="Neurite3"/>
                <include segmentGroup="Neurite4"/>
            </segmentGroup>

        </morphology>

            <!--Adding the biophysical parameters-->

        <biophysicalProperties id="biophys">

            <membraneProperties>

                <channelDensity condDensity="0.025 mS_per_cm2" id="LeakConductance_all" ionChannel="LeakConductance" ion="non_specific" erev="-65.0 mV"/>

                <spikeThresh value="0 mV"/>

                <specificCapacitance value="1.0 uF_per_cm2"/>

                <initMembPotential value="-65.0 mV"/>

            </membraneProperties>

            <intracellularProperties>

                <resistivity value="0.03 kohm_cm"/>

            </intracellularProperties>

        </biophysicalProperties>

    </cell>

</neuroml>
