<Lems>

    <!--

Parameters and setting used to generate this network:

    Data reader:                    SpreadsheetDataReader
    c302 version:                   0.7.4
    PyOpenWorm version:             0.10.0.post0
    Cells:                          All cells
    Cell stimulated:                ['PLML', 'PLMR']
    Connection:                     []
    Connection numbers overridden:  None
    Connection numbers scaled:      None
    Connection polarities override: None
    Muscles:                        All muscles

    Known BioParameters:
        BioParameter: chem_exc_syn_decay = 10ms (SRC: BlindGuess, certainty 0.1)
        BioParameter: chem_exc_syn_erev = 0mV (SRC: BlindGuess, certainty 0.1)
        BioParameter: chem_exc_syn_rise = 3ms (SRC: BlindGuess, certainty 0.1)
        BioParameter: chem_inh_syn_decay = 10ms (SRC: BlindGuess, certainty 0.1)
        BioParameter: chem_inh_syn_erev = -80mV (SRC: BlindGuess, certainty 0.1)
        BioParameter: chem_inh_syn_rise = 3ms (SRC: BlindGuess, certainty 0.1)
        BioParameter: elec_syn_decay = 10ms (SRC: BlindGuess, certainty 0.1)
        BioParameter: elec_syn_erev = 0mV (SRC: BlindGuess, certainty 0.1)
        BioParameter: elec_syn_rise = 3ms (SRC: BlindGuess, certainty 0.1)
        BioParameter: muscle_iaf_C = 3pF (SRC: BlindGuess, certainty 0.1)
        BioParameter: muscle_iaf_conductance = 0.1nS (SRC: BlindGuess, certainty 0.1)
        BioParameter: muscle_iaf_leak_reversal = -50mV (SRC: BlindGuess, certainty 0.1)
        BioParameter: muscle_iaf_reset = -50mV (SRC: BlindGuess, certainty 0.1)
        BioParameter: muscle_iaf_thresh = -30mV (SRC: BlindGuess, certainty 0.1)
        BioParameter: neuron_iaf_C = 3pF (SRC: BlindGuess, certainty 0.1)
        BioParameter: neuron_iaf_conductance = 0.1nS (SRC: BlindGuess, certainty 0.1)
        BioParameter: neuron_iaf_leak_reversal = -50mV (SRC: BlindGuess, certainty 0.1)
        BioParameter: neuron_iaf_reset = -50mV (SRC: BlindGuess, certainty 0.1)
        BioParameter: neuron_iaf_thresh = -30mV (SRC: BlindGuess, certainty 0.1)
        BioParameter: neuron_to_muscle_chem_exc_syn_gbase = 0.01nS (SRC: BlindGuess, certainty 0.1)
        BioParameter: neuron_to_muscle_chem_inh_syn_gbase = 0.01nS (SRC: BlindGuess, certainty 0.1)
        BioParameter: neuron_to_muscle_elec_syn_gbase = 0nS (SRC: BlindGuess, certainty 0.1)
        BioParameter: neuron_to_neuron_chem_exc_syn_gbase = 0.01nS (SRC: BlindGuess, certainty 0.1)
        BioParameter: neuron_to_neuron_chem_inh_syn_gbase = 0.01nS (SRC: BlindGuess, certainty 0.1)
        BioParameter: neuron_to_neuron_elec_syn_gbase = 0nS (SRC: BlindGuess, certainty 0.1)
        BioParameter: unphysiological_offset_current = 5pA (SRC: Testing Full net, certainty 0)
        BioParameter: unphysiological_offset_current_del = 50 ms (SRC: Testing Full net, certainty 0)
        BioParameter: unphysiological_offset_current_dur = 900 ms (SRC: Testing Full net, certainty 0)

    -->

    <Target component="sim_c302_A_Full" />

    <!-- Include core NeuroML2 ComponentType definitions -->

    <Include file="Cells.xml" />
    <Include file="Networks.xml" />
    <Include file="Simulation.xml" />

    <Include file="c302_A_Full.net.nml" />

    <!-- End of NeuroML2 content -->

    <Simulation id="sim_c302_A_Full" length="1000ms" step="0.05ms" target="c302_A_Full">

        <Display id="neurons" title="c302_A_Full: Membrane potential of a number of neurons" timeScale="1ms" xmin="-100.0" xmax="1100.0" ymin="-72" ymax="-48">

            <Line id="AVBL" quantity="AVBL/0/generic_neuron_iaf_cell/v" scale="1mV" color="#f87100" timeScale="1ms" />
            <Line id="AVBR" quantity="AVBR/0/generic_neuron_iaf_cell/v" scale="1mV" color="#eaf195" timeScale="1ms" />
            <Line id="DB1" quantity="DB1/0/generic_neuron_iaf_cell/v" scale="1mV" color="#ac15c4" timeScale="1ms" />
            <Line id="DB2" quantity="DB2/0/generic_neuron_iaf_cell/v" scale="1mV" color="#3c00ca" timeScale="1ms" />
            <Line id="DD1" quantity="DD1/0/generic_neuron_iaf_cell/v" scale="1mV" color="#58a09e" timeScale="1ms" />
            <Line id="DD2" quantity="DD2/0/generic_neuron_iaf_cell/v" scale="1mV" color="#262f1d" timeScale="1ms" />
            <Line id="PVCL" quantity="PVCL/0/generic_neuron_iaf_cell/v" scale="1mV" color="#007df7" timeScale="1ms" />
            <Line id="PVCR" quantity="PVCR/0/generic_neuron_iaf_cell/v" scale="1mV" color="#108b77" timeScale="1ms" />
            <Line id="VB1" quantity="VB1/0/generic_neuron_iaf_cell/v" scale="1mV" color="#9a1694" timeScale="1ms" />
            <Line id="VB2" quantity="VB2/0/generic_neuron_iaf_cell/v" scale="1mV" color="#458fa5" timeScale="1ms" />
            <Line id="VD1" quantity="VD1/0/generic_neuron_iaf_cell/v" scale="1mV" color="#7b5b40" timeScale="1ms" />
            <Line id="VD2" quantity="VD2/0/generic_neuron_iaf_cell/v" scale="1mV" color="#ef7488" timeScale="1ms" />

        </Display>

        <Display id="muscles" title="c302_A_Full: Membrane potential of a number of muscles" timeScale="1ms" xmin="-100.0" xmax="1100.0" ymin="-72" ymax="-48">

            <Line id="MDR01" quantity="MDR01/0/generic_muscle_iaf_cell/v" scale="1mV" color="#008200" timeScale="1ms" />
            <Line id="MDR02" quantity="MDR02/0/generic_muscle_iaf_cell/v" scale="1mV" color="#247960" timeScale="1ms" />
            <Line id="MDR03" quantity="MDR03/0/generic_muscle_iaf_cell/v" scale="1mV" color="#00962a" timeScale="1ms" />
            <Line id="MDR04" quantity="MDR04/0/generic_muscle_iaf_cell/v" scale="1mV" color="#8f25f0" timeScale="1ms" />
            <Line id="MDR05" quantity="MDR05/0/generic_muscle_iaf_cell/v" scale="1mV" color="#c6f524" timeScale="1ms" />
            <Line id="MDR06" quantity="MDR06/0/generic_muscle_iaf_cell/v" scale="1mV" color="#4e0047" timeScale="1ms" />
            <Line id="MDR07" quantity="MDR07/0/generic_muscle_iaf_cell/v" scale="1mV" color="#cf2d27" timeScale="1ms" />
            <Line id="MDR08" quantity="MDR08/0/generic_muscle_iaf_cell/v" scale="1mV" color="#f527d6" timeScale="1ms" />
            <Line id="MDR09" quantity="MDR09/0/generic_muscle_iaf_cell/v" scale="1mV" color="#006359" timeScale="1ms" />
            <Line id="MDR10" quantity="MDR10/0/generic_muscle_iaf_cell/v" scale="1mV" color="#57d17a" timeScale="1ms" />
            <Line id="MDR11" quantity="MDR11/0/generic_muscle_iaf_cell/v" scale="1mV" color="#c979d2" timeScale="1ms" />
            <Line id="MDR12" quantity="MDR12/0/generic_muscle_iaf_cell/v" scale="1mV" color="#e270c8" timeScale="1ms" />
            <Line id="MDR13" quantity="MDR13/0/generic_muscle_iaf_cell/v" scale="1mV" color="#d14b1f" timeScale="1ms" />
            <Line id="MDR14" quantity="MDR14/0/generic_muscle_iaf_cell/v" scale="1mV" color="#2f701e" timeScale="1ms" />
            <Line id="MDR15" quantity="MDR15/0/generic_muscle_iaf_cell/v" scale="1mV" color="#88d57c" timeScale="1ms" />
            <Line id="MDR16" quantity="MDR16/0/generic_muscle_iaf_cell/v" scale="1mV" color="#d2a8a4" timeScale="1ms" />
            <Line id="MDR17" quantity="MDR17/0/generic_muscle_iaf_cell/v" scale="1mV" color="#58b4d0" timeScale="1ms" />
            <Line id="MDR18" quantity="MDR18/0/generic_muscle_iaf_cell/v" scale="1mV" color="#28e945" timeScale="1ms" />
            <Line id="MDR19" quantity="MDR19/0/generic_muscle_iaf_cell/v" scale="1mV" color="#27d8b9" timeScale="1ms" />
            <Line id="MDR20" quantity="MDR20/0/generic_muscle_iaf_cell/v" scale="1mV" color="#cb7212" timeScale="1ms" />
            <Line id="MDR21" quantity="MDR21/0/generic_muscle_iaf_cell/v" scale="1mV" color="#650049" timeScale="1ms" />
            <Line id="MDR22" quantity="MDR22/0/generic_muscle_iaf_cell/v" scale="1mV" color="#008216" timeScale="1ms" />
            <Line id="MDR23" quantity="MDR23/0/generic_muscle_iaf_cell/v" scale="1mV" color="#efb351" timeScale="1ms" />
            <Line id="MDR24" quantity="MDR24/0/generic_muscle_iaf_cell/v" scale="1mV" color="#f21142" timeScale="1ms" />
            <Line id="MVR01" quantity="MVR01/0/generic_muscle_iaf_cell/v" scale="1mV" color="#126d33" timeScale="1ms" />
            <Line id="MVR02" quantity="MVR02/0/generic_muscle_iaf_cell/v" scale="1mV" color="#65b5e4" timeScale="1ms" />
            <Line id="MVR03" quantity="MVR03/0/generic_muscle_iaf_cell/v" scale="1mV" color="#80d25c" timeScale="1ms" />
            <Line id="MVR04" quantity="MVR04/0/generic_muscle_iaf_cell/v" scale="1mV" color="#dc84b4" timeScale="1ms" />
            <Line id="MVR05" quantity="MVR05/0/generic_muscle_iaf_cell/v" scale="1mV" color="#2c964d" timeScale="1ms" />
            <Line id="MVR06" quantity="MVR06/0/generic_muscle_iaf_cell/v" scale="1mV" color="#d08980" timeScale="1ms" />
            <Line id="MVR07" quantity="MVR07/0/generic_muscle_iaf_cell/v" scale="1mV" color="#c68d55" timeScale="1ms" />
            <Line id="MVR08" quantity="MVR08/0/generic_muscle_iaf_cell/v" scale="1mV" color="#21a0ed" timeScale="1ms" />
            <Line id="MVR09" quantity="MVR09/0/generic_muscle_iaf_cell/v" scale="1mV" color="#d81153" timeScale="1ms" />
            <Line id="MVR10" quantity="MVR10/0/generic_muscle_iaf_cell/v" scale="1mV" color="#00ada4" timeScale="1ms" />
            <Line id="MVR11" quantity="MVR11/0/generic_muscle_iaf_cell/v" scale="1mV" color="#c22637" timeScale="1ms" />
            <Line id="MVR12" quantity="MVR12/0/generic_muscle_iaf_cell/v" scale="1mV" color="#6fbd35" timeScale="1ms" />
            <Line id="MVR13" quantity="MVR13/0/generic_muscle_iaf_cell/v" scale="1mV" color="#d361e0" timeScale="1ms" />
            <Line id="MVR14" quantity="MVR14/0/generic_muscle_iaf_cell/v" scale="1mV" color="#f68aec" timeScale="1ms" />
            <Line id="MVR15" quantity="MVR15/0/generic_muscle_iaf_cell/v" scale="1mV" color="#6cb0d9" timeScale="1ms" />
            <Line id="MVR16" quantity="MVR16/0/generic_muscle_iaf_cell/v" scale="1mV" color="#d71742" timeScale="1ms" />
            <Line id="MVR17" quantity="MVR17/0/generic_muscle_iaf_cell/v" scale="1mV" color="#69dc47" timeScale="1ms" />
            <Line id="MVR18" quantity="MVR18/0/generic_muscle_iaf_cell/v" scale="1mV" color="#1d6036" timeScale="1ms" />
            <Line id="MVR19" quantity="MVR19/0/generic_muscle_iaf_cell/v" scale="1mV" color="#b89600" timeScale="1ms" />
            <Line id="MVR20" quantity="MVR20/0/generic_muscle_iaf_cell/v" scale="1mV" color="#e171c7" timeScale="1ms" />
            <Line id="MVR21" quantity="MVR21/0/generic_muscle_iaf_cell/v" scale="1mV" color="#2a4f12" timeScale="1ms" />
            <Line id="MVR22" quantity="MVR22/0/generic_muscle_iaf_cell/v" scale="1mV" color="#656eaf" timeScale="1ms" />
            <Line id="MVR23" quantity="MVR23/0/generic_muscle_iaf_cell/v" scale="1mV" color="#7b667a" timeScale="1ms" />
            <Line id="MVR24" quantity="MVR24/0/generic_muscle_iaf_cell/v" scale="1mV" color="#485e9a" timeScale="1ms" />
            <Line id="MVL01" quantity="MVL01/0/generic_muscle_iaf_cell/v" scale="1mV" color="#3485ee" timeScale="1ms" />
            <Line id="MVL02" quantity="MVL02/0/generic_muscle_iaf_cell/v" scale="1mV" color="#75aba9" timeScale="1ms" />
            <Line id="MVL03" quantity="MVL03/0/generic_muscle_iaf_cell/v" scale="1mV" color="#cdbaa9" timeScale="1ms" />
            <Line id="MVL04" quantity="MVL04/0/generic_muscle_iaf_cell/v" scale="1mV" color="#1a5ecc" timeScale="1ms" />
            <Line id="MVL05" quantity="MVL05/0/generic_muscle_iaf_cell/v" scale="1mV" color="#1023e8" timeScale="1ms" />
            <Line id="MVL06" quantity="MVL06/0/generic_muscle_iaf_cell/v" scale="1mV" color="#97fbc1" timeScale="1ms" />
            <Line id="MVL07" quantity="MVL07/0/generic_muscle_iaf_cell/v" scale="1mV" color="#ff4cb0" timeScale="1ms" />
            <Line id="MVL08" quantity="MVL08/0/generic_muscle_iaf_cell/v" scale="1mV" color="#54f34b" timeScale="1ms" />
            <Line id="MVL09" quantity="MVL09/0/generic_muscle_iaf_cell/v" scale="1mV" color="#32d147" timeScale="1ms" />
            <Line id="MVL10" quantity="MVL10/0/generic_muscle_iaf_cell/v" scale="1mV" color="#899a57" timeScale="1ms" />
            <Line id="MVL11" quantity="MVL11/0/generic_muscle_iaf_cell/v" scale="1mV" color="#555244" timeScale="1ms" />
            <Line id="MVL12" quantity="MVL12/0/generic_muscle_iaf_cell/v" scale="1mV" color="#c3978c" timeScale="1ms" />
            <Line id="MVL13" quantity="MVL13/0/generic_muscle_iaf_cell/v" scale="1mV" color="#d34223" timeScale="1ms" />
            <Line id="MVL14" quantity="MVL14/0/generic_muscle_iaf_cell/v" scale="1mV" color="#0000fe" timeScale="1ms" />
            <Line id="MVL15" quantity="MVL15/0/generic_muscle_iaf_cell/v" scale="1mV" color="#faabfe" timeScale="1ms" />
            <Line id="MVL16" quantity="MVL16/0/generic_muscle_iaf_cell/v" scale="1mV" color="#846f84" timeScale="1ms" />
            <Line id="MVL17" quantity="MVL17/0/generic_muscle_iaf_cell/v" scale="1mV" color="#11c34e" timeScale="1ms" />
            <Line id="MVL18" quantity="MVL18/0/generic_muscle_iaf_cell/v" scale="1mV" color="#b3e938" timeScale="1ms" />
            <Line id="MVL19" quantity="MVL19/0/generic_muscle_iaf_cell/v" scale="1mV" color="#81a7d0" timeScale="1ms" />
            <Line id="MVL20" quantity="MVL20/0/generic_muscle_iaf_cell/v" scale="1mV" color="#af5590" timeScale="1ms" />
            <Line id="MVL21" quantity="MVL21/0/generic_muscle_iaf_cell/v" scale="1mV" color="#2980f1" timeScale="1ms" />
            <Line id="MVL22" quantity="MVL22/0/generic_muscle_iaf_cell/v" scale="1mV" color="#f42388" timeScale="1ms" />
            <Line id="MVL23" quantity="MVL23/0/generic_muscle_iaf_cell/v" scale="1mV" color="#9f25f3" timeScale="1ms" />
            <Line id="MVL24" quantity="MVL24/0/generic_muscle_iaf_cell/v" scale="1mV" color="#3e2a82" timeScale="1ms" />
            <Line id="MDL01" quantity="MDL01/0/generic_muscle_iaf_cell/v" scale="1mV" color="#81c6db" timeScale="1ms" />
            <Line id="MDL02" quantity="MDL02/0/generic_muscle_iaf_cell/v" scale="1mV" color="#53b690" timeScale="1ms" />
            <Line id="MDL03" quantity="MDL03/0/generic_muscle_iaf_cell/v" scale="1mV" color="#899972" timeScale="1ms" />
            <Line id="MDL04" quantity="MDL04/0/generic_muscle_iaf_cell/v" scale="1mV" color="#5feec4" timeScale="1ms" />
            <Line id="MDL05" quantity="MDL05/0/generic_muscle_iaf_cell/v" scale="1mV" color="#ade39b" timeScale="1ms" />
            <Line id="MDL06" quantity="MDL06/0/generic_muscle_iaf_cell/v" scale="1mV" color="#123ace" timeScale="1ms" />
            <Line id="MDL07" quantity="MDL07/0/generic_muscle_iaf_cell/v" scale="1mV" color="#58f1b1" timeScale="1ms" />
            <Line id="MDL08" quantity="MDL08/0/generic_muscle_iaf_cell/v" scale="1mV" color="#617e00" timeScale="1ms" />
            <Line id="MDL09" quantity="MDL09/0/generic_muscle_iaf_cell/v" scale="1mV" color="#73144b" timeScale="1ms" />
            <Line id="MDL10" quantity="MDL10/0/generic_muscle_iaf_cell/v" scale="1mV" color="#ee26ad" timeScale="1ms" />
            <Line id="MDL11" quantity="MDL11/0/generic_muscle_iaf_cell/v" scale="1mV" color="#a7b2cc" timeScale="1ms" />
            <Line id="MDL12" quantity="MDL12/0/generic_muscle_iaf_cell/v" scale="1mV" color="#de5b5f" timeScale="1ms" />
            <Line id="MDL13" quantity="MDL13/0/generic_muscle_iaf_cell/v" scale="1mV" color="#2ca436" timeScale="1ms" />
            <Line id="MDL14" quantity="MDL14/0/generic_muscle_iaf_cell/v" scale="1mV" color="#32fe9f" timeScale="1ms" />
            <Line id="MDL15" quantity="MDL15/0/generic_muscle_iaf_cell/v" scale="1mV" color="#bb8022" timeScale="1ms" />
            <Line id="MDL16" quantity="MDL16/0/generic_muscle_iaf_cell/v" scale="1mV" color="#e9a700" timeScale="1ms" />
            <Line id="MDL17" quantity="MDL17/0/generic_muscle_iaf_cell/v" scale="1mV" color="#ea7899" timeScale="1ms" />
            <Line id="MDL18" quantity="MDL18/0/generic_muscle_iaf_cell/v" scale="1mV" color="#5f65c8" timeScale="1ms" />
            <Line id="MDL19" quantity="MDL19/0/generic_muscle_iaf_cell/v" scale="1mV" color="#3c0050" timeScale="1ms" />
            <Line id="MDL20" quantity="MDL20/0/generic_muscle_iaf_cell/v" scale="1mV" color="#fd1e9a" timeScale="1ms" />
            <Line id="MDL21" quantity="MDL21/0/generic_muscle_iaf_cell/v" scale="1mV" color="#de8998" timeScale="1ms" />
            <Line id="MDL22" quantity="MDL22/0/generic_muscle_iaf_cell/v" scale="1mV" color="#8a525d" timeScale="1ms" />
            <Line id="MDL23" quantity="MDL23/0/generic_muscle_iaf_cell/v" scale="1mV" color="#eeb7a5" timeScale="1ms" />
            <Line id="MDL24" quantity="MDL24/0/generic_muscle_iaf_cell/v" scale="1mV" color="#75eae1" timeScale="1ms" />

        </Display>

        <OutputFile id="neurons_v" fileName="c302_A_Full.dat">
            <OutputColumn id="ADAL_v" quantity="ADAL/0/generic_neuron_iaf_cell/v"/>
            <OutputColumn id="ADAR_v" quantity="ADAR/0/generic_neuron_iaf_cell/v"/>
            <OutputColumn id="ADEL_v" quantity="ADEL/0/generic_neuron_iaf_cell/v"/>
            <OutputColumn id="ADER_v" quantity="ADER/0/generic_neuron_iaf_cell/v"/>
            <OutputColumn id="ADFL_v" quantity="ADFL/0/generic_neuron_iaf_cell/v"/>
            <OutputColumn id="ADFR_v" quantity="ADFR/0/generic_neuron_iaf_cell/v"/>
            <OutputColumn id="ADLL_v" quantity="ADLL/0/generic_neuron_iaf_cell/v"/>
            <OutputColumn id="ADLR_v" quantity="ADLR/0/generic_neuron_iaf_cell/v"/>
            <OutputColumn id="AFDL_v" quantity="AFDL/0/generic_neuron_iaf_cell/v"/>
            <OutputColumn id="AFDR_v" quantity="AFDR/0/generic_neuron_iaf_cell/v"/>
            <OutputColumn id="AIAL_v" quantity="AIAL/0/generic_neuron_iaf_cell/v"/>
            <OutputColumn id="AIAR_v" quantity="AIAR/0/generic_neuron_iaf_cell/v"/>
            <OutputColumn id="AIBL_v" quantity="AIBL/0/generic_neuron_iaf_cell/v"/>
            <OutputColumn id="AIBR_v" quantity="AIBR/0/generic_neuron_iaf_cell/v"/>
            <OutputColumn id="AIML_v" quantity="AIML/0/generic_neuron_iaf_cell/v"/>
            <OutputColumn id="AIMR_v" quantity="AIMR/0/generic_neuron_iaf_cell/v"/>
            <OutputColumn id="AINL_v" quantity="AINL/0/generic_neuron_iaf_cell/v"/>
            <OutputColumn id="AINR_v" quantity="AINR/0/generic_neuron_iaf_cell/v"/>
            <OutputColumn id="AIYL_v" quantity="AIYL/0/generic_neuron_iaf_cell/v"/>
            <OutputColumn id="AIYR_v" quantity="AIYR/0/generic_neuron_iaf_cell/v"/>
            <OutputColumn id="AIZL_v" quantity="AIZL/0/generic_neuron_iaf_cell/v"/>
            <OutputColumn id="AIZR_v" quantity="AIZR/0/generic_neuron_iaf_cell/v"/>
            <OutputColumn id="ALA_v" quantity="ALA/0/generic_neuron_iaf_cell/v"/>
            <OutputColumn id="ALML_v" quantity="ALML/0/generic_neuron_iaf_cell/v"/>
            <OutputColumn id="ALMR_v" quantity="ALMR/0/generic_neuron_iaf_cell/v"/>
            <OutputColumn id="ALNL_v" quantity="ALNL/0/generic_neuron_iaf_cell/v"/>
            <OutputColumn id="ALNR_v" quantity="ALNR/0/generic_neuron_iaf_cell/v"/>
            <OutputColumn id="AQR_v" quantity="AQR/0/generic_neuron_iaf_cell/v"/>
            <OutputColumn id="AS1_v" quantity="AS1/0/generic_neuron_iaf_cell/v"/>
            <OutputColumn id="AS10_v" quantity="AS10/0/generic_neuron_iaf_cell/v"/>
            <OutputColumn id="AS11_v" quantity="AS11/0/generic_neuron_iaf_cell/v"/>
            <OutputColumn id="AS2_v" quantity="AS2/0/generic_neuron_iaf_cell/v"/>
            <OutputColumn id="AS3_v" quantity="AS3/0/generic_neuron_iaf_cell/v"/>
            <OutputColumn id="AS4_v" quantity="AS4/0/generic_neuron_iaf_cell/v"/>
            <OutputColumn id="AS5_v" quantity="AS5/0/generic_neuron_iaf_cell/v"/>
            <OutputColumn id="AS6_v" quantity="AS6/0/generic_neuron_iaf_cell/v"/>
            <OutputColumn id="AS7_v" quantity="AS7/0/generic_neuron_iaf_cell/v"/>
            <OutputColumn id="AS8_v" quantity="AS8/0/generic_neuron_iaf_cell/v"/>
            <OutputColumn id="AS9_v" quantity="AS9/0/generic_neuron_iaf_cell/v"/>
            <OutputColumn id="ASEL_v" quantity="ASEL/0/generic_neuron_iaf_cell/v"/>
            <OutputColumn id="ASER_v" quantity="ASER/0/generic_neuron_iaf_cell/v"/>
            <OutputColumn id="ASGL_v" quantity="ASGL/0/generic_neuron_iaf_cell/v"/>
            <OutputColumn id="ASGR_v" quantity="ASGR/0/generic_neuron_iaf_cell/v"/>
            <OutputColumn id="ASHL_v" quantity="ASHL/0/generic_neuron_iaf_cell/v"/>
            <OutputColumn id="ASHR_v" quantity="ASHR/0/generic_neuron_iaf_cell/v"/>
            <OutputColumn id="ASIL_v" quantity="ASIL/0/generic_neuron_iaf_cell/v"/>
            <OutputColumn id="ASIR_v" quantity="ASIR/0/generic_neuron_iaf_cell/v"/>
            <OutputColumn id="ASJL_v" quantity="ASJL/0/generic_neuron_iaf_cell/v"/>
            <OutputColumn id="ASJR_v" quantity="ASJR/0/generic_neuron_iaf_cell/v"/>
            <OutputColumn id="ASKL_v" quantity="ASKL/0/generic_neuron_iaf_cell/v"/>
            <OutputColumn id="ASKR_v" quantity="ASKR/0/generic_neuron_iaf_cell/v"/>
            <OutputColumn id="AUAL_v" quantity="AUAL/0/generic_neuron_iaf_cell/v"/>
            <OutputColumn id="AUAR_v" quantity="AUAR/0/generic_neuron_iaf_cell/v"/>
            <OutputColumn id="AVAL_v" quantity="AVAL/0/generic_neuron_iaf_cell/v"/>
            <OutputColumn id="AVAR_v" quantity="AVAR/0/generic_neuron_iaf_cell/v"/>
            <OutputColumn id="AVBL_v" quantity="AVBL/0/generic_neuron_iaf_cell/v"/>
            <OutputColumn id="AVBR_v" quantity="AVBR/0/generic_neuron_iaf_cell/v"/>
            <OutputColumn id="AVDL_v" quantity="AVDL/0/generic_neuron_iaf_cell/v"/>
            <OutputColumn id="AVDR_v" quantity="AVDR/0/generic_neuron_iaf_cell/v"/>
            <OutputColumn id="AVEL_v" quantity="AVEL/0/generic_neuron_iaf_cell/v"/>
            <OutputColumn id="AVER_v" quantity="AVER/0/generic_neuron_iaf_cell/v"/>
            <OutputColumn id="AVFL_v" quantity="AVFL/0/generic_neuron_iaf_cell/v"/>
            <OutputColumn id="AVFR_v" quantity="AVFR/0/generic_neuron_iaf_cell/v"/>
            <OutputColumn id="AVG_v" quantity="AVG/0/generic_neuron_iaf_cell/v"/>
            <OutputColumn id="AVHL_v" quantity="AVHL/0/generic_neuron_iaf_cell/v"/>
            <OutputColumn id="AVHR_v" quantity="AVHR/0/generic_neuron_iaf_cell/v"/>
            <OutputColumn id="AVJL_v" quantity="AVJL/0/generic_neuron_iaf_cell/v"/>
            <OutputColumn id="AVJR_v" quantity="AVJR/0/generic_neuron_iaf_cell/v"/>
            <OutputColumn id="AVKL_v" quantity="AVKL/0/generic_neuron_iaf_cell/v"/>
            <OutputColumn id="AVKR_v" quantity="AVKR/0/generic_neuron_iaf_cell/v"/>
            <OutputColumn id="AVL_v" quantity="AVL/0/generic_neuron_iaf_cell/v"/>
            <OutputColumn id="AVM_v" quantity="AVM/0/generic_neuron_iaf_cell/v"/>
            <OutputColumn id="AWAL_v" quantity="AWAL/0/generic_neuron_iaf_cell/v"/>
            <OutputColumn id="AWAR_v" quantity="AWAR/0/generic_neuron_iaf_cell/v"/>
            <OutputColumn id="AWBL_v" quantity="AWBL/0/generic_neuron_iaf_cell/v"/>
            <OutputColumn id="AWBR_v" quantity="AWBR/0/generic_neuron_iaf_cell/v"/>
            <OutputColumn id="AWCL_v" quantity="AWCL/0/generic_neuron_iaf_cell/v"/>
            <OutputColumn id="AWCR_v" quantity="AWCR/0/generic_neuron_iaf_cell/v"/>
            <OutputColumn id="BAGL_v" quantity="BAGL/0/generic_neuron_iaf_cell/v"/>
            <OutputColumn id="BAGR_v" quantity="BAGR/0/generic_neuron_iaf_cell/v"/>
            <OutputColumn id="BDUL_v" quantity="BDUL/0/generic_neuron_iaf_cell/v"/>
            <OutputColumn id="BDUR_v" quantity="BDUR/0/generic_neuron_iaf_cell/v"/>
            <OutputColumn id="CANL_v" quantity="CANL/0/generic_neuron_iaf_cell/v"/>
            <OutputColumn id="CANR_v" quantity="CANR/0/generic_neuron_iaf_cell/v"/>
            <OutputColumn id="CEPDL_v" quantity="CEPDL/0/generic_neuron_iaf_cell/v"/>
            <OutputColumn id="CEPDR_v" quantity="CEPDR/0/generic_neuron_iaf_cell/v"/>
            <OutputColumn id="CEPVL_v" quantity="CEPVL/0/generic_neuron_iaf_cell/v"/>
            <OutputColumn id="CEPVR_v" quantity="CEPVR/0/generic_neuron_iaf_cell/v"/>
            <OutputColumn id="DA1_v" quantity="DA1/0/generic_neuron_iaf_cell/v"/>
            <OutputColumn id="DA2_v" quantity="DA2/0/generic_neuron_iaf_cell/v"/>
            <OutputColumn id="DA3_v" quantity="DA3/0/generic_neuron_iaf_cell/v"/>
            <OutputColumn id="DA4_v" quantity="DA4/0/generic_neuron_iaf_cell/v"/>
            <OutputColumn id="DA5_v" quantity="DA5/0/generic_neuron_iaf_cell/v"/>
            <OutputColumn id="DA6_v" quantity="DA6/0/generic_neuron_iaf_cell/v"/>
            <OutputColumn id="DA7_v" quantity="DA7/0/generic_neuron_iaf_cell/v"/>
            <OutputColumn id="DA8_v" quantity="DA8/0/generic_neuron_iaf_cell/v"/>
            <OutputColumn id="DA9_v" quantity="DA9/0/generic_neuron_iaf_cell/v"/>
            <OutputColumn id="DB1_v" quantity="DB1/0/generic_neuron_iaf_cell/v"/>
            <OutputColumn id="DB2_v" quantity="DB2/0/generic_neuron_iaf_cell/v"/>
            <OutputColumn id="DB3_v" quantity="DB3/0/generic_neuron_iaf_cell/v"/>
            <OutputColumn id="DB4_v" quantity="DB4/0/generic_neuron_iaf_cell/v"/>
            <OutputColumn id="DB5_v" quantity="DB5/0/generic_neuron_iaf_cell/v"/>
            <OutputColumn id="DB6_v" quantity="DB6/0/generic_neuron_iaf_cell/v"/>
            <OutputColumn id="DB7_v" quantity="DB7/0/generic_neuron_iaf_cell/v"/>
            <OutputColumn id="DD1_v" quantity="DD1/0/generic_neuron_iaf_cell/v"/>
            <OutputColumn id="DD2_v" quantity="DD2/0/generic_neuron_iaf_cell/v"/>
            <OutputColumn id="DD3_v" quantity="DD3/0/generic_neuron_iaf_cell/v"/>
            <OutputColumn id="DD4_v" quantity="DD4/0/generic_neuron_iaf_cell/v"/>
            <OutputColumn id="DD5_v" quantity="DD5/0/generic_neuron_iaf_cell/v"/>
            <OutputColumn id="DD6_v" quantity="DD6/0/generic_neuron_iaf_cell/v"/>
            <OutputColumn id="DVA_v" quantity="DVA/0/generic_neuron_iaf_cell/v"/>
            <OutputColumn id="DVB_v" quantity="DVB/0/generic_neuron_iaf_cell/v"/>
            <OutputColumn id="DVC_v" quantity="DVC/0/generic_neuron_iaf_cell/v"/>
            <OutputColumn id="FLPL_v" quantity="FLPL/0/generic_neuron_iaf_cell/v"/>
            <OutputColumn id="FLPR_v" quantity="FLPR/0/generic_neuron_iaf_cell/v"/>
            <OutputColumn id="HSNL_v" quantity="HSNL/0/generic_neuron_iaf_cell/v"/>
            <OutputColumn id="HSNR_v" quantity="HSNR/0/generic_neuron_iaf_cell/v"/>
            <OutputColumn id="I1L_v" quantity="I1L/0/generic_neuron_iaf_cell/v"/>
            <OutputColumn id="I1R_v" quantity="I1R/0/generic_neuron_iaf_cell/v"/>
            <OutputColumn id="I2L_v" quantity="I2L/0/generic_neuron_iaf_cell/v"/>
            <OutputColumn id="I2R_v" quantity="I2R/0/generic_neuron_iaf_cell/v"/>
            <OutputColumn id="I3_v" quantity="I3/0/generic_neuron_iaf_cell/v"/>
            <OutputColumn id="I4_v" quantity="I4/0/generic_neuron_iaf_cell/v"/>
            <OutputColumn id="I5_v" quantity="I5/0/generic_neuron_iaf_cell/v"/>
            <OutputColumn id="I6_v" quantity="I6/0/generic_neuron_iaf_cell/v"/>
            <OutputColumn id="IL1DL_v" quantity="IL1DL/0/generic_neuron_iaf_cell/v"/>
            <OutputColumn id="IL1DR_v" quantity="IL1DR/0/generic_neuron_iaf_cell/v"/>
            <OutputColumn id="IL1L_v" quantity="IL1L/0/generic_neuron_iaf_cell/v"/>
            <OutputColumn id="IL1R_v" quantity="IL1R/0/generic_neuron_iaf_cell/v"/>
            <OutputColumn id="IL1VL_v" quantity="IL1VL/0/generic_neuron_iaf_cell/v"/>
            <OutputColumn id="IL1VR_v" quantity="IL1VR/0/generic_neuron_iaf_cell/v"/>
            <OutputColumn id="IL2DL_v" quantity="IL2DL/0/generic_neuron_iaf_cell/v"/>
            <OutputColumn id="IL2DR_v" quantity="IL2DR/0/generic_neuron_iaf_cell/v"/>
            <OutputColumn id="IL2L_v" quantity="IL2L/0/generic_neuron_iaf_cell/v"/>
            <OutputColumn id="IL2R_v" quantity="IL2R/0/generic_neuron_iaf_cell/v"/>
            <OutputColumn id="IL2VL_v" quantity="IL2VL/0/generic_neuron_iaf_cell/v"/>
            <OutputColumn id="IL2VR_v" quantity="IL2VR/0/generic_neuron_iaf_cell/v"/>
            <OutputColumn id="LUAL_v" quantity="LUAL/0/generic_neuron_iaf_cell/v"/>
            <OutputColumn id="LUAR_v" quantity="LUAR/0/generic_neuron_iaf_cell/v"/>
            <OutputColumn id="M1_v" quantity="M1/0/generic_neuron_iaf_cell/v"/>
            <OutputColumn id="M2L_v" quantity="M2L/0/generic_neuron_iaf_cell/v"/>
            <OutputColumn id="M2R_v" quantity="M2R/0/generic_neuron_iaf_cell/v"/>
            <OutputColumn id="M3L_v" quantity="M3L/0/generic_neuron_iaf_cell/v"/>
            <OutputColumn id="M3R_v" quantity="M3R/0/generic_neuron_iaf_cell/v"/>
            <OutputColumn id="M4_v" quantity="M4/0/generic_neuron_iaf_cell/v"/>
            <OutputColumn id="M5_v" quantity="M5/0/generic_neuron_iaf_cell/v"/>
            <OutputColumn id="MCL_v" quantity="MCL/0/generic_neuron_iaf_cell/v"/>
            <OutputColumn id="MCR_v" quantity="MCR/0/generic_neuron_iaf_cell/v"/>
            <OutputColumn id="MI_v" quantity="MI/0/generic_neuron_iaf_cell/v"/>
            <OutputColumn id="NSML_v" quantity="NSML/0/generic_neuron_iaf_cell/v"/>
            <OutputColumn id="NSMR_v" quantity="NSMR/0/generic_neuron_iaf_cell/v"/>
            <OutputColumn id="OLLL_v" quantity="OLLL/0/generic_neuron_iaf_cell/v"/>
            <OutputColumn id="OLLR_v" quantity="OLLR/0/generic_neuron_iaf_cell/v"/>
            <OutputColumn id="OLQDL_v" quantity="OLQDL/0/generic_neuron_iaf_cell/v"/>
            <OutputColumn id="OLQDR_v" quantity="OLQDR/0/generic_neuron_iaf_cell/v"/>
            <OutputColumn id="OLQVL_v" quantity="OLQVL/0/generic_neuron_iaf_cell/v"/>
            <OutputColumn id="OLQVR_v" quantity="OLQVR/0/generic_neuron_iaf_cell/v"/>
            <OutputColumn id="PDA_v" quantity="PDA/0/generic_neuron_iaf_cell/v"/>
            <OutputColumn id="PDB_v" quantity="PDB/0/generic_neuron_iaf_cell/v"/>
            <OutputColumn id="PDEL_v" quantity="PDEL/0/generic_neuron_iaf_cell/v"/>
            <OutputColumn id="PDER_v" quantity="PDER/0/generic_neuron_iaf_cell/v"/>
            <OutputColumn id="PHAL_v" quantity="PHAL/0/generic_neuron_iaf_cell/v"/>
            <OutputColumn id="PHAR_v" quantity="PHAR/0/generic_neuron_iaf_cell/v"/>
            <OutputColumn id="PHBL_v" quantity="PHBL/0/generic_neuron_iaf_cell/v"/>
            <OutputColumn id="PHBR_v" quantity="PHBR/0/generic_neuron_iaf_cell/v"/>
            <OutputColumn id="PHCL_v" quantity="PHCL/0/generic_neuron_iaf_cell/v"/>
            <OutputColumn id="PHCR_v" quantity="PHCR/0/generic_neuron_iaf_cell/v"/>
            <OutputColumn id="PLML_v" quantity="PLML/0/generic_neuron_iaf_cell/v"/>
            <OutputColumn id="PLMR_v" quantity="PLMR/0/generic_neuron_iaf_cell/v"/>
            <OutputColumn id="PLNL_v" quantity="PLNL/0/generic_neuron_iaf_cell/v"/>
            <OutputColumn id="PLNR_v" quantity="PLNR/0/generic_neuron_iaf_cell/v"/>
            <OutputColumn id="PQR_v" quantity="PQR/0/generic_neuron_iaf_cell/v"/>
            <OutputColumn id="PVCL_v" quantity="PVCL/0/generic_neuron_iaf_cell/v"/>
            <OutputColumn id="PVCR_v" quantity="PVCR/0/generic_neuron_iaf_cell/v"/>
            <OutputColumn id="PVDL_v" quantity="PVDL/0/generic_neuron_iaf_cell/v"/>
            <OutputColumn id="PVDR_v" quantity="PVDR/0/generic_neuron_iaf_cell/v"/>
            <OutputColumn id="PVM_v" quantity="PVM/0/generic_neuron_iaf_cell/v"/>
            <OutputColumn id="PVNL_v" quantity="PVNL/0/generic_neuron_iaf_cell/v"/>
            <OutputColumn id="PVNR_v" quantity="PVNR/0/generic_neuron_iaf_cell/v"/>
            <OutputColumn id="PVPL_v" quantity="PVPL/0/generic_neuron_iaf_cell/v"/>
            <OutputColumn id="PVPR_v" quantity="PVPR/0/generic_neuron_iaf_cell/v"/>
            <OutputColumn id="PVQL_v" quantity="PVQL/0/generic_neuron_iaf_cell/v"/>
            <OutputColumn id="PVQR_v" quantity="PVQR/0/generic_neuron_iaf_cell/v"/>
            <OutputColumn id="PVR_v" quantity="PVR/0/generic_neuron_iaf_cell/v"/>
            <OutputColumn id="PVT_v" quantity="PVT/0/generic_neuron_iaf_cell/v"/>
            <OutputColumn id="PVWL_v" quantity="PVWL/0/generic_neuron_iaf_cell/v"/>
            <OutputColumn id="PVWR_v" quantity="PVWR/0/generic_neuron_iaf_cell/v"/>
            <OutputColumn id="RIAL_v" quantity="RIAL/0/generic_neuron_iaf_cell/v"/>
            <OutputColumn id="RIAR_v" quantity="RIAR/0/generic_neuron_iaf_cell/v"/>
            <OutputColumn id="RIBL_v" quantity="RIBL/0/generic_neuron_iaf_cell/v"/>
            <OutputColumn id="RIBR_v" quantity="RIBR/0/generic_neuron_iaf_cell/v"/>
            <OutputColumn id="RICL_v" quantity="RICL/0/generic_neuron_iaf_cell/v"/>
            <OutputColumn id="RICR_v" quantity="RICR/0/generic_neuron_iaf_cell/v"/>
            <OutputColumn id="RID_v" quantity="RID/0/generic_neuron_iaf_cell/v"/>
            <OutputColumn id="RIFL_v" quantity="RIFL/0/generic_neuron_iaf_cell/v"/>
            <OutputColumn id="RIFR_v" quantity="RIFR/0/generic_neuron_iaf_cell/v"/>
            <OutputColumn id="RIGL_v" quantity="RIGL/0/generic_neuron_iaf_cell/v"/>
            <OutputColumn id="RIGR_v" quantity="RIGR/0/generic_neuron_iaf_cell/v"/>
            <OutputColumn id="RIH_v" quantity="RIH/0/generic_neuron_iaf_cell/v"/>
            <OutputColumn id="RIML_v" quantity="RIML/0/generic_neuron_iaf_cell/v"/>
            <OutputColumn id="RIMR_v" quantity="RIMR/0/generic_neuron_iaf_cell/v"/>
            <OutputColumn id="RIPL_v" quantity="RIPL/0/generic_neuron_iaf_cell/v"/>
            <OutputColumn id="RIPR_v" quantity="RIPR/0/generic_neuron_iaf_cell/v"/>
            <OutputColumn id="RIR_v" quantity="RIR/0/generic_neuron_iaf_cell/v"/>
            <OutputColumn id="RIS_v" quantity="RIS/0/generic_neuron_iaf_cell/v"/>
            <OutputColumn id="RIVL_v" quantity="RIVL/0/generic_neuron_iaf_cell/v"/>
            <OutputColumn id="RIVR_v" quantity="RIVR/0/generic_neuron_iaf_cell/v"/>
            <OutputColumn id="RMDDL_v" quantity="RMDDL/0/generic_neuron_iaf_cell/v"/>
            <OutputColumn id="RMDDR_v" quantity="RMDDR/0/generic_neuron_iaf_cell/v"/>
            <OutputColumn id="RMDL_v" quantity="RMDL/0/generic_neuron_iaf_cell/v"/>
            <OutputColumn id="RMDR_v" quantity="RMDR/0/generic_neuron_iaf_cell/v"/>
            <OutputColumn id="RMDVL_v" quantity="RMDVL/0/generic_neuron_iaf_cell/v"/>
            <OutputColumn id="RMDVR_v" quantity="RMDVR/0/generic_neuron_iaf_cell/v"/>
            <OutputColumn id="RMED_v" quantity="RMED/0/generic_neuron_iaf_cell/v"/>
            <OutputColumn id="RMEL_v" quantity="RMEL/0/generic_neuron_iaf_cell/v"/>
            <OutputColumn id="RMER_v" quantity="RMER/0/generic_neuron_iaf_cell/v"/>
            <OutputColumn id="RMEV_v" quantity="RMEV/0/generic_neuron_iaf_cell/v"/>
            <OutputColumn id="RMFL_v" quantity="RMFL/0/generic_neuron_iaf_cell/v"/>
            <OutputColumn id="RMFR_v" quantity="RMFR/0/generic_neuron_iaf_cell/v"/>
            <OutputColumn id="RMGL_v" quantity="RMGL/0/generic_neuron_iaf_cell/v"/>
            <OutputColumn id="RMGR_v" quantity="RMGR/0/generic_neuron_iaf_cell/v"/>
            <OutputColumn id="RMHL_v" quantity="RMHL/0/generic_neuron_iaf_cell/v"/>
            <OutputColumn id="RMHR_v" quantity="RMHR/0/generic_neuron_iaf_cell/v"/>
            <OutputColumn id="SAADL_v" quantity="SAADL/0/generic_neuron_iaf_cell/v"/>
            <OutputColumn id="SAADR_v" quantity="SAADR/0/generic_neuron_iaf_cell/v"/>
            <OutputColumn id="SAAVL_v" quantity="SAAVL/0/generic_neuron_iaf_cell/v"/>
            <OutputColumn id="SAAVR_v" quantity="SAAVR/0/generic_neuron_iaf_cell/v"/>
            <OutputColumn id="SABD_v" quantity="SABD/0/generic_neuron_iaf_cell/v"/>
            <OutputColumn id="SABVL_v" quantity="SABVL/0/generic_neuron_iaf_cell/v"/>
            <OutputColumn id="SABVR_v" quantity="SABVR/0/generic_neuron_iaf_cell/v"/>
            <OutputColumn id="SDQL_v" quantity="SDQL/0/generic_neuron_iaf_cell/v"/>
            <OutputColumn id="SDQR_v" quantity="SDQR/0/generic_neuron_iaf_cell/v"/>
            <OutputColumn id="SIADL_v" quantity="SIADL/0/generic_neuron_iaf_cell/v"/>
            <OutputColumn id="SIADR_v" quantity="SIADR/0/generic_neuron_iaf_cell/v"/>
            <OutputColumn id="SIAVL_v" quantity="SIAVL/0/generic_neuron_iaf_cell/v"/>
            <OutputColumn id="SIAVR_v" quantity="SIAVR/0/generic_neuron_iaf_cell/v"/>
            <OutputColumn id="SIBDL_v" quantity="SIBDL/0/generic_neuron_iaf_cell/v"/>
            <OutputColumn id="SIBDR_v" quantity="SIBDR/0/generic_neuron_iaf_cell/v"/>
            <OutputColumn id="SIBVL_v" quantity="SIBVL/0/generic_neuron_iaf_cell/v"/>
            <OutputColumn id="SIBVR_v" quantity="SIBVR/0/generic_neuron_iaf_cell/v"/>
            <OutputColumn id="SMBDL_v" quantity="SMBDL/0/generic_neuron_iaf_cell/v"/>
            <OutputColumn id="SMBDR_v" quantity="SMBDR/0/generic_neuron_iaf_cell/v"/>
            <OutputColumn id="SMBVL_v" quantity="SMBVL/0/generic_neuron_iaf_cell/v"/>
            <OutputColumn id="SMBVR_v" quantity="SMBVR/0/generic_neuron_iaf_cell/v"/>
            <OutputColumn id="SMDDL_v" quantity="SMDDL/0/generic_neuron_iaf_cell/v"/>
            <OutputColumn id="SMDDR_v" quantity="SMDDR/0/generic_neuron_iaf_cell/v"/>
            <OutputColumn id="SMDVL_v" quantity="SMDVL/0/generic_neuron_iaf_cell/v"/>
            <OutputColumn id="SMDVR_v" quantity="SMDVR/0/generic_neuron_iaf_cell/v"/>
            <OutputColumn id="URADL_v" quantity="URADL/0/generic_neuron_iaf_cell/v"/>
            <OutputColumn id="URADR_v" quantity="URADR/0/generic_neuron_iaf_cell/v"/>
            <OutputColumn id="URAVL_v" quantity="URAVL/0/generic_neuron_iaf_cell/v"/>
            <OutputColumn id="URAVR_v" quantity="URAVR/0/generic_neuron_iaf_cell/v"/>
            <OutputColumn id="URBL_v" quantity="URBL/0/generic_neuron_iaf_cell/v"/>
            <OutputColumn id="URBR_v" quantity="URBR/0/generic_neuron_iaf_cell/v"/>
            <OutputColumn id="URXL_v" quantity="URXL/0/generic_neuron_iaf_cell/v"/>
            <OutputColumn id="URXR_v" quantity="URXR/0/generic_neuron_iaf_cell/v"/>
            <OutputColumn id="URYDL_v" quantity="URYDL/0/generic_neuron_iaf_cell/v"/>
            <OutputColumn id="URYDR_v" quantity="URYDR/0/generic_neuron_iaf_cell/v"/>
            <OutputColumn id="URYVL_v" quantity="URYVL/0/generic_neuron_iaf_cell/v"/>
            <OutputColumn id="URYVR_v" quantity="URYVR/0/generic_neuron_iaf_cell/v"/>
            <OutputColumn id="VA1_v" quantity="VA1/0/generic_neuron_iaf_cell/v"/>
            <OutputColumn id="VA10_v" quantity="VA10/0/generic_neuron_iaf_cell/v"/>
            <OutputColumn id="VA11_v" quantity="VA11/0/generic_neuron_iaf_cell/v"/>
            <OutputColumn id="VA12_v" quantity="VA12/0/generic_neuron_iaf_cell/v"/>
            <OutputColumn id="VA2_v" quantity="VA2/0/generic_neuron_iaf_cell/v"/>
            <OutputColumn id="VA3_v" quantity="VA3/0/generic_neuron_iaf_cell/v"/>
            <OutputColumn id="VA4_v" quantity="VA4/0/generic_neuron_iaf_cell/v"/>
            <OutputColumn id="VA5_v" quantity="VA5/0/generic_neuron_iaf_cell/v"/>
            <OutputColumn id="VA6_v" quantity="VA6/0/generic_neuron_iaf_cell/v"/>
            <OutputColumn id="VA7_v" quantity="VA7/0/generic_neuron_iaf_cell/v"/>
            <OutputColumn id="VA8_v" quantity="VA8/0/generic_neuron_iaf_cell/v"/>
            <OutputColumn id="VA9_v" quantity="VA9/0/generic_neuron_iaf_cell/v"/>
            <OutputColumn id="VB1_v" quantity="VB1/0/generic_neuron_iaf_cell/v"/>
            <OutputColumn id="VB10_v" quantity="VB10/0/generic_neuron_iaf_cell/v"/>
            <OutputColumn id="VB11_v" quantity="VB11/0/generic_neuron_iaf_cell/v"/>
            <OutputColumn id="VB2_v" quantity="VB2/0/generic_neuron_iaf_cell/v"/>
            <OutputColumn id="VB3_v" quantity="VB3/0/generic_neuron_iaf_cell/v"/>
            <OutputColumn id="VB4_v" quantity="VB4/0/generic_neuron_iaf_cell/v"/>
            <OutputColumn id="VB5_v" quantity="VB5/0/generic_neuron_iaf_cell/v"/>
            <OutputColumn id="VB6_v" quantity="VB6/0/generic_neuron_iaf_cell/v"/>
            <OutputColumn id="VB7_v" quantity="VB7/0/generic_neuron_iaf_cell/v"/>
            <OutputColumn id="VB8_v" quantity="VB8/0/generic_neuron_iaf_cell/v"/>
            <OutputColumn id="VB9_v" quantity="VB9/0/generic_neuron_iaf_cell/v"/>
            <OutputColumn id="VC1_v" quantity="VC1/0/generic_neuron_iaf_cell/v"/>
            <OutputColumn id="VC2_v" quantity="VC2/0/generic_neuron_iaf_cell/v"/>
            <OutputColumn id="VC3_v" quantity="VC3/0/generic_neuron_iaf_cell/v"/>
            <OutputColumn id="VC4_v" quantity="VC4/0/generic_neuron_iaf_cell/v"/>
            <OutputColumn id="VC5_v" quantity="VC5/0/generic_neuron_iaf_cell/v"/>
            <OutputColumn id="VC6_v" quantity="VC6/0/generic_neuron_iaf_cell/v"/>
            <OutputColumn id="VD1_v" quantity="VD1/0/generic_neuron_iaf_cell/v"/>
            <OutputColumn id="VD10_v" quantity="VD10/0/generic_neuron_iaf_cell/v"/>
            <OutputColumn id="VD11_v" quantity="VD11/0/generic_neuron_iaf_cell/v"/>
            <OutputColumn id="VD12_v" quantity="VD12/0/generic_neuron_iaf_cell/v"/>
            <OutputColumn id="VD13_v" quantity="VD13/0/generic_neuron_iaf_cell/v"/>
            <OutputColumn id="VD2_v" quantity="VD2/0/generic_neuron_iaf_cell/v"/>
            <OutputColumn id="VD3_v" quantity="VD3/0/generic_neuron_iaf_cell/v"/>
            <OutputColumn id="VD4_v" quantity="VD4/0/generic_neuron_iaf_cell/v"/>
            <OutputColumn id="VD5_v" quantity="VD5/0/generic_neuron_iaf_cell/v"/>
            <OutputColumn id="VD6_v" quantity="VD6/0/generic_neuron_iaf_cell/v"/>
            <OutputColumn id="VD7_v" quantity="VD7/0/generic_neuron_iaf_cell/v"/>
            <OutputColumn id="VD8_v" quantity="VD8/0/generic_neuron_iaf_cell/v"/>
            <OutputColumn id="VD9_v" quantity="VD9/0/generic_neuron_iaf_cell/v"/>
        </OutputFile>

        <OutputFile id="muscles_v" fileName="c302_A_Full.muscles.dat">
            <OutputColumn id="MDR01_v" quantity="MDR01/0/generic_muscle_iaf_cell/v"/>
            <OutputColumn id="MDR02_v" quantity="MDR02/0/generic_muscle_iaf_cell/v"/>
            <OutputColumn id="MDR03_v" quantity="MDR03/0/generic_muscle_iaf_cell/v"/>
            <OutputColumn id="MDR04_v" quantity="MDR04/0/generic_muscle_iaf_cell/v"/>
            <OutputColumn id="MDR05_v" quantity="MDR05/0/generic_muscle_iaf_cell/v"/>
            <OutputColumn id="MDR06_v" quantity="MDR06/0/generic_muscle_iaf_cell/v"/>
            <OutputColumn id="MDR07_v" quantity="MDR07/0/generic_muscle_iaf_cell/v"/>
            <OutputColumn id="MDR08_v" quantity="MDR08/0/generic_muscle_iaf_cell/v"/>
            <OutputColumn id="MDR09_v" quantity="MDR09/0/generic_muscle_iaf_cell/v"/>
            <OutputColumn id="MDR10_v" quantity="MDR10/0/generic_muscle_iaf_cell/v"/>
            <OutputColumn id="MDR11_v" quantity="MDR11/0/generic_muscle_iaf_cell/v"/>
            <OutputColumn id="MDR12_v" quantity="MDR12/0/generic_muscle_iaf_cell/v"/>
            <OutputColumn id="MDR13_v" quantity="MDR13/0/generic_muscle_iaf_cell/v"/>
            <OutputColumn id="MDR14_v" quantity="MDR14/0/generic_muscle_iaf_cell/v"/>
            <OutputColumn id="MDR15_v" quantity="MDR15/0/generic_muscle_iaf_cell/v"/>
            <OutputColumn id="MDR16_v" quantity="MDR16/0/generic_muscle_iaf_cell/v"/>
            <OutputColumn id="MDR17_v" quantity="MDR17/0/generic_muscle_iaf_cell/v"/>
            <OutputColumn id="MDR18_v" quantity="MDR18/0/generic_muscle_iaf_cell/v"/>
            <OutputColumn id="MDR19_v" quantity="MDR19/0/generic_muscle_iaf_cell/v"/>
            <OutputColumn id="MDR20_v" quantity="MDR20/0/generic_muscle_iaf_cell/v"/>
            <OutputColumn id="MDR21_v" quantity="MDR21/0/generic_muscle_iaf_cell/v"/>
            <OutputColumn id="MDR22_v" quantity="MDR22/0/generic_muscle_iaf_cell/v"/>
            <OutputColumn id="MDR23_v" quantity="MDR23/0/generic_muscle_iaf_cell/v"/>
            <OutputColumn id="MDR24_v" quantity="MDR24/0/generic_muscle_iaf_cell/v"/>
            <OutputColumn id="MVR01_v" quantity="MVR01/0/generic_muscle_iaf_cell/v"/>
            <OutputColumn id="MVR02_v" quantity="MVR02/0/generic_muscle_iaf_cell/v"/>
            <OutputColumn id="MVR03_v" quantity="MVR03/0/generic_muscle_iaf_cell/v"/>
            <OutputColumn id="MVR04_v" quantity="MVR04/0/generic_muscle_iaf_cell/v"/>
            <OutputColumn id="MVR05_v" quantity="MVR05/0/generic_muscle_iaf_cell/v"/>
            <OutputColumn id="MVR06_v" quantity="MVR06/0/generic_muscle_iaf_cell/v"/>
            <OutputColumn id="MVR07_v" quantity="MVR07/0/generic_muscle_iaf_cell/v"/>
            <OutputColumn id="MVR08_v" quantity="MVR08/0/generic_muscle_iaf_cell/v"/>
            <OutputColumn id="MVR09_v" quantity="MVR09/0/generic_muscle_iaf_cell/v"/>
            <OutputColumn id="MVR10_v" quantity="MVR10/0/generic_muscle_iaf_cell/v"/>
            <OutputColumn id="MVR11_v" quantity="MVR11/0/generic_muscle_iaf_cell/v"/>
            <OutputColumn id="MVR12_v" quantity="MVR12/0/generic_muscle_iaf_cell/v"/>
            <OutputColumn id="MVR13_v" quantity="MVR13/0/generic_muscle_iaf_cell/v"/>
            <OutputColumn id="MVR14_v" quantity="MVR14/0/generic_muscle_iaf_cell/v"/>
            <OutputColumn id="MVR15_v" quantity="MVR15/0/generic_muscle_iaf_cell/v"/>
            <OutputColumn id="MVR16_v" quantity="MVR16/0/generic_muscle_iaf_cell/v"/>
            <OutputColumn id="MVR17_v" quantity="MVR17/0/generic_muscle_iaf_cell/v"/>
            <OutputColumn id="MVR18_v" quantity="MVR18/0/generic_muscle_iaf_cell/v"/>
            <OutputColumn id="MVR19_v" quantity="MVR19/0/generic_muscle_iaf_cell/v"/>
            <OutputColumn id="MVR20_v" quantity="MVR20/0/generic_muscle_iaf_cell/v"/>
            <OutputColumn id="MVR21_v" quantity="MVR21/0/generic_muscle_iaf_cell/v"/>
            <OutputColumn id="MVR22_v" quantity="MVR22/0/generic_muscle_iaf_cell/v"/>
            <OutputColumn id="MVR23_v" quantity="MVR23/0/generic_muscle_iaf_cell/v"/>
            <OutputColumn id="MVR24_v" quantity="MVR24/0/generic_muscle_iaf_cell/v"/>
            <OutputColumn id="MVL01_v" quantity="MVL01/0/generic_muscle_iaf_cell/v"/>
            <OutputColumn id="MVL02_v" quantity="MVL02/0/generic_muscle_iaf_cell/v"/>
            <OutputColumn id="MVL03_v" quantity="MVL03/0/generic_muscle_iaf_cell/v"/>
            <OutputColumn id="MVL04_v" quantity="MVL04/0/generic_muscle_iaf_cell/v"/>
            <OutputColumn id="MVL05_v" quantity="MVL05/0/generic_muscle_iaf_cell/v"/>
            <OutputColumn id="MVL06_v" quantity="MVL06/0/generic_muscle_iaf_cell/v"/>
            <OutputColumn id="MVL07_v" quantity="MVL07/0/generic_muscle_iaf_cell/v"/>
            <OutputColumn id="MVL08_v" quantity="MVL08/0/generic_muscle_iaf_cell/v"/>
            <OutputColumn id="MVL09_v" quantity="MVL09/0/generic_muscle_iaf_cell/v"/>
            <OutputColumn id="MVL10_v" quantity="MVL10/0/generic_muscle_iaf_cell/v"/>
            <OutputColumn id="MVL11_v" quantity="MVL11/0/generic_muscle_iaf_cell/v"/>
            <OutputColumn id="MVL12_v" quantity="MVL12/0/generic_muscle_iaf_cell/v"/>
            <OutputColumn id="MVL13_v" quantity="MVL13/0/generic_muscle_iaf_cell/v"/>
            <OutputColumn id="MVL14_v" quantity="MVL14/0/generic_muscle_iaf_cell/v"/>
            <OutputColumn id="MVL15_v" quantity="MVL15/0/generic_muscle_iaf_cell/v"/>
            <OutputColumn id="MVL16_v" quantity="MVL16/0/generic_muscle_iaf_cell/v"/>
            <OutputColumn id="MVL17_v" quantity="MVL17/0/generic_muscle_iaf_cell/v"/>
            <OutputColumn id="MVL18_v" quantity="MVL18/0/generic_muscle_iaf_cell/v"/>
            <OutputColumn id="MVL19_v" quantity="MVL19/0/generic_muscle_iaf_cell/v"/>
            <OutputColumn id="MVL20_v" quantity="MVL20/0/generic_muscle_iaf_cell/v"/>
            <OutputColumn id="MVL21_v" quantity="MVL21/0/generic_muscle_iaf_cell/v"/>
            <OutputColumn id="MVL22_v" quantity="MVL22/0/generic_muscle_iaf_cell/v"/>
            <OutputColumn id="MVL23_v" quantity="MVL23/0/generic_muscle_iaf_cell/v"/>
            <OutputColumn id="MVL24_v" quantity="MVL24/0/generic_muscle_iaf_cell/v"/>
            <OutputColumn id="MDL01_v" quantity="MDL01/0/generic_muscle_iaf_cell/v"/>
            <OutputColumn id="MDL02_v" quantity="MDL02/0/generic_muscle_iaf_cell/v"/>
            <OutputColumn id="MDL03_v" quantity="MDL03/0/generic_muscle_iaf_cell/v"/>
            <OutputColumn id="MDL04_v" quantity="MDL04/0/generic_muscle_iaf_cell/v"/>
            <OutputColumn id="MDL05_v" quantity="MDL05/0/generic_muscle_iaf_cell/v"/>
            <OutputColumn id="MDL06_v" quantity="MDL06/0/generic_muscle_iaf_cell/v"/>
            <OutputColumn id="MDL07_v" quantity="MDL07/0/generic_muscle_iaf_cell/v"/>
            <OutputColumn id="MDL08_v" quantity="MDL08/0/generic_muscle_iaf_cell/v"/>
            <OutputColumn id="MDL09_v" quantity="MDL09/0/generic_muscle_iaf_cell/v"/>
            <OutputColumn id="MDL10_v" quantity="MDL10/0/generic_muscle_iaf_cell/v"/>
            <OutputColumn id="MDL11_v" quantity="MDL11/0/generic_muscle_iaf_cell/v"/>
            <OutputColumn id="MDL12_v" quantity="MDL12/0/generic_muscle_iaf_cell/v"/>
            <OutputColumn id="MDL13_v" quantity="MDL13/0/generic_muscle_iaf_cell/v"/>
            <OutputColumn id="MDL14_v" quantity="MDL14/0/generic_muscle_iaf_cell/v"/>
            <OutputColumn id="MDL15_v" quantity="MDL15/0/generic_muscle_iaf_cell/v"/>
            <OutputColumn id="MDL16_v" quantity="MDL16/0/generic_muscle_iaf_cell/v"/>
            <OutputColumn id="MDL17_v" quantity="MDL17/0/generic_muscle_iaf_cell/v"/>
            <OutputColumn id="MDL18_v" quantity="MDL18/0/generic_muscle_iaf_cell/v"/>
            <OutputColumn id="MDL19_v" quantity="MDL19/0/generic_muscle_iaf_cell/v"/>
            <OutputColumn id="MDL20_v" quantity="MDL20/0/generic_muscle_iaf_cell/v"/>
            <OutputColumn id="MDL21_v" quantity="MDL21/0/generic_muscle_iaf_cell/v"/>
            <OutputColumn id="MDL22_v" quantity="MDL22/0/generic_muscle_iaf_cell/v"/>
            <OutputColumn id="MDL23_v" quantity="MDL23/0/generic_muscle_iaf_cell/v"/>
            <OutputColumn id="MDL24_v" quantity="MDL24/0/generic_muscle_iaf_cell/v"/>
        </OutputFile>
    </Simulation>

</Lems>
