<Lems>

    <!--

Parameters and setting used to generate this network:

    Data reader:                    cect.readers.SpreadsheetDataReader
    c302 version:                   0.12.1
    cect version:                   0.3.1
    owmeta version:                 - not installed -
    owmeta_core version:            - not installed -
    Cells:                          ['URYDL', 'SMDDR', 'VD12', 'VB11', 'AS2', 'AIZL', 'ASHL']
    Cell stimulated:                []
    Connection:                     []
    Connection numbers overridden:  None
    Connection numbers scaled:      None
    Connection polarities override: None
    Muscles:                        ['MDL07']

    Known BioParameters:
        BioParameter: chem_exc_syn_decay = 10ms (SRC: BlindGuess, certainty 0.1)
        BioParameter: chem_exc_syn_erev = 0mV (SRC: BlindGuess, certainty 0.1)
        BioParameter: chem_exc_syn_rise = 3ms (SRC: BlindGuess, certainty 0.1)
        BioParameter: chem_inh_syn_decay = 10ms (SRC: BlindGuess, certainty 0.1)
        BioParameter: chem_inh_syn_erev = -80mV (SRC: BlindGuess, certainty 0.1)
        BioParameter: chem_inh_syn_rise = 3ms (SRC: BlindGuess, certainty 0.1)
        BioParameter: muscle_iaf_C = 3pF (SRC: BlindGuess, certainty 0.1)
        BioParameter: muscle_iaf_conductance = 0.1nS (SRC: BlindGuess, certainty 0.1)
        BioParameter: muscle_iaf_leak_reversal = -50mV (SRC: BlindGuess, certainty 0.1)
        BioParameter: muscle_iaf_reset = -50mV (SRC: BlindGuess, certainty 0.1)
        BioParameter: muscle_iaf_tau1 = 50ms (SRC: BlindGuess, certainty 0.1)
        BioParameter: muscle_iaf_thresh = -30mV (SRC: BlindGuess, certainty 0.1)
        BioParameter: neuron_iaf_C = 3pF (SRC: BlindGuess, certainty 0.1)
        BioParameter: neuron_iaf_conductance = 0.1nS (SRC: BlindGuess, certainty 0.1)
        BioParameter: neuron_iaf_leak_reversal = -50mV (SRC: BlindGuess, certainty 0.1)
        BioParameter: neuron_iaf_reset = -50mV (SRC: BlindGuess, certainty 0.1)
        BioParameter: neuron_iaf_tau1 = 50ms (SRC: BlindGuess, certainty 0.1)
        BioParameter: neuron_iaf_thresh = -30mV (SRC: BlindGuess, certainty 0.1)
        BioParameter: neuron_to_muscle_chem_exc_syn_gbase = 0.01nS (SRC: BlindGuess, certainty 0.1)
        BioParameter: neuron_to_muscle_chem_inh_syn_gbase = 0.01nS (SRC: BlindGuess, certainty 0.1)
        BioParameter: neuron_to_muscle_elec_syn_gbase = 0.01 nS (SRC: BlindGuess, certainty 0.1)
        BioParameter: neuron_to_neuron_chem_exc_syn_gbase = 0.01nS (SRC: BlindGuess, certainty 0.1)
        BioParameter: neuron_to_neuron_chem_inh_syn_gbase = 0.01nS (SRC: BlindGuess, certainty 0.1)
        BioParameter: neuron_to_neuron_elec_syn_gbase = 0.01 nS (SRC: BlindGuess, certainty 0.1)
        BioParameter: unphysiological_offset_current = 0pA (SRC: KnownError, certainty 0)
        BioParameter: unphysiological_offset_current_del = 50 ms (SRC: Testing IClamp, certainty 0)
        BioParameter: unphysiological_offset_current_dur = 200ms (SRC: KnownError, certainty 0)

    -->

    <Target component="sim_c302_B_Syns" />

    <!-- Include core NeuroML2 ComponentType definitions -->

    <Include file="Cells.xml" />
    <Include file="Networks.xml" />
    <Include file="Simulation.xml" />

    <Include file="cell_B.xml" />

    <Include file="c302_B_Syns.net.nml" />

    <!-- End of NeuroML2 content -->

    <Simulation id="sim_c302_B_Syns" length="3600ms" step="0.05ms" target="c302_B_Syns">

        <Display id="neurons" title="c302_B_Syns: Membrane potential of a number of neurons" timeScale="1ms" xmin="-360.0" xmax="3960.0000000000005" ymin="-52" ymax="-28">

            <Line id="AIZL" quantity="AIZL/0/generic_neuron_iaf_cell/v" scale="1mV" color="#e13b00" timeScale="1ms" />
            <Line id="AS2" quantity="AS2/0/generic_neuron_iaf_cell/v" scale="1mV" color="#32b579" timeScale="1ms" />
            <Line id="ASHL" quantity="ASHL/0/generic_neuron_iaf_cell/v" scale="1mV" color="#b1f7ed" timeScale="1ms" />
            <Line id="SMDDR" quantity="SMDDR/0/generic_neuron_iaf_cell/v" scale="1mV" color="#3a00f9" timeScale="1ms" />
            <Line id="URYDL" quantity="URYDL/0/generic_neuron_iaf_cell/v" scale="1mV" color="#232d17" timeScale="1ms" />
            <Line id="VB11" quantity="VB11/0/generic_neuron_iaf_cell/v" scale="1mV" color="#f6b588" timeScale="1ms" />
            <Line id="VD12" quantity="VD12/0/generic_neuron_iaf_cell/v" scale="1mV" color="#002400" timeScale="1ms" />

        </Display>

        <Display id="muscles" title="c302_B_Syns: Membrane potential of a number of muscles" timeScale="1ms" xmin="-360.0" xmax="3960.0000000000005" ymin="-52" ymax="-28">

            <Line id="MDL07" quantity="MDL07/0/generic_muscle_iaf_cell/v" scale="1mV" color="#c1551b" timeScale="1ms" />

        </Display>

        <Display id="activity_neurons" title="c302_B_Syns: Activity of a number of neurons" timeScale="1ms" xmin="-360.0" xmax="3960.0000000000005" ymin="-0.1" ymax="1.1">

            <Line id="AIZL" quantity="AIZL/0/generic_neuron_iaf_cell/activity" scale="1" color="#2e112a" timeScale="1ms" />
            <Line id="AS2" quantity="AS2/0/generic_neuron_iaf_cell/activity" scale="1" color="#000000" timeScale="1ms" />
            <Line id="ASHL" quantity="ASHL/0/generic_neuron_iaf_cell/activity" scale="1" color="#4c2e5d" timeScale="1ms" />
            <Line id="SMDDR" quantity="SMDDR/0/generic_neuron_iaf_cell/activity" scale="1" color="#7f21ee" timeScale="1ms" />
            <Line id="URYDL" quantity="URYDL/0/generic_neuron_iaf_cell/activity" scale="1" color="#8a209a" timeScale="1ms" />
            <Line id="VB11" quantity="VB11/0/generic_neuron_iaf_cell/activity" scale="1" color="#7f66e8" timeScale="1ms" />
            <Line id="VD12" quantity="VD12/0/generic_neuron_iaf_cell/activity" scale="1" color="#aa49f2" timeScale="1ms" />

        </Display>

        <Display id="activity_muscles" title="c302_B_Syns: Activity of a number of muscles" timeScale="1ms" xmin="-360.0" xmax="3960.0000000000005" ymin="-0.1" ymax="1.1">

            <Line id="MDL07" quantity="MDL07/0/generic_muscle_iaf_cell/activity" scale="1" color="#27fe53" timeScale="1ms" />

        </Display>

        <OutputFile id="neurons_v" fileName="c302_B_Syns.dat">
            <OutputColumn id="AIZL_v" quantity="AIZL/0/generic_neuron_iaf_cell/v"/>
            <OutputColumn id="AS2_v" quantity="AS2/0/generic_neuron_iaf_cell/v"/>
            <OutputColumn id="ASHL_v" quantity="ASHL/0/generic_neuron_iaf_cell/v"/>
            <OutputColumn id="SMDDR_v" quantity="SMDDR/0/generic_neuron_iaf_cell/v"/>
            <OutputColumn id="URYDL_v" quantity="URYDL/0/generic_neuron_iaf_cell/v"/>
            <OutputColumn id="VB11_v" quantity="VB11/0/generic_neuron_iaf_cell/v"/>
            <OutputColumn id="VD12_v" quantity="VD12/0/generic_neuron_iaf_cell/v"/>
        </OutputFile>

        <OutputFile id="neurons_activity" fileName="c302_B_Syns.activity.dat">
            <OutputColumn id="AIZL_v" quantity="AIZL/0/generic_neuron_iaf_cell/activity"/>
            <OutputColumn id="AS2_v" quantity="AS2/0/generic_neuron_iaf_cell/activity"/>
            <OutputColumn id="ASHL_v" quantity="ASHL/0/generic_neuron_iaf_cell/activity"/>
            <OutputColumn id="SMDDR_v" quantity="SMDDR/0/generic_neuron_iaf_cell/activity"/>
            <OutputColumn id="URYDL_v" quantity="URYDL/0/generic_neuron_iaf_cell/activity"/>
            <OutputColumn id="VB11_v" quantity="VB11/0/generic_neuron_iaf_cell/activity"/>
            <OutputColumn id="VD12_v" quantity="VD12/0/generic_neuron_iaf_cell/activity"/>
        </OutputFile>
        <OutputFile id="muscles_v" fileName="c302_B_Syns.muscles.dat">
            <OutputColumn id="MDL07_v" quantity="MDL07/0/generic_muscle_iaf_cell/v"/>
        </OutputFile>
        <OutputFile id="muscles_activity" fileName="c302_B_Syns.muscles.activity.dat">
            <OutputColumn id="MDL07_v" quantity="MDL07/0/generic_muscle_iaf_cell/activity"/>
        </OutputFile>
    </Simulation>

</Lems>
