<Lems>

    <!--

Parameters and setting used to generate this network:

    Data reader:                    cect.readers.SpreadsheetDataReader
    c302 version:                   0.12.1
    cect version:                   0.3.1
    owmeta version:                 - not installed -
    owmeta_core version:            - not installed -
    Cells:                          ['URYDL', 'SMDDR', 'VD12', 'VB11', 'AS2', 'AIZL', 'ASHL']
    Cell stimulated:                []
    Connection:                     []
    Connection numbers overridden:  None
    Connection numbers scaled:      None
    Connection polarities override: None
    Muscles:                        ['MDL07']

    Known BioParameters:
        BioParameter: ca_boyle_erev = 10 mV (SRC: BlindGuess, certainty 0.1)
        BioParameter: ca_conc_decay_time = 13.811870945509265 ms (SRC: BlindGuess, certainty 0.1)
        BioParameter: ca_conc_decay_time_muscle = 60.811870945509265 ms (SRC: BlindGuess, certainty 0.1)
        BioParameter: ca_conc_rho = 0.000238919 mol_per_m_per_A_per_s (SRC: BlindGuess, certainty 0.1)
        BioParameter: ca_conc_rho_muscle = 0.002238919 mol_per_m_per_A_per_s (SRC: BlindGuess, certainty 0.1)
        BioParameter: cell_diameter = 5 (SRC: BlindGuess, certainty 0.1)
        BioParameter: initial_memb_pot = -60 mV (SRC: BlindGuess, certainty 0.1)
        BioParameter: k_fast_erev = -70 mV (SRC: BlindGuess, certainty 0.1)
        BioParameter: k_slow_erev = -60 mV (SRC: BlindGuess, certainty 0.1)
        BioParameter: leak_erev = -60 mV (SRC: BlindGuess, certainty 0.1)
        BioParameter: muscle_ca_boyle_cond_density = 0.812775772264702 mS_per_cm2 (SRC: BlindGuess, certainty 0.1)
        BioParameter: muscle_ca_boyle_erev = 0 mV (SRC: BlindGuess, certainty 0.1)
        BioParameter: muscle_initial_memb_pot = -28 mV (SRC: BlindGuess, certainty 0.1)
        BioParameter: muscle_k_fast_cond_density = 0.042711643917483308 mS_per_cm2 (SRC: BlindGuess, certainty 0.1)
        BioParameter: muscle_k_fast_erev = -30 mV (SRC: BlindGuess, certainty 0.1)
        BioParameter: muscle_k_slow_cond_density = 0.45833751019872582 mS_per_cm2 (SRC: BlindGuess, certainty 0.1)
        BioParameter: muscle_k_slow_erev = -30 mV (SRC: BlindGuess, certainty 0.1)
        BioParameter: muscle_leak_cond_density = 0.002 mS_per_cm2 (SRC: BlindGuess, certainty 0.1)
        BioParameter: muscle_leak_erev = -20 mV (SRC: BlindGuess, certainty 0.1)
        BioParameter: muscle_length = 20 (SRC: BlindGuess, certainty 0.1)
        BioParameter: muscle_specific_capacitance = 1 uF_per_cm2 (SRC: BlindGuess, certainty 0.1)
        BioParameter: muscle_spike_thresh = -10 mV (SRC: BlindGuess, certainty 0.1)
        BioParameter: muscle_to_muscle_elec_syn_gbase = 0 nS (SRC: BlindGuess, certainty 0.1)
        BioParameter: neuron_ca_boyle_cond_density = 1.812775772264702 mS_per_cm2 (SRC: BlindGuess, certainty 0.1)
        BioParameter: neuron_k_fast_cond_density = 0.042711643917483308 mS_per_cm2 (SRC: BlindGuess, certainty 0.1)
        BioParameter: neuron_k_slow_cond_density = 0.45833751019872582 mS_per_cm2 (SRC: BlindGuess, certainty 0.1)
        BioParameter: neuron_leak_cond_density = 0.002 mS_per_cm2 (SRC: BlindGuess, certainty 0.1)
        BioParameter: neuron_spike_thresh = -55 mV (SRC: BlindGuess, certainty 0.1)
        BioParameter: neuron_to_motor_delayed_elec_syn_gbase = 0.01252 nS (SRC: BlindGuess, certainty 0.1)
        BioParameter: neuron_to_motor_delayed_elec_syn_mu = -30 (SRC: BlindGuess, certainty 0.1)
        BioParameter: neuron_to_motor_delayed_elec_syn_sigma = 0.4 (SRC: BlindGuess, certainty 0.1)
        BioParameter: neuron_to_motor_delayed_elec_syn_weight = 1 (SRC: BlindGuess, certainty 0.1)
        BioParameter: neuron_to_muscle_elec_syn_gbase = 0.00152 nS (SRC: BlindGuess, certainty 0.1)
        BioParameter: neuron_to_muscle_exc_syn_conductance = 0.10 nS (SRC: BlindGuess, certainty 0.1)
        BioParameter: neuron_to_muscle_exc_syn_delta = 19 mV (SRC: BlindGuess, certainty 0.1)
        BioParameter: neuron_to_muscle_exc_syn_erev = 37 mV (SRC: BlindGuess, certainty 0.1)
        BioParameter: neuron_to_muscle_exc_syn_k = 1.205per_ms (SRC: BlindGuess, certainty 0.1)
        BioParameter: neuron_to_muscle_exc_syn_mu = 5 mV (SRC: BlindGuess, certainty 0.1)
        BioParameter: neuron_to_muscle_exc_syn_sigma = 0.5 per_mV (SRC: BlindGuess, certainty 0.1)
        BioParameter: neuron_to_muscle_exc_syn_vth = 27 mV (SRC: BlindGuess, certainty 0.1)
        BioParameter: neuron_to_muscle_exc_syn_weight = 1 (SRC: BlindGuess, certainty 0.1)
        BioParameter: neuron_to_muscle_inh_syn_conductance = 1.29 nS (SRC: BlindGuess, certainty 0.1)
        BioParameter: neuron_to_muscle_inh_syn_delta = 5 mV (SRC: BlindGuess, certainty 0.1)
        BioParameter: neuron_to_muscle_inh_syn_erev = -35 mV (SRC: BlindGuess, certainty 0.1)
        BioParameter: neuron_to_muscle_inh_syn_k = 0.025per_ms (SRC: BlindGuess, certainty 0.1)
        BioParameter: neuron_to_muscle_inh_syn_vth = 0 mV (SRC: BlindGuess, certainty 0.1)
        BioParameter: neuron_to_neuron_elec_syn_gbase = 0.01252 nS (SRC: BlindGuess, certainty 0.1)
        BioParameter: neuron_to_neuron_elec_syn_weight = 1 (SRC: BlindGuess, certainty 0.1)
        BioParameter: neuron_to_neuron_exc_syn_conductance = 0.49 nS (SRC: BlindGuess, certainty 0.1)
        BioParameter: neuron_to_neuron_exc_syn_delta = 5 mV (SRC: BlindGuess, certainty 0.1)
        BioParameter: neuron_to_neuron_exc_syn_erev = -10 mV (SRC: BlindGuess, certainty 0.1)
        BioParameter: neuron_to_neuron_exc_syn_k = 0.5per_ms (SRC: BlindGuess, certainty 0.1)
        BioParameter: neuron_to_neuron_exc_syn_vth = 00 mV (SRC: BlindGuess, certainty 0.1)
        BioParameter: neuron_to_neuron_inh_syn_conductance = 0.29 nS (SRC: BlindGuess, certainty 0.1)
        BioParameter: neuron_to_neuron_inh_syn_delta = 5 mV (SRC: BlindGuess, certainty 0.1)
        BioParameter: neuron_to_neuron_inh_syn_erev = -70 mV (SRC: BlindGuess, certainty 0.1)
        BioParameter: neuron_to_neuron_inh_syn_k = 0.015per_ms (SRC: BlindGuess, certainty 0.1)
        BioParameter: neuron_to_neuron_inh_syn_vth = 0 mV (SRC: BlindGuess, certainty 0.1)
        BioParameter: specific_capacitance = 5 uF_per_cm2 (SRC: BlindGuess, certainty 0.1)
        BioParameter: unphysiological_offset_current = 0 pA (SRC: KnownError, certainty 0)
        BioParameter: unphysiological_offset_current_del = 50 ms (SRC: Testing IClamp, certainty 0)
        BioParameter: unphysiological_offset_current_dur = 2000 ms (SRC: KnownError, certainty 0)

    -->

    <Target component="sim_c302_C2_Syns" />

    <!-- Include core NeuroML2 ComponentType definitions -->

    <Include file="Cells.xml" />
    <Include file="Networks.xml" />
    <Include file="Simulation.xml" />

    <Include file="cell_C.xml" />

    <Include file="custom_muscle_components.xml" />

    <Include file="custom_synapses.xml" />

    <Include file="c302_C2_Syns.net.nml" />

    <!-- End of NeuroML2 content -->

    <Simulation id="sim_c302_C2_Syns" length="3600ms" step="0.05ms" target="c302_C2_Syns">

        <Display id="neurons" title="c302_C2_Syns: Membrane potential of a number of neurons" timeScale="1ms" xmin="-360.0" xmax="3960.0000000000005" ymin="-60" ymax="25">

            <Line id="AIZL" quantity="AIZL/0/GenericNeuronCell/v" scale="1mV" color="#e13b00" timeScale="1ms" />
            <Line id="AS2" quantity="AS2/0/GenericNeuronCell/v" scale="1mV" color="#32b579" timeScale="1ms" />
            <Line id="ASHL" quantity="ASHL/0/GenericNeuronCell/v" scale="1mV" color="#b1f7ed" timeScale="1ms" />
            <Line id="SMDDR" quantity="SMDDR/0/GenericNeuronCell/v" scale="1mV" color="#3a00f9" timeScale="1ms" />
            <Line id="URYDL" quantity="URYDL/0/GenericNeuronCell/v" scale="1mV" color="#232d17" timeScale="1ms" />
            <Line id="VB11" quantity="VB11/0/GenericNeuronCell/v" scale="1mV" color="#f6b588" timeScale="1ms" />
            <Line id="VD12" quantity="VD12/0/GenericNeuronCell/v" scale="1mV" color="#002400" timeScale="1ms" />

        </Display>

        <Display id="muscles" title="c302_C2_Syns: Membrane potential of a number of muscles" timeScale="1ms" xmin="-360.0" xmax="3960.0000000000005" ymin="-60" ymax="25">

            <Line id="MDL07" quantity="MDL07/0/GenericMuscleCell/v" scale="1mV" color="#c1551b" timeScale="1ms" />

        </Display>

        <Display id="activity_neurons" title="c302_C2_Syns: Activity of a number of neurons" timeScale="1ms" xmin="-360.0" xmax="3960.0000000000005" ymin="-0.1" ymax="1.1">

            <Line id="AIZL" quantity="AIZL/0/GenericNeuronCell/caConc" scale="1" color="#2e112a" timeScale="1ms" />
            <Line id="AS2" quantity="AS2/0/GenericNeuronCell/caConc" scale="1" color="#000000" timeScale="1ms" />
            <Line id="ASHL" quantity="ASHL/0/GenericNeuronCell/caConc" scale="1" color="#4c2e5d" timeScale="1ms" />
            <Line id="SMDDR" quantity="SMDDR/0/GenericNeuronCell/caConc" scale="1" color="#7f21ee" timeScale="1ms" />
            <Line id="URYDL" quantity="URYDL/0/GenericNeuronCell/caConc" scale="1" color="#8a209a" timeScale="1ms" />
            <Line id="VB11" quantity="VB11/0/GenericNeuronCell/caConc" scale="1" color="#7f66e8" timeScale="1ms" />
            <Line id="VD12" quantity="VD12/0/GenericNeuronCell/caConc" scale="1" color="#aa49f2" timeScale="1ms" />

        </Display>

        <Display id="activity_muscles" title="c302_C2_Syns: Activity of a number of muscles" timeScale="1ms" xmin="-360.0" xmax="3960.0000000000005" ymin="-0.1" ymax="1.1">

            <Line id="MDL07" quantity="MDL07/0/GenericMuscleCell/caConc" scale="1" color="#27fe53" timeScale="1ms" />

        </Display>

        <OutputFile id="neurons_v" fileName="c302_C2_Syns.dat">
            <OutputColumn id="AIZL_v" quantity="AIZL/0/GenericNeuronCell/v"/>
            <OutputColumn id="AS2_v" quantity="AS2/0/GenericNeuronCell/v"/>
            <OutputColumn id="ASHL_v" quantity="ASHL/0/GenericNeuronCell/v"/>
            <OutputColumn id="SMDDR_v" quantity="SMDDR/0/GenericNeuronCell/v"/>
            <OutputColumn id="URYDL_v" quantity="URYDL/0/GenericNeuronCell/v"/>
            <OutputColumn id="VB11_v" quantity="VB11/0/GenericNeuronCell/v"/>
            <OutputColumn id="VD12_v" quantity="VD12/0/GenericNeuronCell/v"/>
        </OutputFile>

        <OutputFile id="neurons_activity" fileName="c302_C2_Syns.activity.dat">
            <OutputColumn id="AIZL_v" quantity="AIZL/0/GenericNeuronCell/caConc"/>
            <OutputColumn id="AS2_v" quantity="AS2/0/GenericNeuronCell/caConc"/>
            <OutputColumn id="ASHL_v" quantity="ASHL/0/GenericNeuronCell/caConc"/>
            <OutputColumn id="SMDDR_v" quantity="SMDDR/0/GenericNeuronCell/caConc"/>
            <OutputColumn id="URYDL_v" quantity="URYDL/0/GenericNeuronCell/caConc"/>
            <OutputColumn id="VB11_v" quantity="VB11/0/GenericNeuronCell/caConc"/>
            <OutputColumn id="VD12_v" quantity="VD12/0/GenericNeuronCell/caConc"/>
        </OutputFile>
        <OutputFile id="muscles_v" fileName="c302_C2_Syns.muscles.dat">
            <OutputColumn id="MDL07_v" quantity="MDL07/0/GenericMuscleCell/v"/>
        </OutputFile>
        <OutputFile id="muscles_activity" fileName="c302_C2_Syns.muscles.activity.dat">
            <OutputColumn id="MDL07_v" quantity="MDL07/0/GenericMuscleCell/caConc"/>
        </OutputFile>
    </Simulation>

</Lems>
