<neuroml xmlns="http://www.neuroml.org/schema/neuroml2"  xmlns:xs="http://www.w3.org/2001/XMLSchema" xmlns:xsi="http://www.w3.org/2001/XMLSchema-instance" xsi:schemaLocation="http://www.neuroml.org/schema/neuroml2 https://raw.github.com/NeuroML/NeuroML2/development/Schemas/NeuroML2/NeuroML_v2beta5.xsd" id="c302_A_Oscillator">
    <notes>

Parameters and setting used to generate this network:

    Data reader:                    SpreadsheetDataReader
    c302 version:                   0.6.0
    Cells:                          ['DB2', 'VB2', 'DD2', 'VD2', 'DB3', 'VB3', 'DD3', 'VD3', 'DA2', 'VA2', 'DA3', 'VA3', 'AVBL', 'AVBR']
    Cell stimulated:                ['AVBL', 'AVBR']
    Connection:                     []
    Connection numbers overridden:  None
    Connection numbers scaled:      None
    Connection polarities override: None
    Muscles:                        []

    Known BioParameters:
        BioParameter: chem_exc_syn_decay = 5 ms (SRC: BlindGuess, certainty 0.1)
        BioParameter: chem_exc_syn_erev = 0mV (SRC: BlindGuess, certainty 0.1)
        BioParameter: chem_exc_syn_rise = 3ms (SRC: BlindGuess, certainty 0.1)
        BioParameter: chem_inh_syn_decay = 30 ms (SRC: BlindGuess, certainty 0.1)
        BioParameter: chem_inh_syn_erev = -80mV (SRC: BlindGuess, certainty 0.1)
        BioParameter: chem_inh_syn_rise = 3ms (SRC: BlindGuess, certainty 0.1)
        BioParameter: elec_syn_decay = 10ms (SRC: BlindGuess, certainty 0.1)
        BioParameter: elec_syn_erev = 0mV (SRC: BlindGuess, certainty 0.1)
        BioParameter: elec_syn_rise = 3ms (SRC: BlindGuess, certainty 0.1)
        BioParameter: muscle_iaf_C = 3pF (SRC: BlindGuess, certainty 0.1)
        BioParameter: muscle_iaf_conductance = 0.1nS (SRC: BlindGuess, certainty 0.1)
        BioParameter: muscle_iaf_leak_reversal = -50mV (SRC: BlindGuess, certainty 0.1)
        BioParameter: muscle_iaf_reset = -50mV (SRC: BlindGuess, certainty 0.1)
        BioParameter: muscle_iaf_thresh = -30mV (SRC: BlindGuess, certainty 0.1)
        BioParameter: neuron_iaf_C = 3pF (SRC: BlindGuess, certainty 0.1)
        BioParameter: neuron_iaf_conductance = 0.1nS (SRC: BlindGuess, certainty 0.1)
        BioParameter: neuron_iaf_leak_reversal = -50mV (SRC: BlindGuess, certainty 0.1)
        BioParameter: neuron_iaf_reset = -50mV (SRC: BlindGuess, certainty 0.1)
        BioParameter: neuron_iaf_thresh = -30mV (SRC: BlindGuess, certainty 0.1)
        BioParameter: neuron_to_muscle_chem_exc_syn_gbase = 0.01nS (SRC: BlindGuess, certainty 0.1)
        BioParameter: neuron_to_muscle_chem_inh_syn_gbase = 0.01nS (SRC: BlindGuess, certainty 0.1)
        BioParameter: neuron_to_muscle_elec_syn_gbase = 0nS (SRC: BlindGuess, certainty 0.1)
        BioParameter: neuron_to_neuron_chem_exc_syn_gbase = 0.01nS (SRC: BlindGuess, certainty 0.1)
        BioParameter: neuron_to_neuron_chem_inh_syn_gbase = 0.01nS (SRC: BlindGuess, certainty 0.1)
        BioParameter: neuron_to_neuron_elec_syn_gbase = 0nS (SRC: BlindGuess, certainty 0.1)
        BioParameter: unphysiological_offset_current = 2.5pA (SRC: KnownError, certainty 0)
        BioParameter: unphysiological_offset_current_del = 10 ms (SRC: Testing Osc, certainty 0)
        BioParameter: unphysiological_offset_current_dur = 2500 ms (SRC: Testing Osc, certainty 0)

</notes>
    <expTwoSynapse id="neuron_to_neuron_exc_syn" gbase="0.01nS" erev="0mV" tauDecay="5 ms" tauRise="3ms"/>
    <expTwoSynapse id="neuron_to_neuron_elec_syn" gbase="0nS" erev="0mV" tauDecay="10ms" tauRise="3ms"/>
    <expTwoSynapse id="neuron_to_neuron_inh_syn" gbase="0.01nS" erev="-80mV" tauDecay="30 ms" tauRise="3ms"/>
    <iafCell id="generic_muscle_iaf_cell" leakReversal="-50mV" thresh="-30mV" reset="-50mV" C="3pF" leakConductance="0.1nS"/>
    <iafCell id="generic_neuron_iaf_cell" leakReversal="-50mV" thresh="-30mV" reset="-50mV" C="3pF" leakConductance="0.1nS"/>
    <pulseGenerator id="offset_current" delay="10 ms" duration="2500 ms" amplitude="2.5pA"/>
    <network id="c302_A_Oscillator">
        <population id="AVBL" component="generic_neuron_iaf_cell" size="1" type="populationList">
            <property tag="type" value="interneuron"/>
            <property tag="receptor" value="GGR-3; GLR-1; GLR-5; LGC-55; SRA-11; UNC-8"/>
            <property tag="neurotransmitter" value=""/>
            <instance id="0">
                <location x="0.225" y="-269.793999999999983" z="37.863002999999999"/>
            </instance>
        </population>
        <population id="AVBR" component="generic_neuron_iaf_cell" size="1" type="populationList">
            <property tag="type" value="interneuron"/>
            <property tag="receptor" value="GGR-3; GLR-1; GLR-5; LGC-55; SRA-11; UNC-8"/>
            <property tag="neurotransmitter" value=""/>
            <property tag="OpenWormBackerAssignedName" value="mn"/>
            <instance id="0">
                <location x="-4.581" y="-269.793999999999983" z="37.863002999999999"/>
            </instance>
        </population>
        <population id="DA2" component="generic_neuron_iaf_cell" size="1" type="populationList">
            <property tag="type" value="motor"/>
            <property tag="receptor" value="CKR-2; DOP-1; DOP-3; NPR-3; SER-2; UNC-8"/>
            <property tag="neurotransmitter" value="Acetylcholine"/>
            <property tag="OpenWormBackerAssignedName" value="Ruzila"/>
            <instance id="0">
                <location x="-1.9" y="-190.75" z="-21.675000000000001"/>
            </instance>
        </population>
        <population id="DA3" component="generic_neuron_iaf_cell" size="1" type="populationList">
            <property tag="type" value="motor"/>
            <property tag="receptor" value="CKR-2; DOP-1; DOP-3; NPR-3; SER-2; UNC-8"/>
            <property tag="neurotransmitter" value="Acetylcholine"/>
            <property tag="OpenWormBackerAssignedName" value="Magoo"/>
            <instance id="0">
                <location x="-1.65" y="-123.650000000000006" z="-58.350002000000003"/>
            </instance>
        </population>
        <population id="DB2" component="generic_neuron_iaf_cell" size="1" type="populationList">
            <property tag="type" value="motor"/>
            <property tag="receptor" value="CKR-2; DOP-1; DOP-3; NPR-3; PDFR-1"/>
            <property tag="neurotransmitter" value="Acetylcholine"/>
            <instance id="0">
                <location x="-0.2" y="-244.5" z="15.787000000000001"/>
            </instance>
        </population>
        <population id="DB3" component="generic_neuron_iaf_cell" size="1" type="populationList">
            <property tag="type" value="motor"/>
            <property tag="receptor" value="CKR-2; DOP-1; DOP-3; NPR-3"/>
            <property tag="neurotransmitter" value="Acetylcholine"/>
            <instance id="0">
                <location x="-1.85" y="-195.275000000000006" z="-18.524999999999999"/>
            </instance>
        </population>
        <population id="DD2" component="generic_neuron_iaf_cell" size="1" type="populationList">
            <property tag="type" value="motor"/>
            <property tag="receptor" value="DOP-3; MOD-1; NPR-1"/>
            <property tag="neurotransmitter" value="GABA"/>
            <property tag="OpenWormBackerAssignedName" value="Evolver"/>
            <instance id="0">
                <location x="-1.85" y="-156.474989999999991" z="-42.850000000000001"/>
            </instance>
        </population>
        <population id="DD3" component="generic_neuron_iaf_cell" size="1" type="populationList">
            <property tag="type" value="motor"/>
            <property tag="receptor" value="DOP-3; MOD-1; NPR-1"/>
            <property tag="neurotransmitter" value="GABA"/>
            <instance id="0">
                <location x="-1.9" y="-28.600002" z="-60.524999999999999"/>
            </instance>
        </population>
        <population id="VA2" component="generic_neuron_iaf_cell" size="1" type="populationList">
            <property tag="type" value="motor"/>
            <property tag="receptor" value="CKR-2; DOP-1; DOP-3; LGC-53; NPR-3"/>
            <property tag="neurotransmitter" value="Acetylcholine"/>
            <property tag="OpenWormBackerAssignedName" value="Marquam Hill"/>
            <instance id="0">
                <location x="-1.85" y="-217.099999999999994" z="-3.9500003"/>
            </instance>
        </population>
        <population id="VA3" component="generic_neuron_iaf_cell" size="1" type="populationList">
            <property tag="type" value="motor"/>
            <property tag="receptor" value="CKR-2; DOP-1; DOP-3; LGC-53; NPR-3"/>
            <property tag="neurotransmitter" value="Acetylcholine"/>
            <instance id="0">
                <location x="-1.475" y="-184.099989999999991" z="-26.374998000000001"/>
            </instance>
        </population>
        <population id="VB2" component="generic_neuron_iaf_cell" size="1" type="populationList">
            <property tag="type" value="motor; sensory"/>
            <property tag="receptor" value="CKR-2; DOP-1; DOP-3; NPR-3"/>
            <property tag="neurotransmitter" value="Acetylcholine"/>
            <property tag="OpenWormBackerAssignedName" value="Bloodgood"/>
            <instance id="0">
                <location x="-2." y="-253.300000000000011" z="19.850000000000001"/>
            </instance>
        </population>
        <population id="VB3" component="generic_neuron_iaf_cell" size="1" type="populationList">
            <property tag="type" value="motor; sensory"/>
            <property tag="receptor" value="CKR-2; DOP-1; DOP-3; NPR-3"/>
            <property tag="neurotransmitter" value="Acetylcholine"/>
            <property tag="OpenWormBackerAssignedName" value="Ramez Naam"/>
            <instance id="0">
                <location x="-1.85" y="-210.224999999999994" z="-8.725"/>
            </instance>
        </population>
        <population id="VD2" component="generic_neuron_iaf_cell" size="1" type="populationList">
            <property tag="type" value="motor"/>
            <property tag="receptor" value="DOP-3; MOD-1; NPR-1; SER-2"/>
            <property tag="neurotransmitter" value="GABA"/>
            <instance id="0">
                <location x="-0.65000004" y="-226.049990000000008" z="2.35"/>
            </instance>
        </population>
        <population id="VD3" component="generic_neuron_iaf_cell" size="1" type="populationList">
            <property tag="type" value="motor"/>
            <property tag="receptor" value="DOP-3; MOD-1; NPR-1; SER-2"/>
            <property tag="neurotransmitter" value="GABA"/>
            <instance id="0">
                <location x="-0.8" y="-188.099999999999994" z="-23.449999999999999"/>
            </instance>
        </population>
        <projection id="NC_AVBL_AVBR_Glutamate" presynapticPopulation="AVBL" postsynapticPopulation="AVBR" synapse="neuron_to_neuron_exc_syn">
            <connectionWD id="0" preCellId="../AVBL/0/generic_neuron_iaf_cell" preSegmentId="0" preFractionAlong="0.5" postCellId="../AVBR/0/generic_neuron_iaf_cell" postSegmentId="0" postFractionAlong="0.5" weight="1." delay="0ms"/>
        </projection>
        <projection id="NC_AVBL_AVBR_Generic_GJ" presynapticPopulation="AVBL" postsynapticPopulation="AVBR" synapse="neuron_to_neuron_elec_syn">
            <connectionWD id="0" preCellId="../AVBL/0/generic_neuron_iaf_cell" preSegmentId="0" preFractionAlong="0.5" postCellId="../AVBR/0/generic_neuron_iaf_cell" postSegmentId="0" postFractionAlong="0.5" weight="3." delay="0ms"/>
        </projection>
        <projection id="NC_AVBL_DB3_Generic_GJ" presynapticPopulation="AVBL" postsynapticPopulation="DB3" synapse="neuron_to_neuron_elec_syn">
            <connectionWD id="0" preCellId="../AVBL/0/generic_neuron_iaf_cell" preSegmentId="0" preFractionAlong="0.5" postCellId="../DB3/0/generic_neuron_iaf_cell" postSegmentId="0" postFractionAlong="0.5" weight="1." delay="0ms"/>
        </projection>
        <projection id="NC_AVBL_VA2_Glutamate" presynapticPopulation="AVBL" postsynapticPopulation="VA2" synapse="neuron_to_neuron_exc_syn">
            <connectionWD id="0" preCellId="../AVBL/0/generic_neuron_iaf_cell" preSegmentId="0" preFractionAlong="0.5" postCellId="../VA2/0/generic_neuron_iaf_cell" postSegmentId="0" postFractionAlong="0.5" weight="1." delay="0ms"/>
        </projection>
        <projection id="NC_AVBL_VB2_Glutamate" presynapticPopulation="AVBL" postsynapticPopulation="VB2" synapse="neuron_to_neuron_exc_syn">
            <connectionWD id="0" preCellId="../AVBL/0/generic_neuron_iaf_cell" preSegmentId="0" preFractionAlong="0.5" postCellId="../VB2/0/generic_neuron_iaf_cell" postSegmentId="0" postFractionAlong="0.5" weight="1." delay="0ms"/>
        </projection>
        <projection id="NC_AVBL_VB2_Generic_GJ" presynapticPopulation="AVBL" postsynapticPopulation="VB2" synapse="neuron_to_neuron_elec_syn">
            <connectionWD id="0" preCellId="../AVBL/0/generic_neuron_iaf_cell" preSegmentId="0" preFractionAlong="0.5" postCellId="../VB2/0/generic_neuron_iaf_cell" postSegmentId="0" postFractionAlong="0.5" weight="3." delay="0ms"/>
        </projection>
        <projection id="NC_AVBR_AVBL_Glutamate" presynapticPopulation="AVBR" postsynapticPopulation="AVBL" synapse="neuron_to_neuron_exc_syn">
            <connectionWD id="0" preCellId="../AVBR/0/generic_neuron_iaf_cell" preSegmentId="0" preFractionAlong="0.5" postCellId="../AVBL/0/generic_neuron_iaf_cell" postSegmentId="0" postFractionAlong="0.5" weight="1." delay="0ms"/>
        </projection>
        <projection id="NC_AVBR_AVBL_Generic_GJ" presynapticPopulation="AVBR" postsynapticPopulation="AVBL" synapse="neuron_to_neuron_elec_syn">
            <connectionWD id="0" preCellId="../AVBR/0/generic_neuron_iaf_cell" preSegmentId="0" preFractionAlong="0.5" postCellId="../AVBL/0/generic_neuron_iaf_cell" postSegmentId="0" postFractionAlong="0.5" weight="3." delay="0ms"/>
        </projection>
        <projection id="NC_AVBR_DB2_Generic_GJ" presynapticPopulation="AVBR" postsynapticPopulation="DB2" synapse="neuron_to_neuron_elec_syn">
            <connectionWD id="0" preCellId="../AVBR/0/generic_neuron_iaf_cell" preSegmentId="0" preFractionAlong="0.5" postCellId="../DB2/0/generic_neuron_iaf_cell" postSegmentId="0" postFractionAlong="0.5" weight="1." delay="0ms"/>
        </projection>
        <projection id="NC_AVBR_DB3_Generic_GJ" presynapticPopulation="AVBR" postsynapticPopulation="DB3" synapse="neuron_to_neuron_elec_syn">
            <connectionWD id="0" preCellId="../AVBR/0/generic_neuron_iaf_cell" preSegmentId="0" preFractionAlong="0.5" postCellId="../DB3/0/generic_neuron_iaf_cell" postSegmentId="0" postFractionAlong="0.5" weight="1." delay="0ms"/>
        </projection>
        <projection id="NC_AVBR_VB2_Generic_GJ" presynapticPopulation="AVBR" postsynapticPopulation="VB2" synapse="neuron_to_neuron_elec_syn">
            <connectionWD id="0" preCellId="../AVBR/0/generic_neuron_iaf_cell" preSegmentId="0" preFractionAlong="0.5" postCellId="../VB2/0/generic_neuron_iaf_cell" postSegmentId="0" postFractionAlong="0.5" weight="1." delay="0ms"/>
        </projection>
        <projection id="NC_AVBR_VB3_Generic_GJ" presynapticPopulation="AVBR" postsynapticPopulation="VB3" synapse="neuron_to_neuron_elec_syn">
            <connectionWD id="0" preCellId="../AVBR/0/generic_neuron_iaf_cell" preSegmentId="0" preFractionAlong="0.5" postCellId="../VB3/0/generic_neuron_iaf_cell" postSegmentId="0" postFractionAlong="0.5" weight="1." delay="0ms"/>
        </projection>
        <projection id="NC_AVBR_VD3_Glutamate" presynapticPopulation="AVBR" postsynapticPopulation="VD3" synapse="neuron_to_neuron_exc_syn">
            <connectionWD id="0" preCellId="../AVBR/0/generic_neuron_iaf_cell" preSegmentId="0" preFractionAlong="0.5" postCellId="../VD3/0/generic_neuron_iaf_cell" postSegmentId="0" postFractionAlong="0.5" weight="1." delay="0ms"/>
        </projection>
        <projection id="NC_DA2_VD2_Acetylcholine" presynapticPopulation="DA2" postsynapticPopulation="VD2" synapse="neuron_to_neuron_exc_syn">
            <connectionWD id="0" preCellId="../DA2/0/generic_neuron_iaf_cell" preSegmentId="0" preFractionAlong="0.5" postCellId="../VD2/0/generic_neuron_iaf_cell" postSegmentId="0" postFractionAlong="0.5" weight="11." delay="0ms"/>
        </projection>
        <projection id="NC_DA2_VD3_Acetylcholine" presynapticPopulation="DA2" postsynapticPopulation="VD3" synapse="neuron_to_neuron_exc_syn">
            <connectionWD id="0" preCellId="../DA2/0/generic_neuron_iaf_cell" preSegmentId="0" preFractionAlong="0.5" postCellId="../VD3/0/generic_neuron_iaf_cell" postSegmentId="0" postFractionAlong="0.5" weight="5." delay="0ms"/>
        </projection>
        <projection id="NC_DA3_DB3_Acetylcholine" presynapticPopulation="DA3" postsynapticPopulation="DB3" synapse="neuron_to_neuron_exc_syn">
            <connectionWD id="0" preCellId="../DA3/0/generic_neuron_iaf_cell" preSegmentId="0" preFractionAlong="0.5" postCellId="../DB3/0/generic_neuron_iaf_cell" postSegmentId="0" postFractionAlong="0.5" weight="1." delay="0ms"/>
        </projection>
        <projection id="NC_DA3_DD2_Acetylcholine" presynapticPopulation="DA3" postsynapticPopulation="DD2" synapse="neuron_to_neuron_exc_syn">
            <connectionWD id="0" preCellId="../DA3/0/generic_neuron_iaf_cell" preSegmentId="0" preFractionAlong="0.5" postCellId="../DD2/0/generic_neuron_iaf_cell" postSegmentId="0" postFractionAlong="0.5" weight="1." delay="0ms"/>
        </projection>
        <projection id="NC_DA3_VD3_Acetylcholine" presynapticPopulation="DA3" postsynapticPopulation="VD3" synapse="neuron_to_neuron_exc_syn">
            <connectionWD id="0" preCellId="../DA3/0/generic_neuron_iaf_cell" preSegmentId="0" preFractionAlong="0.5" postCellId="../VD3/0/generic_neuron_iaf_cell" postSegmentId="0" postFractionAlong="0.5" weight="25." delay="0ms"/>
        </projection>
        <projection id="NC_DB2_AVBR_Generic_GJ" presynapticPopulation="DB2" postsynapticPopulation="AVBR" synapse="neuron_to_neuron_elec_syn">
            <connectionWD id="0" preCellId="../DB2/0/generic_neuron_iaf_cell" preSegmentId="0" preFractionAlong="0.5" postCellId="../AVBR/0/generic_neuron_iaf_cell" postSegmentId="0" postFractionAlong="0.5" weight="1." delay="0ms"/>
        </projection>
        <projection id="NC_DB2_DA3_Acetylcholine" presynapticPopulation="DB2" postsynapticPopulation="DA3" synapse="neuron_to_neuron_exc_syn">
            <connectionWD id="0" preCellId="../DB2/0/generic_neuron_iaf_cell" preSegmentId="0" preFractionAlong="0.5" postCellId="../DA3/0/generic_neuron_iaf_cell" postSegmentId="0" postFractionAlong="0.5" weight="5." delay="0ms"/>
        </projection>
        <projection id="NC_DB2_DB3_Generic_GJ" presynapticPopulation="DB2" postsynapticPopulation="DB3" synapse="neuron_to_neuron_elec_syn">
            <connectionWD id="0" preCellId="../DB2/0/generic_neuron_iaf_cell" preSegmentId="0" preFractionAlong="0.5" postCellId="../DB3/0/generic_neuron_iaf_cell" postSegmentId="0" postFractionAlong="0.5" weight="6." delay="0ms"/>
        </projection>
        <projection id="NC_DB2_DD2_Acetylcholine" presynapticPopulation="DB2" postsynapticPopulation="DD2" synapse="neuron_to_neuron_exc_syn">
            <connectionWD id="0" preCellId="../DB2/0/generic_neuron_iaf_cell" preSegmentId="0" preFractionAlong="0.5" postCellId="../DD2/0/generic_neuron_iaf_cell" postSegmentId="0" postFractionAlong="0.5" weight="2." delay="0ms"/>
        </projection>
        <projection id="NC_DB2_VD3_Acetylcholine" presynapticPopulation="DB2" postsynapticPopulation="VD3" synapse="neuron_to_neuron_exc_syn">
            <connectionWD id="0" preCellId="../DB2/0/generic_neuron_iaf_cell" preSegmentId="0" preFractionAlong="0.5" postCellId="../VD3/0/generic_neuron_iaf_cell" postSegmentId="0" postFractionAlong="0.5" weight="23." delay="0ms"/>
        </projection>
        <projection id="NC_DB3_AVBL_Generic_GJ" presynapticPopulation="DB3" postsynapticPopulation="AVBL" synapse="neuron_to_neuron_elec_syn">
            <connectionWD id="0" preCellId="../DB3/0/generic_neuron_iaf_cell" preSegmentId="0" preFractionAlong="0.5" postCellId="../AVBL/0/generic_neuron_iaf_cell" postSegmentId="0" postFractionAlong="0.5" weight="1." delay="0ms"/>
        </projection>
        <projection id="NC_DB3_AVBR_Generic_GJ" presynapticPopulation="DB3" postsynapticPopulation="AVBR" synapse="neuron_to_neuron_elec_syn">
            <connectionWD id="0" preCellId="../DB3/0/generic_neuron_iaf_cell" preSegmentId="0" preFractionAlong="0.5" postCellId="../AVBR/0/generic_neuron_iaf_cell" postSegmentId="0" postFractionAlong="0.5" weight="1." delay="0ms"/>
        </projection>
        <projection id="NC_DB3_DB2_Generic_GJ" presynapticPopulation="DB3" postsynapticPopulation="DB2" synapse="neuron_to_neuron_elec_syn">
            <connectionWD id="0" preCellId="../DB3/0/generic_neuron_iaf_cell" preSegmentId="0" preFractionAlong="0.5" postCellId="../DB2/0/generic_neuron_iaf_cell" postSegmentId="0" postFractionAlong="0.5" weight="6." delay="0ms"/>
        </projection>
        <projection id="NC_DB3_DD2_Acetylcholine" presynapticPopulation="DB3" postsynapticPopulation="DD2" synapse="neuron_to_neuron_exc_syn">
            <connectionWD id="0" preCellId="../DB3/0/generic_neuron_iaf_cell" preSegmentId="0" preFractionAlong="0.5" postCellId="../DD2/0/generic_neuron_iaf_cell" postSegmentId="0" postFractionAlong="0.5" weight="4." delay="0ms"/>
        </projection>
        <projection id="NC_DB3_DD3_Acetylcholine" presynapticPopulation="DB3" postsynapticPopulation="DD3" synapse="neuron_to_neuron_exc_syn">
            <connectionWD id="0" preCellId="../DB3/0/generic_neuron_iaf_cell" preSegmentId="0" preFractionAlong="0.5" postCellId="../DD3/0/generic_neuron_iaf_cell" postSegmentId="0" postFractionAlong="0.5" weight="10." delay="0ms"/>
        </projection>
        <projection id="NC_DD2_DA3_GABA" presynapticPopulation="DD2" postsynapticPopulation="DA3" synapse="neuron_to_neuron_inh_syn">
            <connectionWD id="0" preCellId="../DD2/0/generic_neuron_iaf_cell" preSegmentId="0" preFractionAlong="0.5" postCellId="../DA3/0/generic_neuron_iaf_cell" postSegmentId="0" postFractionAlong="0.5" weight="1." delay="0ms"/>
        </projection>
        <projection id="NC_DD2_DD3_Generic_GJ" presynapticPopulation="DD2" postsynapticPopulation="DD3" synapse="neuron_to_neuron_elec_syn">
            <connectionWD id="0" preCellId="../DD2/0/generic_neuron_iaf_cell" preSegmentId="0" preFractionAlong="0.5" postCellId="../DD3/0/generic_neuron_iaf_cell" postSegmentId="0" postFractionAlong="0.5" weight="2." delay="0ms"/>
        </projection>
        <projection id="NC_DD2_VD3_GABA" presynapticPopulation="DD2" postsynapticPopulation="VD3" synapse="neuron_to_neuron_inh_syn">
            <connectionWD id="0" preCellId="../DD2/0/generic_neuron_iaf_cell" preSegmentId="0" preFractionAlong="0.5" postCellId="../VD3/0/generic_neuron_iaf_cell" postSegmentId="0" postFractionAlong="0.5" weight="1." delay="0ms"/>
        </projection>
        <projection id="NC_DD3_DD2_Generic_GJ" presynapticPopulation="DD3" postsynapticPopulation="DD2" synapse="neuron_to_neuron_elec_syn">
            <connectionWD id="0" preCellId="../DD3/0/generic_neuron_iaf_cell" preSegmentId="0" preFractionAlong="0.5" postCellId="../DD2/0/generic_neuron_iaf_cell" postSegmentId="0" postFractionAlong="0.5" weight="2." delay="0ms"/>
        </projection>
        <projection id="NC_VD2_VA2_Generic_GJ" presynapticPopulation="VD2" postsynapticPopulation="VA2" synapse="neuron_to_neuron_elec_syn">
            <connectionWD id="0" preCellId="../VD2/0/generic_neuron_iaf_cell" preSegmentId="0" preFractionAlong="0.5" postCellId="../VA2/0/generic_neuron_iaf_cell" postSegmentId="0" postFractionAlong="0.5" weight="3." delay="0ms"/>
        </projection>
        <projection id="NC_VD2_VA2_GABA" presynapticPopulation="VD2" postsynapticPopulation="VA2" synapse="neuron_to_neuron_inh_syn">
            <connectionWD id="0" preCellId="../VD2/0/generic_neuron_iaf_cell" preSegmentId="0" preFractionAlong="0.5" postCellId="../VA2/0/generic_neuron_iaf_cell" postSegmentId="0" postFractionAlong="0.5" weight="6." delay="0ms"/>
        </projection>
        <projection id="NC_VD2_VB2_GABA" presynapticPopulation="VD2" postsynapticPopulation="VB2" synapse="neuron_to_neuron_inh_syn">
            <connectionWD id="0" preCellId="../VD2/0/generic_neuron_iaf_cell" preSegmentId="0" preFractionAlong="0.5" postCellId="../VB2/0/generic_neuron_iaf_cell" postSegmentId="0" postFractionAlong="0.5" weight="3." delay="0ms"/>
        </projection>
        <projection id="NC_VD2_VD3_Generic_GJ" presynapticPopulation="VD2" postsynapticPopulation="VD3" synapse="neuron_to_neuron_elec_syn">
            <connectionWD id="0" preCellId="../VD2/0/generic_neuron_iaf_cell" preSegmentId="0" preFractionAlong="0.5" postCellId="../VD3/0/generic_neuron_iaf_cell" postSegmentId="0" postFractionAlong="0.5" weight="2." delay="0ms"/>
        </projection>
        <projection id="NC_VD3_VA3_GABA" presynapticPopulation="VD3" postsynapticPopulation="VA3" synapse="neuron_to_neuron_inh_syn">
            <connectionWD id="0" preCellId="../VD3/0/generic_neuron_iaf_cell" preSegmentId="0" preFractionAlong="0.5" postCellId="../VA3/0/generic_neuron_iaf_cell" postSegmentId="0" postFractionAlong="0.5" weight="2." delay="0ms"/>
        </projection>
        <projection id="NC_VD3_VB2_GABA" presynapticPopulation="VD3" postsynapticPopulation="VB2" synapse="neuron_to_neuron_inh_syn">
            <connectionWD id="0" preCellId="../VD3/0/generic_neuron_iaf_cell" preSegmentId="0" preFractionAlong="0.5" postCellId="../VB2/0/generic_neuron_iaf_cell" postSegmentId="0" postFractionAlong="0.5" weight="2." delay="0ms"/>
        </projection>
        <projection id="NC_VD3_VD2_Generic_GJ" presynapticPopulation="VD3" postsynapticPopulation="VD2" synapse="neuron_to_neuron_elec_syn">
            <connectionWD id="0" preCellId="../VD3/0/generic_neuron_iaf_cell" preSegmentId="0" preFractionAlong="0.5" postCellId="../VD2/0/generic_neuron_iaf_cell" postSegmentId="0" postFractionAlong="0.5" weight="2." delay="0ms"/>
        </projection>
        <projection id="NC_VA2_VA3_Acetylcholine" presynapticPopulation="VA2" postsynapticPopulation="VA3" synapse="neuron_to_neuron_exc_syn">
            <connectionWD id="0" preCellId="../VA2/0/generic_neuron_iaf_cell" preSegmentId="0" preFractionAlong="0.5" postCellId="../VA3/0/generic_neuron_iaf_cell" postSegmentId="0" postFractionAlong="0.5" weight="2." delay="0ms"/>
        </projection>
        <projection id="NC_VA2_VD2_Generic_GJ" presynapticPopulation="VA2" postsynapticPopulation="VD2" synapse="neuron_to_neuron_elec_syn">
            <connectionWD id="0" preCellId="../VA2/0/generic_neuron_iaf_cell" preSegmentId="0" preFractionAlong="0.5" postCellId="../VD2/0/generic_neuron_iaf_cell" postSegmentId="0" postFractionAlong="0.5" weight="3." delay="0ms"/>
        </projection>
        <projection id="NC_VA2_VD2_Acetylcholine" presynapticPopulation="VA2" postsynapticPopulation="VD2" synapse="neuron_to_neuron_exc_syn">
            <connectionWD id="0" preCellId="../VA2/0/generic_neuron_iaf_cell" preSegmentId="0" preFractionAlong="0.5" postCellId="../VD2/0/generic_neuron_iaf_cell" postSegmentId="0" postFractionAlong="0.5" weight="8." delay="0ms"/>
        </projection>
        <projection id="NC_VA3_DD2_Acetylcholine" presynapticPopulation="VA3" postsynapticPopulation="DD2" synapse="neuron_to_neuron_exc_syn">
            <connectionWD id="0" preCellId="../VA3/0/generic_neuron_iaf_cell" preSegmentId="0" preFractionAlong="0.5" postCellId="../DD2/0/generic_neuron_iaf_cell" postSegmentId="0" postFractionAlong="0.5" weight="11." delay="0ms"/>
        </projection>
        <projection id="NC_VA3_VD2_Acetylcholine" presynapticPopulation="VA3" postsynapticPopulation="VD2" synapse="neuron_to_neuron_exc_syn">
            <connectionWD id="0" preCellId="../VA3/0/generic_neuron_iaf_cell" preSegmentId="0" preFractionAlong="0.5" postCellId="../VD2/0/generic_neuron_iaf_cell" postSegmentId="0" postFractionAlong="0.5" weight="3." delay="0ms"/>
        </projection>
        <projection id="NC_VA3_VD3_Acetylcholine" presynapticPopulation="VA3" postsynapticPopulation="VD3" synapse="neuron_to_neuron_exc_syn">
            <connectionWD id="0" preCellId="../VA3/0/generic_neuron_iaf_cell" preSegmentId="0" preFractionAlong="0.5" postCellId="../VD3/0/generic_neuron_iaf_cell" postSegmentId="0" postFractionAlong="0.5" weight="3." delay="0ms"/>
        </projection>
        <projection id="NC_VB2_AVBL_Generic_GJ" presynapticPopulation="VB2" postsynapticPopulation="AVBL" synapse="neuron_to_neuron_elec_syn">
            <connectionWD id="0" preCellId="../VB2/0/generic_neuron_iaf_cell" preSegmentId="0" preFractionAlong="0.5" postCellId="../AVBL/0/generic_neuron_iaf_cell" postSegmentId="0" postFractionAlong="0.5" weight="3." delay="0ms"/>
        </projection>
        <projection id="NC_VB2_AVBR_Generic_GJ" presynapticPopulation="VB2" postsynapticPopulation="AVBR" synapse="neuron_to_neuron_elec_syn">
            <connectionWD id="0" preCellId="../VB2/0/generic_neuron_iaf_cell" preSegmentId="0" preFractionAlong="0.5" postCellId="../AVBR/0/generic_neuron_iaf_cell" postSegmentId="0" postFractionAlong="0.5" weight="1." delay="0ms"/>
        </projection>
        <projection id="NC_VB2_DD2_Acetylcholine" presynapticPopulation="VB2" postsynapticPopulation="DD2" synapse="neuron_to_neuron_exc_syn">
            <connectionWD id="0" preCellId="../VB2/0/generic_neuron_iaf_cell" preSegmentId="0" preFractionAlong="0.5" postCellId="../DD2/0/generic_neuron_iaf_cell" postSegmentId="0" postFractionAlong="0.5" weight="1." delay="0ms"/>
        </projection>
        <projection id="NC_VB2_VA2_Acetylcholine" presynapticPopulation="VB2" postsynapticPopulation="VA2" synapse="neuron_to_neuron_exc_syn">
            <connectionWD id="0" preCellId="../VB2/0/generic_neuron_iaf_cell" preSegmentId="0" preFractionAlong="0.5" postCellId="../VA2/0/generic_neuron_iaf_cell" postSegmentId="0" postFractionAlong="0.5" weight="1." delay="0ms"/>
        </projection>
        <projection id="NC_VB2_VB3_Generic_GJ" presynapticPopulation="VB2" postsynapticPopulation="VB3" synapse="neuron_to_neuron_elec_syn">
            <connectionWD id="0" preCellId="../VB2/0/generic_neuron_iaf_cell" preSegmentId="0" preFractionAlong="0.5" postCellId="../VB3/0/generic_neuron_iaf_cell" postSegmentId="0" postFractionAlong="0.5" weight="1." delay="0ms"/>
        </projection>
        <projection id="NC_VB2_VD2_Acetylcholine" presynapticPopulation="VB2" postsynapticPopulation="VD2" synapse="neuron_to_neuron_exc_syn">
            <connectionWD id="0" preCellId="../VB2/0/generic_neuron_iaf_cell" preSegmentId="0" preFractionAlong="0.5" postCellId="../VD2/0/generic_neuron_iaf_cell" postSegmentId="0" postFractionAlong="0.5" weight="9." delay="0ms"/>
        </projection>
        <projection id="NC_VB2_VD3_Acetylcholine" presynapticPopulation="VB2" postsynapticPopulation="VD3" synapse="neuron_to_neuron_exc_syn">
            <connectionWD id="0" preCellId="../VB2/0/generic_neuron_iaf_cell" preSegmentId="0" preFractionAlong="0.5" postCellId="../VD3/0/generic_neuron_iaf_cell" postSegmentId="0" postFractionAlong="0.5" weight="3." delay="0ms"/>
        </projection>
        <projection id="NC_VB3_AVBR_Generic_GJ" presynapticPopulation="VB3" postsynapticPopulation="AVBR" synapse="neuron_to_neuron_elec_syn">
            <connectionWD id="0" preCellId="../VB3/0/generic_neuron_iaf_cell" preSegmentId="0" preFractionAlong="0.5" postCellId="../AVBR/0/generic_neuron_iaf_cell" postSegmentId="0" postFractionAlong="0.5" weight="1." delay="0ms"/>
        </projection>
        <projection id="NC_VB3_DD2_Acetylcholine" presynapticPopulation="VB3" postsynapticPopulation="DD2" synapse="neuron_to_neuron_exc_syn">
            <connectionWD id="0" preCellId="../VB3/0/generic_neuron_iaf_cell" preSegmentId="0" preFractionAlong="0.5" postCellId="../DD2/0/generic_neuron_iaf_cell" postSegmentId="0" postFractionAlong="0.5" weight="37." delay="0ms"/>
        </projection>
        <projection id="NC_VB3_VB2_Generic_GJ" presynapticPopulation="VB3" postsynapticPopulation="VB2" synapse="neuron_to_neuron_elec_syn">
            <connectionWD id="0" preCellId="../VB3/0/generic_neuron_iaf_cell" preSegmentId="0" preFractionAlong="0.5" postCellId="../VB2/0/generic_neuron_iaf_cell" postSegmentId="0" postFractionAlong="0.5" weight="1." delay="0ms"/>
        </projection>
        <inputList id="Input_AVBL_offset_current" population="AVBL" component="offset_current">
            <input id="0" target="../AVBL/0/generic_neuron_iaf_cell" destination="synapses"/>
        </inputList>
        <inputList id="Input_AVBR_offset_current" population="AVBR" component="offset_current">
            <input id="0" target="../AVBR/0/generic_neuron_iaf_cell" destination="synapses"/>
        </inputList>
    </network>
</neuroml>
