<neuroml xmlns="http://www.neuroml.org/schema/neuroml2"  xmlns:xs="http://www.w3.org/2001/XMLSchema" xmlns:xsi="http://www.w3.org/2001/XMLSchema-instance" xsi:schemaLocation="http://www.neuroml.org/schema/neuroml2 https://raw.github.com/NeuroML/NeuroML2/development/Schemas/NeuroML2/NeuroML_v2.2.xsd" id="c302_C0_IClamp">
    <notes>

Parameters and setting used to generate this network:

    Data reader:                    SpreadsheetDataReader
    c302 version:                   0.7.8
    owmeta version:                 0.12.3.dev0
    owmeta_core version:            0.12.2
    Cells:                          ['ADAL', 'PVCL']
    Cell stimulated:                []
    Connection:                     []
    Connection numbers overridden:  None
    Connection numbers scaled:      None
    Connection polarities override: None
    Muscles:                        ['MDR01']

    Known BioParameters:
        BioParameter: ca_conc_decay_time = 20 ms (SRC: BlindGuess, certainty 0.1)
        BioParameter: ca_conc_rho = 0.0002 mol_per_m_per_A_per_s (SRC: BlindGuess, certainty 0.1)
        BioParameter: ca_simple_erev = 50 mV (SRC: BlindGuess, certainty 0.1)
        BioParameter: cell_diameter = 5 (SRC: BlindGuess, certainty 0.1)
        BioParameter: exc_syn_ad = 20 per_s (SRC: BlindGuess, certainty 0.1)
        BioParameter: exc_syn_ar = .5 per_s (SRC: BlindGuess, certainty 0.1)
        BioParameter: exc_syn_beta = 0.25 per_mV (SRC: BlindGuess, certainty 0.1)
        BioParameter: exc_syn_erev = 0 mV (SRC: BlindGuess, certainty 0.1)
        BioParameter: exc_syn_vth = -20 mV (SRC: BlindGuess, certainty 0.1)
        BioParameter: global_connectivity_power_scaling = 0 (SRC: BlindGuess, certainty 0.1)
        BioParameter: inh_syn_ad = 10 per_s (SRC: BlindGuess, certainty 0.1)
        BioParameter: inh_syn_ar = .005 per_s (SRC: BlindGuess, certainty 0.1)
        BioParameter: inh_syn_beta = 0.5 per_mV (SRC: BlindGuess, certainty 0.1)
        BioParameter: inh_syn_erev = -80 mV (SRC: BlindGuess, certainty 0.1)
        BioParameter: inh_syn_vth = -25 mV (SRC: BlindGuess, certainty 0.1)
        BioParameter: initial_memb_pot = -50 mV (SRC: BlindGuess, certainty 0.1)
        BioParameter: k_slow_erev = -80 mV (SRC: BlindGuess, certainty 0.1)
        BioParameter: leak_erev = -44 mV (SRC: BlindGuess, certainty 0.1)
        BioParameter: muscle_ca_simple_cond_density = 0.25 mS_per_cm2 (SRC: BlindGuess, certainty 0.1)
        BioParameter: muscle_k_slow_cond_density = 0.3 mS_per_cm2 (SRC: BlindGuess, certainty 0.1)
        BioParameter: muscle_leak_cond_density = 0.00105 mS_per_cm2 (SRC: BlindGuess, certainty 0.1)
        BioParameter: muscle_length = 20 (SRC: BlindGuess, certainty 0.1)
        BioParameter: muscle_specific_capacitance = .6860 uF_per_cm2 (SRC: BlindGuess, certainty 0.1)
        BioParameter: muscle_spike_thresh = -20 mV (SRC: BlindGuess, certainty 0.1)
        BioParameter: neuron_ca_simple_cond_density = 0.06 mS_per_cm2 (SRC: BlindGuess, certainty 0.1)
        BioParameter: neuron_k_slow_cond_density = 0.1 mS_per_cm2 (SRC: BlindGuess, certainty 0.1)
        BioParameter: neuron_leak_cond_density = 0.05 mS_per_cm2 (SRC: BlindGuess, certainty 0.1)
        BioParameter: neuron_specific_capacitance = 5 uF_per_cm2 (SRC: BlindGuess, certainty 0.1)
        BioParameter: neuron_spike_thresh = -20 mV (SRC: BlindGuess, certainty 0.1)
        BioParameter: neuron_to_muscle_elec_syn_gbase = 0.0001 nS (SRC: BlindGuess, certainty 0.1)
        BioParameter: neuron_to_muscle_exc_syn_conductance = 22.3 nS (SRC: BlindGuess, certainty 0.1)
        BioParameter: neuron_to_muscle_inh_syn_conductance = 0.25 nS (SRC: BlindGuess, certainty 0.1)
        BioParameter: neuron_to_neuron_elec_syn_gbase = 0.05 nS (SRC: BlindGuess, certainty 0.1)
        BioParameter: neuron_to_neuron_exc_syn_conductance = 5 nS (SRC: BlindGuess, certainty 0.1)
        BioParameter: neuron_to_neuron_inh_syn_conductance = 260 nS (SRC: BlindGuess, certainty 0.1)
        BioParameter: unphysiological_offset_current = 0 pA (SRC: KnownError, certainty 0)
        BioParameter: unphysiological_offset_current_del = 0 ms (SRC: KnownError, certainty 0)
        BioParameter: unphysiological_offset_current_dur = 2000 ms (SRC: KnownError, certainty 0)

</notes>
    <include href="cell_C.xml"/>
    <include href="custom_synapses.xml"/>
    <fixedFactorConcentrationModel id="CaPool" ion="ca" restingConc="0 mM" decayConstant="20 ms" rho="0.0002 mol_per_m_per_A_per_s"/>
    <cell id="GenericMuscleCell">
        <morphology id="morphology_GenericMuscleCell">
            <segment id="0" name="soma">
                <proximal x="0.000000e+00" y="0.000000e+00" z="0.000000e+00" diameter="5.0"/>
                <distal x="0.000000e+00" y="2.000000e+01" z="0.000000e+00" diameter="5.0"/>
            </segment>
        </morphology>
        <biophysicalProperties id="biophys_GenericMuscleCell">
            <membraneProperties>
                <channelDensity id="Leak_all" ionChannel="Leak" condDensity="0.00105 mS_per_cm2" erev="-44 mV" ion="non_specific"/>
                <channelDensity id="k_slow_all" ionChannel="k_slow" condDensity="0.3 mS_per_cm2" erev="-80 mV" ion="k"/>
                <channelDensity id="ca_simple_all" ionChannel="ca_simple" condDensity="0.25 mS_per_cm2" erev="50 mV" ion="ca"/>
                <spikeThresh value="-20 mV"/>
                <specificCapacitance value=".6860 uF_per_cm2"/>
                <initMembPotential value="-50 mV"/>
            </membraneProperties>
            <intracellularProperties>
                <species id="ca" concentrationModel="CaPool" ion="ca" initialConcentration="0 mM" initialExtConcentration="2E-6 mol_per_cm3"/>
                <resistivity value="0.1 kohm_cm"/>
            </intracellularProperties>
        </biophysicalProperties>
    </cell>
    <cell id="GenericNeuronCell">
        <morphology id="morphology_GenericNeuronCell">
            <segment id="0" name="soma">
                <proximal x="0.000000e+00" y="0.000000e+00" z="0.000000e+00" diameter="5.0"/>
                <distal x="0.000000e+00" y="0.000000e+00" z="0.000000e+00" diameter="5.0"/>
            </segment>
        </morphology>
        <biophysicalProperties id="biophys_GenericNeuronCell">
            <membraneProperties>
                <channelDensity id="Leak_all" ionChannel="Leak" condDensity="0.05 mS_per_cm2" erev="-44 mV" ion="non_specific"/>
                <channelDensity id="k_slow_all" ionChannel="k_slow" condDensity="0.1 mS_per_cm2" erev="-80 mV" ion="k"/>
                <channelDensity id="ca_simple_all" ionChannel="ca_simple" condDensity="0.06 mS_per_cm2" erev="50 mV" ion="ca"/>
                <spikeThresh value="-20 mV"/>
                <specificCapacitance value="5 uF_per_cm2"/>
                <initMembPotential value="-50 mV"/>
            </membraneProperties>
            <intracellularProperties>
                <species id="ca" concentrationModel="CaPool" ion="ca" initialConcentration="0 mM" initialExtConcentration="2E-6 mol_per_cm3"/>
                <resistivity value="0.1 kohm_cm"/>
            </intracellularProperties>
        </biophysicalProperties>
    </cell>
    <pulseGenerator id="offset_current" delay="0 ms" duration="2000 ms" amplitude="0 pA"/>
    <pulseGenerator id="stim_ADAL_1" delay="100ms" duration="800ms" amplitude="1pA"/>
    <pulseGenerator id="stim_PVCL_1" delay="100ms" duration="800ms" amplitude="1pA"/>
    <pulseGenerator id="stim_MDR01_1" delay="100ms" duration="800ms" amplitude="1pA"/>
    <pulseGenerator id="stim_ADAL_2" delay="1100ms" duration="800ms" amplitude="2pA"/>
    <pulseGenerator id="stim_PVCL_2" delay="1100ms" duration="800ms" amplitude="2pA"/>
    <pulseGenerator id="stim_MDR01_2" delay="1100ms" duration="800ms" amplitude="2pA"/>
    <pulseGenerator id="stim_ADAL_3" delay="2100ms" duration="800ms" amplitude="3pA"/>
    <pulseGenerator id="stim_PVCL_3" delay="2100ms" duration="800ms" amplitude="3pA"/>
    <pulseGenerator id="stim_MDR01_3" delay="2100ms" duration="800ms" amplitude="3pA"/>
    <pulseGenerator id="stim_ADAL_4" delay="3100ms" duration="800ms" amplitude="4pA"/>
    <pulseGenerator id="stim_PVCL_4" delay="3100ms" duration="800ms" amplitude="4pA"/>
    <pulseGenerator id="stim_MDR01_4" delay="3100ms" duration="800ms" amplitude="4pA"/>
    <pulseGenerator id="stim_ADAL_5" delay="4100ms" duration="800ms" amplitude="5pA"/>
    <pulseGenerator id="stim_PVCL_5" delay="4100ms" duration="800ms" amplitude="5pA"/>
    <pulseGenerator id="stim_MDR01_5" delay="4100ms" duration="800ms" amplitude="5pA"/>
    <pulseGenerator id="stim_ADAL_6" delay="5100ms" duration="800ms" amplitude="6pA"/>
    <pulseGenerator id="stim_PVCL_6" delay="5100ms" duration="800ms" amplitude="6pA"/>
    <pulseGenerator id="stim_MDR01_6" delay="5100ms" duration="800ms" amplitude="6pA"/>
    <network id="c302_C0_IClamp">
        <property tag="recommended_duration_ms" value="6000"/>
        <property tag="recommended_dt_ms" value="0.05"/>
        <population id="ADAL" component="GenericNeuronCell" size="1" type="populationList">
            <property tag="type" value="interneuron"/>
            <property tag="receptor" value=""/>
            <property tag="neurotransmitter" value="Glutamate"/>
            <property tag="OpenWormBackerAssignedName" value="Xabe"/>
            <instance id="0">
                <location x="8.65" y="-239.25" z="31.050000000000001"/>
            </instance>
        </population>
        <population id="PVCL" component="GenericNeuronCell" size="1" type="populationList">
            <property tag="type" value="interneuron"/>
            <property tag="receptor" value="PDFR-1; SER-2"/>
            <property tag="neurotransmitter" value="Acetylcholine"/>
            <property tag="OpenWormBackerAssignedName" value="Ramana Kumar"/>
            <instance id="0">
                <location x="0.85" y="404.150019999999984" z="5.5"/>
            </instance>
        </population>
        <population id="MDR01" component="GenericMuscleCell" size="1" type="populationList">
            <instance id="0">
                <location x="-80." y="-270." z="80."/>
            </instance>
        </population>
        <inputList id="Input_ADAL_stim_ADAL_1" population="ADAL" component="stim_ADAL_1">
            <input id="0" target="../ADAL/0/GenericNeuronCell" destination="synapses"/>
        </inputList>
        <inputList id="Input_PVCL_stim_PVCL_1" population="PVCL" component="stim_PVCL_1">
            <input id="0" target="../PVCL/0/GenericNeuronCell" destination="synapses"/>
        </inputList>
        <inputList id="Input_MDR01_stim_MDR01_1" population="MDR01" component="stim_MDR01_1">
            <input id="0" target="../MDR01/0/GenericMuscleCell" destination="synapses"/>
        </inputList>
        <inputList id="Input_ADAL_stim_ADAL_2" population="ADAL" component="stim_ADAL_2">
            <input id="0" target="../ADAL/0/GenericNeuronCell" destination="synapses"/>
        </inputList>
        <inputList id="Input_PVCL_stim_PVCL_2" population="PVCL" component="stim_PVCL_2">
            <input id="0" target="../PVCL/0/GenericNeuronCell" destination="synapses"/>
        </inputList>
        <inputList id="Input_MDR01_stim_MDR01_2" population="MDR01" component="stim_MDR01_2">
            <input id="0" target="../MDR01/0/GenericMuscleCell" destination="synapses"/>
        </inputList>
        <inputList id="Input_ADAL_stim_ADAL_3" population="ADAL" component="stim_ADAL_3">
            <input id="0" target="../ADAL/0/GenericNeuronCell" destination="synapses"/>
        </inputList>
        <inputList id="Input_PVCL_stim_PVCL_3" population="PVCL" component="stim_PVCL_3">
            <input id="0" target="../PVCL/0/GenericNeuronCell" destination="synapses"/>
        </inputList>
        <inputList id="Input_MDR01_stim_MDR01_3" population="MDR01" component="stim_MDR01_3">
            <input id="0" target="../MDR01/0/GenericMuscleCell" destination="synapses"/>
        </inputList>
        <inputList id="Input_ADAL_stim_ADAL_4" population="ADAL" component="stim_ADAL_4">
            <input id="0" target="../ADAL/0/GenericNeuronCell" destination="synapses"/>
        </inputList>
        <inputList id="Input_PVCL_stim_PVCL_4" population="PVCL" component="stim_PVCL_4">
            <input id="0" target="../PVCL/0/GenericNeuronCell" destination="synapses"/>
        </inputList>
        <inputList id="Input_MDR01_stim_MDR01_4" population="MDR01" component="stim_MDR01_4">
            <input id="0" target="../MDR01/0/GenericMuscleCell" destination="synapses"/>
        </inputList>
        <inputList id="Input_ADAL_stim_ADAL_5" population="ADAL" component="stim_ADAL_5">
            <input id="0" target="../ADAL/0/GenericNeuronCell" destination="synapses"/>
        </inputList>
        <inputList id="Input_PVCL_stim_PVCL_5" population="PVCL" component="stim_PVCL_5">
            <input id="0" target="../PVCL/0/GenericNeuronCell" destination="synapses"/>
        </inputList>
        <inputList id="Input_MDR01_stim_MDR01_5" population="MDR01" component="stim_MDR01_5">
            <input id="0" target="../MDR01/0/GenericMuscleCell" destination="synapses"/>
        </inputList>
        <inputList id="Input_ADAL_stim_ADAL_6" population="ADAL" component="stim_ADAL_6">
            <input id="0" target="../ADAL/0/GenericNeuronCell" destination="synapses"/>
        </inputList>
        <inputList id="Input_PVCL_stim_PVCL_6" population="PVCL" component="stim_PVCL_6">
            <input id="0" target="../PVCL/0/GenericNeuronCell" destination="synapses"/>
        </inputList>
        <inputList id="Input_MDR01_stim_MDR01_6" population="MDR01" component="stim_MDR01_6">
            <input id="0" target="../MDR01/0/GenericMuscleCell" destination="synapses"/>
        </inputList>
    </network>
</neuroml>
