<neuroml xmlns="http://www.neuroml.org/schema/neuroml2"  xmlns:xs="http://www.w3.org/2001/XMLSchema" xmlns:xsi="http://www.w3.org/2001/XMLSchema-instance" xsi:schemaLocation="http://www.neuroml.org/schema/neuroml2 https://raw.github.com/NeuroML/NeuroML2/development/Schemas/NeuroML2/NeuroML_v2beta5.xsd" id="ADER">
    <cell id="ADER">
        <notes>Cell model created by c302 with custom electrical parameters</notes>
        <morphology id="morphology_ADER">
            <segment id="0" name="Seg0_soma_0">
                <proximal x="-1.530000e+01" y="-2.423750e+02" z="3.245000e+01" diameter="2.823119"/>
                <distal x="-1.530000e+01" y="-2.423750e+02" z="3.245000e+01" diameter="2.823119"/>
            </segment>
            <segment id="1" name="Seg0_axon_0">
                <parent segment="0"/>
                <proximal x="-1.530000e+01" y="-2.423750e+02" z="3.245000e+01" diameter="0.6"/>
                <distal x="-1.530000e+01" y="-2.433000e+02" z="3.280000e+01" diameter="0.6"/>
            </segment>
            <segment id="2" name="Seg2_axon_0">
                <parent segment="1"/>
                <distal x="-1.535000e+01" y="-2.455500e+02" z="3.375000e+01" diameter="0.4358899"/>
            </segment>
            <segment id="3" name="Seg3_axon_0">
                <parent segment="2"/>
                <distal x="-1.500000e+01" y="-2.508500e+02" z="3.625000e+01" diameter="0.50990194"/>
            </segment>
            <segment id="4" name="Seg4_axon_0">
                <parent segment="3"/>
                <distal x="-1.215000e+01" y="-2.545500e+02" z="3.765000e+01" diameter="0.4358899"/>
            </segment>
            <segment id="5" name="Seg5_axon_0">
                <parent segment="4"/>
                <distal x="-8.250000e+00" y="-2.592250e+02" z="3.935000e+01" diameter="0.45"/>
            </segment>
            <segment id="6" name="Seg6_axon_0">
                <parent segment="5"/>
                <distal x="-8.150001e+00" y="-2.631500e+02" z="4.075000e+01" diameter="0.4358899"/>
            </segment>
            <segment id="21" name="Seg0_dendrit_2">
                <parent segment="0"/>
                <proximal x="-1.530000e+01" y="-2.423750e+02" z="3.245000e+01" diameter="0.5744563"/>
                <distal x="-1.530000e+01" y="-2.414500e+02" z="3.210000e+01" diameter="0.5744563"/>
            </segment>
            <segment id="22" name="Seg22_dendrite_0">
                <parent segment="21"/>
                <distal x="-1.535000e+01" y="-2.411000e+02" z="3.190000e+01" diameter="0.41231057"/>
            </segment>
            <segment id="23" name="Seg23_dendrite_0">
                <parent segment="22"/>
                <distal x="-1.535000e+01" y="-2.404000e+02" z="2.980000e+01" diameter="0.5"/>
            </segment>
            <segment id="24" name="Seg24_dendrite_0">
                <parent segment="23"/>
                <distal x="-1.247500e+01" y="-2.403500e+02" z="2.540000e+01" diameter="0.39051247"/>
            </segment>
            <segment id="25" name="Seg25_dendrite_0">
                <parent segment="24"/>
                <distal x="-7.625000e+00" y="-2.410500e+02" z="1.835000e+01" diameter="0.4924429"/>
            </segment>
            <segment id="26" name="Seg26_dendrite_0">
                <parent segment="25"/>
                <distal x="-3.475000e+00" y="-2.423000e+02" z="1.530000e+01" diameter="0.45"/>
            </segment>
            <segment id="27" name="Seg27_dendrite_0">
                <parent segment="26"/>
                <distal x="-2.950000e+00" y="-2.429500e+02" z="1.530000e+01" diameter="0.50990194"/>
            </segment>
            <segment id="28" name="Seg28_dendrite_0">
                <parent segment="27"/>
                <distal x="-2.850000e+00" y="-2.439500e+02" z="1.477500e+01" diameter="0.55"/>
            </segment>
            <segment id="29" name="Seg29_dendrite_0">
                <parent segment="28"/>
                <distal x="-2.850000e+00" y="-2.479000e+02" z="1.735000e+01" diameter="0.42426404"/>
            </segment>
            <segment id="30" name="Seg30_dendrite_0">
                <parent segment="29"/>
                <distal x="-2.350000e+00" y="-2.668000e+02" z="2.515000e+01" diameter="0.46904156"/>
            </segment>
            <segment id="31" name="Seg31_dendrite_0">
                <parent segment="30"/>
                <distal x="-2.350000e+00" y="-2.699000e+02" z="2.910000e+01" diameter="0.41231057"/>
            </segment>
            <segment id="32" name="Seg32_dendrite_0">
                <parent segment="31"/>
                <distal x="-2.350000e+00" y="-2.708000e+02" z="3.005000e+01" diameter="0.46904156"/>
            </segment>
            <segment id="7" name="Seg7_neurite_0">
                <parent segment="6"/>
                <proximal x="-8.150001e+00" y="-2.631500e+02" z="4.075000e+01" diameter="0.4358899"/>
                <distal x="-8.150001e+00" y="-2.632750e+02" z="4.100000e+01" diameter="0.5024938"/>
            </segment>
            <segment id="8" name="Seg8_neurite_0">
                <parent segment="7"/>
                <distal x="-8.200000e+00" y="-2.632000e+02" z="4.112500e+01" diameter="0.3774917"/>
            </segment>
            <segment id="9" name="Seg9_neurite_0">
                <parent segment="8"/>
                <distal x="-8.200000e+00" y="-2.616250e+02" z="4.100000e+01" diameter="0.32015622"/>
            </segment>
            <segment id="10" name="Seg10_neurite_0">
                <parent segment="9"/>
                <distal x="-8.250000e+00" y="-2.593500e+02" z="4.037500e+01" diameter="0.20615529"/>
            </segment>
            <segment id="11" name="Seg11_neurite_0">
                <parent segment="10"/>
                <distal x="-1.075000e+01" y="-2.567500e+02" z="3.940000e+01" diameter="0.24494897"/>
            </segment>
            <segment id="12" name="Seg12_neurite_0">
                <parent segment="11"/>
                <distal x="-1.525000e+01" y="-2.524000e+02" z="3.790000e+01" diameter="0.3"/>
            </segment>
            <segment id="13" name="Seg13_neurite_0">
                <parent segment="12"/>
                <distal x="-1.942500e+01" y="-2.503000e+02" z="3.720000e+01" diameter="0.28722814"/>
            </segment>
            <segment id="14" name="Seg14_neurite_0">
                <parent segment="13"/>
                <distal x="-2.030000e+01" y="-2.501500e+02" z="3.720000e+01" diameter="0.2236068"/>
            </segment>
            <segment id="15" name="Seg15_neurite_0">
                <parent segment="14"/>
                <distal x="-2.107500e+01" y="-2.501000e+02" z="3.710000e+01" diameter="0.32015622"/>
            </segment>
            <segment id="16" name="Seg16_neurite_0">
                <parent segment="6"/>
                <proximal x="-8.150001e+00" y="-2.631500e+02" z="4.075000e+01" diameter="0.4358899"/>
                <distal x="-8.150001e+00" y="-2.635250e+02" z="4.095000e+01" diameter="0.42720017"/>
            </segment>
            <segment id="17" name="Seg17_neurite_0">
                <parent segment="16"/>
                <distal x="-8.150001e+00" y="-2.659250e+02" z="4.215000e+01" diameter="0.4924429"/>
            </segment>
            <segment id="18" name="Seg18_neurite_0">
                <parent segment="17"/>
                <distal x="-8.150001e+00" y="-2.761000e+02" z="4.865000e+01" diameter="0.42426404"/>
            </segment>
            <segment id="19" name="Seg19_neurite_0">
                <parent segment="18"/>
                <distal x="-8.150001e+00" y="-2.780250e+02" z="4.900000e+01" diameter="0.5024938"/>
            </segment>
            <segment id="20" name="Seg20_neurite_0">
                <parent segment="19"/>
                <distal x="-8.150001e+00" y="-2.799250e+02" z="4.825000e+01" diameter="0.42720017"/>
            </segment>
            <segmentGroup neuroLexId="sao864921383" id="Soma">
                <member segment="0"/>
            </segmentGroup>
            <segmentGroup neuroLexId="sao864921383" id="Axon">
                <member segment="1"/>
                <member segment="2"/>
                <member segment="3"/>
                <member segment="4"/>
                <member segment="5"/>
                <member segment="6"/>
            </segmentGroup>
            <segmentGroup neuroLexId="sao864921383" id="Dendrite2">
                <member segment="21"/>
                <member segment="22"/>
                <member segment="23"/>
                <member segment="24"/>
                <member segment="25"/>
                <member segment="26"/>
                <member segment="27"/>
                <member segment="28"/>
                <member segment="29"/>
                <member segment="30"/>
                <member segment="31"/>
                <member segment="32"/>
            </segmentGroup>
            <segmentGroup neuroLexId="sao864921383" id="Neurite3">
                <member segment="7"/>
                <member segment="8"/>
                <member segment="9"/>
                <member segment="10"/>
                <member segment="11"/>
                <member segment="12"/>
                <member segment="13"/>
                <member segment="14"/>
                <member segment="15"/>
            </segmentGroup>
            <segmentGroup neuroLexId="sao864921383" id="Neurite4">
                <member segment="16"/>
                <member segment="17"/>
                <member segment="18"/>
                <member segment="19"/>
                <member segment="20"/>
            </segmentGroup>
            <segmentGroup id="all">
                <include segmentGroup="Soma"/>
                <include segmentGroup="Axon"/>
                <include segmentGroup="Dendrite2"/>
                <include segmentGroup="Neurite3"/>
                <include segmentGroup="Neurite4"/>
            </segmentGroup>
            <segmentGroup neuroLexId="GO:0043025" id="soma_group">
                <include segmentGroup="Soma"/>
            </segmentGroup>
            <segmentGroup neuroLexId="GO:0030424" id="axon_group">
                <include segmentGroup="Axon"/>
            </segmentGroup>
            <segmentGroup neuroLexId="GO:0030425" id="dendrite_group">
                <include segmentGroup="Dendrite2"/>
                <include segmentGroup="Neurite3"/>
                <include segmentGroup="Neurite4"/>
            </segmentGroup>
        </morphology>
        <biophysicalProperties id="biophys_ADER">
            <membraneProperties>
                <channelDensity id="Leak_all" ionChannel="Leak" condDensity="0.005 mS_per_cm2" erev="-50 mV" ion="non_specific"/>
                <channelDensity id="k_slow_all" ionChannel="k_slow" condDensity="1.8333751019872582 mS_per_cm2" erev="-60 mV" ion="k"/>
                <channelDensity id="k_fast_all" ionChannel="k_fast" condDensity="0.0711643917483308 mS_per_cm2" erev="-60 mV" ion="k"/>
                <channelDensity id="ca_boyle_all" ionChannel="ca_boyle" condDensity="1.6862775772264702 mS_per_cm2" erev="40 mV" ion="ca"/>
                <spikeThresh value="-26 mV"/>
                <specificCapacitance value="1 uF_per_cm2"/>
                <initMembPotential value="-45 mV"/>
            </membraneProperties>
            <intracellularProperties>
                <species id="ca" concentrationModel="CaPool" ion="ca" initialConcentration="0 mM" initialExtConcentration="2E-6 mol_per_cm3"/>
                <resistivity value="3 kohm_cm"/>
            </intracellularProperties>
        </biophysicalProperties>
    </cell>
</neuroml>
