<neuroml xmlns="http://www.neuroml.org/schema/neuroml2"  xmlns:xs="http://www.w3.org/2001/XMLSchema" xmlns:xsi="http://www.w3.org/2001/XMLSchema-instance" xsi:schemaLocation="http://www.neuroml.org/schema/neuroml2 https://raw.github.com/NeuroML/NeuroML2/development/Schemas/NeuroML2/NeuroML_v2beta5.xsd" id="AVM">
    <cell id="AVM">
        <notes>Cell model created by c302 with custom electrical parameters</notes>
        <morphology id="morphology_AVM">
            <segment id="0" name="Seg0_soma_0">
                <proximal x="-2.050000e+01" y="-5.565000e+01" z="-4.460000e+01" diameter="5.162364"/>
                <distal x="-2.050000e+01" y="-5.565000e+01" z="-4.460000e+01" diameter="5.162364"/>
            </segment>
            <segment id="1" name="Seg0_axon_0">
                <parent segment="0"/>
                <proximal x="-2.050000e+01" y="-5.565000e+01" z="-4.460000e+01" diameter="0.9219544"/>
                <distal x="-2.040000e+01" y="-5.565000e+01" z="-4.460000e+01" diameter="0.9219544"/>
            </segment>
            <segment id="2" name="Seg2_axon_0">
                <parent segment="1"/>
                <distal x="-2.040000e+01" y="-5.570000e+01" z="-4.580000e+01" diameter="0.8485281"/>
            </segment>
            <segment id="3" name="Seg3_axon_0">
                <parent segment="2"/>
                <distal x="-2.040000e+01" y="-5.510000e+01" z="-5.245000e+01" diameter="0.9"/>
            </segment>
            <segment id="4" name="Seg4_axon_0">
                <parent segment="3"/>
                <distal x="-1.665000e+01" y="-5.455000e+01" z="-5.960000e+01" diameter="0.96953595"/>
            </segment>
            <segment id="5" name="Seg5_axon_0">
                <parent segment="4"/>
                <distal x="-1.000000e+01" y="-5.410000e+01" z="-6.480000e+01" diameter="0.8717798"/>
            </segment>
            <segment id="6" name="Seg6_axon_0">
                <parent segment="5"/>
                <distal x="-5.800000e+00" y="-5.605000e+01" z="-6.690000e+01" diameter="0.8774964"/>
            </segment>
            <segment id="7" name="Seg7_axon_0">
                <parent segment="6"/>
                <distal x="-1.550000e+00" y="-5.990000e+01" z="-6.685000e+01" diameter="0.70710677"/>
            </segment>
            <segment id="8" name="Seg8_axon_0">
                <parent segment="7"/>
                <distal x="-1.525000e+00" y="-6.620000e+01" z="-6.675000e+01" diameter="0.7433034"/>
            </segment>
            <segment id="9" name="Seg9_axon_0">
                <parent segment="8"/>
                <distal x="-1.450000e+00" y="-8.415000e+01" z="-6.664999e+01" diameter="0.4358899"/>
            </segment>
            <segment id="10" name="Seg10_axon_0">
                <parent segment="9"/>
                <distal x="-1.450000e+00" y="-1.023500e+02" z="-6.400000e+01" diameter="0.50990194"/>
            </segment>
            <segment id="11" name="Seg11_axon_0">
                <parent segment="10"/>
                <distal x="-1.450000e+00" y="-1.185000e+02" z="-6.020000e+01" diameter="0.5"/>
            </segment>
            <segment id="12" name="Seg12_axon_0">
                <parent segment="11"/>
                <distal x="-1.450000e+00" y="-1.354500e+02" z="-5.395000e+01" diameter="0.4358899"/>
            </segment>
            <segment id="13" name="Seg13_axon_0">
                <parent segment="12"/>
                <distal x="-1.450000e+00" y="-1.628500e+02" z="-4.005000e+01" diameter="0.4358899"/>
            </segment>
            <segment id="14" name="Seg14_axon_0">
                <parent segment="13"/>
                <distal x="-1.450000e+00" y="-1.676000e+02" z="-3.760000e+01" diameter="0.5"/>
            </segment>
            <segment id="15" name="Seg15_axon_0">
                <parent segment="14"/>
                <distal x="-1.450000e+00" y="-2.102000e+02" z="-8.400000e+00" diameter="0.5"/>
            </segment>
            <segment id="16" name="Seg16_axon_0">
                <parent segment="15"/>
                <distal x="-1.450000e+00" y="-2.149500e+02" z="-5.250000e+00" diameter="0.4358899"/>
            </segment>
            <segment id="17" name="Seg17_axon_0">
                <parent segment="16"/>
                <distal x="-1.450000e+00" y="-2.433500e+02" z="1.455000e+01" diameter="0.4358899"/>
            </segment>
            <segment id="18" name="Seg18_axon_0">
                <parent segment="17"/>
                <distal x="-1.450000e+00" y="-2.479000e+02" z="1.735000e+01" diameter="0.42426404"/>
            </segment>
            <segment id="19" name="Seg19_axon_0">
                <parent segment="18"/>
                <distal x="-1.550000e+00" y="-2.701500e+02" z="2.555000e+01" diameter="0.4358899"/>
            </segment>
            <segment id="20" name="Seg20_neurite_0">
                <parent segment="19"/>
                <proximal x="-1.550000e+00" y="-2.701500e+02" z="2.555000e+01" diameter="0.4358899"/>
                <distal x="-1.550000e+00" y="-2.703000e+02" z="2.585000e+01" diameter="0.5830952"/>
            </segment>
            <segment id="21" name="Seg21_neurite_0">
                <parent segment="20"/>
                <distal x="-1.575000e+00" y="-2.700500e+02" z="2.615000e+01" diameter="0.4924429"/>
            </segment>
            <segment id="22" name="Seg22_neurite_0">
                <parent segment="21"/>
                <distal x="-1.575000e+00" y="-2.686500e+02" z="2.625000e+01" diameter="0.35000002"/>
            </segment>
            <segment id="23" name="Seg23_neurite_0">
                <parent segment="22"/>
                <distal x="-1.575000e+00" y="-2.669500e+02" z="2.700000e+01" diameter="0.39051247"/>
            </segment>
            <segment id="24" name="Seg24_neurite_0">
                <parent segment="23"/>
                <distal x="-1.575000e+00" y="-2.665000e+02" z="3.050000e+01" diameter="0.42720017"/>
            </segment>
            <segment id="25" name="Seg25_neurite_0">
                <parent segment="24"/>
                <distal x="-1.575000e+00" y="-2.663000e+02" z="3.535000e+01" diameter="0.4387482"/>
            </segment>
            <segment id="26" name="Seg26_neurite_0">
                <parent segment="25"/>
                <distal x="-1.575000e+00" y="-2.666500e+02" z="3.620000e+01" diameter="0.39051247"/>
            </segment>
            <segment id="27" name="Seg27_neurite_0">
                <parent segment="26"/>
                <distal x="-1.575000e+00" y="-2.674500e+02" z="3.660000e+01" diameter="0.4387482"/>
            </segment>
            <segment id="28" name="Seg28_neurite_0">
                <parent segment="27"/>
                <distal x="-1.575000e+00" y="-2.682000e+02" z="3.675000e+01" diameter="0.33541018"/>
            </segment>
            <segment id="29" name="Seg29_neurite_0">
                <parent segment="28"/>
                <proximal x="-1.575000e+00" y="-2.682000e+02" z="3.675000e+01" diameter="0.33541018"/>
                <distal x="-1.700000e+00" y="-2.683750e+02" z="3.682500e+01" diameter="0.5700877"/>
            </segment>
            <segment id="30" name="Seg30_neurite_0">
                <parent segment="29"/>
                <distal x="-1.950000e+00" y="-2.685000e+02" z="3.680000e+01" diameter="0.3"/>
            </segment>
            <segment id="31" name="Seg31_neurite_0">
                <parent segment="30"/>
                <distal x="-4.750000e+00" y="-2.688000e+02" z="3.735000e+01" diameter="0.24494897"/>
            </segment>
            <segment id="32" name="Seg32_neurite_0">
                <parent segment="31"/>
                <distal x="-6.600000e+00" y="-2.696250e+02" z="3.860000e+01" diameter="0.45"/>
            </segment>
            <segment id="33" name="Seg33_neurite_0">
                <parent segment="32"/>
                <distal x="-6.900000e+00" y="-2.697000e+02" z="3.880000e+01" diameter="0.34641016"/>
            </segment>
            <segment id="34" name="Seg34_neurite_0">
                <parent segment="28"/>
                <proximal x="-1.575000e+00" y="-2.682000e+02" z="3.675000e+01" diameter="0.33541018"/>
                <distal x="-1.450000e+00" y="-2.683750e+02" z="3.682500e+01" diameter="0.39370042"/>
            </segment>
            <segment id="35" name="Seg35_neurite_0">
                <parent segment="34"/>
                <distal x="-1.150000e+00" y="-2.685250e+02" z="3.680000e+01" diameter="0.33541018"/>
            </segment>
            <segment id="36" name="Seg36_neurite_0">
                <parent segment="35"/>
                <distal x="7.250000e-01" y="-2.687750e+02" z="3.740000e+01" diameter="0.43011624"/>
            </segment>
            <segment id="37" name="Seg37_neurite_0">
                <parent segment="36"/>
                <distal x="2.750000e+00" y="-2.697000e+02" z="3.870000e+01" diameter="0.41231057"/>
            </segment>
            <segment id="38" name="Seg38_neurite_0">
                <parent segment="37"/>
                <distal x="3.000000e+00" y="-2.698000e+02" z="3.885000e+01" diameter="0.3"/>
            </segment>
            <segment id="39" name="Seg39_neurite_0">
                <parent segment="19"/>
                <proximal x="-1.550000e+00" y="-2.701500e+02" z="2.555000e+01" diameter="0.4358899"/>
                <distal x="-1.550000e+00" y="-2.706000e+02" z="2.585000e+01" diameter="0.46904156"/>
            </segment>
            <segment id="40" name="Seg40_neurite_0">
                <parent segment="39"/>
                <distal x="-1.550000e+00" y="-2.929500e+02" z="3.535000e+01" diameter="0.4358899"/>
            </segment>
            <segment id="41" name="Seg41_neurite_0">
                <parent segment="40"/>
                <distal x="-1.550000e+00" y="-3.150500e+02" z="4.355000e+01" diameter="0.4358899"/>
            </segment>
            <segment id="42" name="Seg42_neurite_0">
                <parent segment="41"/>
                <distal x="-1.550000e+00" y="-3.173500e+02" z="4.440000e+01" diameter="0.50990194"/>
            </segment>
            <segmentGroup neuroLexId="sao864921383" id="Soma">
                <member segment="0"/>
            </segmentGroup>
            <segmentGroup neuroLexId="sao864921383" id="Axon">
                <member segment="1"/>
                <member segment="2"/>
                <member segment="3"/>
                <member segment="4"/>
                <member segment="5"/>
                <member segment="6"/>
                <member segment="7"/>
                <member segment="8"/>
                <member segment="9"/>
                <member segment="10"/>
                <member segment="11"/>
                <member segment="12"/>
                <member segment="13"/>
                <member segment="14"/>
                <member segment="15"/>
                <member segment="16"/>
                <member segment="17"/>
                <member segment="18"/>
                <member segment="19"/>
            </segmentGroup>
            <segmentGroup neuroLexId="sao864921383" id="Neurite2">
                <member segment="20"/>
                <member segment="21"/>
                <member segment="22"/>
                <member segment="23"/>
                <member segment="24"/>
                <member segment="25"/>
                <member segment="26"/>
                <member segment="27"/>
                <member segment="28"/>
            </segmentGroup>
            <segmentGroup neuroLexId="sao864921383" id="Neurite3">
                <member segment="29"/>
                <member segment="30"/>
                <member segment="31"/>
                <member segment="32"/>
                <member segment="33"/>
            </segmentGroup>
            <segmentGroup neuroLexId="sao864921383" id="Neurite4">
                <member segment="34"/>
                <member segment="35"/>
                <member segment="36"/>
                <member segment="37"/>
                <member segment="38"/>
            </segmentGroup>
            <segmentGroup neuroLexId="sao864921383" id="Neurite5">
                <member segment="39"/>
                <member segment="40"/>
                <member segment="41"/>
                <member segment="42"/>
            </segmentGroup>
            <segmentGroup id="all">
                <include segmentGroup="Soma"/>
                <include segmentGroup="Axon"/>
                <include segmentGroup="Neurite2"/>
                <include segmentGroup="Neurite3"/>
                <include segmentGroup="Neurite4"/>
                <include segmentGroup="Neurite5"/>
            </segmentGroup>
            <segmentGroup neuroLexId="GO:0043025" id="soma_group">
                <include segmentGroup="Soma"/>
            </segmentGroup>
            <segmentGroup neuroLexId="GO:0030424" id="axon_group">
                <include segmentGroup="Axon"/>
            </segmentGroup>
            <segmentGroup neuroLexId="GO:0030425" id="dendrite_group">
                <include segmentGroup="Neurite2"/>
                <include segmentGroup="Neurite3"/>
                <include segmentGroup="Neurite4"/>
                <include segmentGroup="Neurite5"/>
            </segmentGroup>
        </morphology>
        <biophysicalProperties id="biophys_AVM">
            <membraneProperties>
                <channelDensity id="Leak_all" ionChannel="Leak" condDensity="0.005 mS_per_cm2" erev="-50 mV" ion="non_specific"/>
                <channelDensity id="k_slow_all" ionChannel="k_slow" condDensity="1.8333751019872582 mS_per_cm2" erev="-60 mV" ion="k"/>
                <channelDensity id="k_fast_all" ionChannel="k_fast" condDensity="0.0711643917483308 mS_per_cm2" erev="-60 mV" ion="k"/>
                <channelDensity id="ca_boyle_all" ionChannel="ca_boyle" condDensity="1.6862775772264702 mS_per_cm2" erev="40 mV" ion="ca"/>
                <spikeThresh value="-26 mV"/>
                <specificCapacitance value="1 uF_per_cm2"/>
                <initMembPotential value="-45 mV"/>
            </membraneProperties>
            <intracellularProperties>
                <species id="ca" concentrationModel="CaPool" ion="ca" initialConcentration="0 mM" initialExtConcentration="2E-6 mol_per_cm3"/>
                <resistivity value="3 kohm_cm"/>
            </intracellularProperties>
        </biophysicalProperties>
    </cell>
</neuroml>
