<neuroml xmlns="http://www.neuroml.org/schema/neuroml2"  xmlns:xs="http://www.w3.org/2001/XMLSchema" xmlns:xsi="http://www.w3.org/2001/XMLSchema-instance" xsi:schemaLocation="http://www.neuroml.org/schema/neuroml2 https://raw.github.com/NeuroML/NeuroML2/development/Schemas/NeuroML2/NeuroML_v2beta5.xsd" id="IL1R">
    <cell id="IL1R">
        <notes>Cell model created by c302 with custom electrical parameters</notes>
        <morphology id="morphology_IL1R">
            <segment id="0" name="Seg0_soma_0">
                <proximal x="-8.075001e+00" y="-2.826750e+02" z="4.785000e+01" diameter="3.1448371"/>
                <distal x="-8.075001e+00" y="-2.826750e+02" z="4.785000e+01" diameter="3.1448371"/>
            </segment>
            <segment id="14" name="Seg0_axon_0">
                <parent segment="0"/>
                <proximal x="-8.075001e+00" y="-2.826750e+02" z="4.785000e+01" diameter="0.4358899"/>
                <distal x="-8.050000e+00" y="-2.817500e+02" z="4.725000e+01" diameter="0.4358899"/>
            </segment>
            <segment id="15" name="Seg15_axon_0">
                <parent segment="14"/>
                <distal x="-8.650000e+00" y="-2.801000e+02" z="4.555000e+01" diameter="0.46904156"/>
            </segment>
            <segment id="16" name="Seg16_axon_0">
                <parent segment="15"/>
                <distal x="-1.105000e+01" y="-2.781000e+02" z="4.425000e+01" diameter="0.46904156"/>
            </segment>
            <segment id="17" name="Seg17_axon_0">
                <parent segment="16"/>
                <distal x="-1.145000e+01" y="-2.756750e+02" z="4.405000e+01" diameter="0.42720017"/>
            </segment>
            <segment id="18" name="Seg18_axon_0">
                <parent segment="17"/>
                <distal x="-1.125000e+01" y="-2.728750e+02" z="4.405000e+01" diameter="0.4924429"/>
            </segment>
            <segment id="19" name="Seg19_axon_0">
                <parent segment="18"/>
                <distal x="-1.052500e+01" y="-2.723000e+02" z="4.475000e+01" diameter="0.5024938"/>
            </segment>
            <segment id="20" name="Seg20_axon_0">
                <parent segment="19"/>
                <distal x="-9.650001e+00" y="-2.726250e+02" z="4.530000e+01" diameter="0.6103278"/>
            </segment>
            <segment id="21" name="Seg21_axon_0">
                <parent segment="20"/>
                <distal x="-9.250000e+00" y="-2.738000e+02" z="4.535000e+01" diameter="0.42426404"/>
            </segment>
            <segment id="22" name="Seg22_axon_0">
                <parent segment="21"/>
                <distal x="-9.250000e+00" y="-2.740250e+02" z="4.535000e+01" diameter="0.42720017"/>
            </segment>
            <segment id="1" name="Seg0_dendrit_2">
                <parent segment="0"/>
                <proximal x="-8.075001e+00" y="-2.826750e+02" z="4.785000e+01" diameter="0.53851646"/>
                <distal x="-8.100000e+00" y="-2.836000e+02" z="4.845000e+01" diameter="0.53851646"/>
            </segment>
            <segment id="2" name="Seg2_dendrite_0">
                <parent segment="1"/>
                <distal x="-9.400000e+00" y="-2.863000e+02" z="4.950000e+01" diameter="0.56568545"/>
            </segment>
            <segment id="3" name="Seg3_dendrite_0">
                <parent segment="2"/>
                <distal x="-1.170000e+01" y="-2.898000e+02" z="5.110000e+01" diameter="0.56568545"/>
            </segment>
            <segment id="4" name="Seg4_dendrite_0">
                <parent segment="3"/>
                <distal x="-1.220000e+01" y="-2.932000e+02" z="5.210000e+01" diameter="0.56568545"/>
            </segment>
            <segment id="5" name="Seg5_dendrite_0">
                <parent segment="4"/>
                <distal x="-1.220000e+01" y="-2.966000e+02" z="5.280000e+01" diameter="0.56568545"/>
            </segment>
            <segment id="6" name="Seg6_dendrite_0">
                <parent segment="5"/>
                <distal x="-1.180000e+01" y="-2.998000e+02" z="5.330000e+01" diameter="0.56568545"/>
            </segment>
            <segment id="7" name="Seg7_dendrite_0">
                <parent segment="6"/>
                <distal x="-1.040000e+01" y="-3.046000e+02" z="5.410000e+01" diameter="0.56568545"/>
            </segment>
            <segment id="8" name="Seg8_dendrite_0">
                <parent segment="7"/>
                <distal x="-9.300000e+00" y="-3.201500e+02" z="5.600000e+01" diameter="0.5744563"/>
            </segment>
            <segment id="9" name="Seg9_dendrite_0">
                <parent segment="8"/>
                <distal x="-7.300000e+00" y="-3.319500e+02" z="5.720000e+01" diameter="0.5744563"/>
            </segment>
            <segment id="10" name="Seg10_dendrite_0">
                <parent segment="9"/>
                <distal x="-6.500000e+00" y="-3.371500e+02" z="5.780000e+01" diameter="0.5744563"/>
            </segment>
            <segment id="11" name="Seg11_dendrite_0">
                <parent segment="10"/>
                <distal x="-5.600000e+00" y="-3.428000e+02" z="5.860000e+01" diameter="0.56568545"/>
            </segment>
            <segment id="12" name="Seg12_dendrite_0">
                <parent segment="11"/>
                <distal x="-5.000000e+00" y="-3.486000e+02" z="5.890000e+01" diameter="0.56568545"/>
            </segment>
            <segment id="13" name="Seg13_dendrite_0">
                <parent segment="12"/>
                <distal x="-5.000000e+00" y="-3.494500e+02" z="5.900000e+01" diameter="0.5744563"/>
            </segment>
            <segment id="23" name="Seg23_neurite_0">
                <parent segment="22"/>
                <proximal x="-9.250000e+00" y="-2.740250e+02" z="4.535000e+01" diameter="0.42720017"/>
                <distal x="-9.224999e+00" y="-2.741500e+02" z="4.520000e+01" diameter="0.4609772"/>
            </segment>
            <segment id="24" name="Seg24_neurite_0">
                <parent segment="23"/>
                <distal x="-8.725000e+00" y="-2.737750e+02" z="4.245000e+01" diameter="0.36742347"/>
            </segment>
            <segment id="25" name="Seg25_neurite_0">
                <parent segment="24"/>
                <distal x="-8.125000e+00" y="-2.736500e+02" z="4.157500e+01" diameter="0.39370042"/>
            </segment>
            <segment id="26" name="Seg26_neurite_0">
                <parent segment="22"/>
                <proximal x="-9.250000e+00" y="-2.740250e+02" z="4.535000e+01" diameter="0.42720017"/>
                <distal x="-9.250000e+00" y="-2.742000e+02" z="4.550000e+01" diameter="0.5"/>
            </segment>
            <segment id="27" name="Seg27_neurite_0">
                <parent segment="26"/>
                <distal x="-8.700000e+00" y="-2.746500e+02" z="4.852500e+01" diameter="0.4387482"/>
            </segment>
            <segment id="28" name="Seg28_neurite_0">
                <parent segment="27"/>
                <distal x="-8.075001e+00" y="-2.748000e+02" z="4.947500e+01" diameter="0.45276928"/>
            </segment>
            <segmentGroup neuroLexId="sao864921383" id="Soma">
                <member segment="0"/>
            </segmentGroup>
            <segmentGroup neuroLexId="sao864921383" id="Axon">
                <member segment="14"/>
                <member segment="15"/>
                <member segment="16"/>
                <member segment="17"/>
                <member segment="18"/>
                <member segment="19"/>
                <member segment="20"/>
                <member segment="21"/>
                <member segment="22"/>
            </segmentGroup>
            <segmentGroup neuroLexId="sao864921383" id="Dendrite2">
                <member segment="1"/>
                <member segment="2"/>
                <member segment="3"/>
                <member segment="4"/>
                <member segment="5"/>
                <member segment="6"/>
                <member segment="7"/>
                <member segment="8"/>
                <member segment="9"/>
                <member segment="10"/>
                <member segment="11"/>
                <member segment="12"/>
                <member segment="13"/>
            </segmentGroup>
            <segmentGroup neuroLexId="sao864921383" id="Neurite3">
                <member segment="23"/>
                <member segment="24"/>
                <member segment="25"/>
            </segmentGroup>
            <segmentGroup neuroLexId="sao864921383" id="Neurite4">
                <member segment="26"/>
                <member segment="27"/>
                <member segment="28"/>
            </segmentGroup>
            <segmentGroup id="all">
                <include segmentGroup="Soma"/>
                <include segmentGroup="Axon"/>
                <include segmentGroup="Dendrite2"/>
                <include segmentGroup="Neurite3"/>
                <include segmentGroup="Neurite4"/>
            </segmentGroup>
            <segmentGroup neuroLexId="GO:0043025" id="soma_group">
                <include segmentGroup="Soma"/>
            </segmentGroup>
            <segmentGroup neuroLexId="GO:0030424" id="axon_group">
                <include segmentGroup="Axon"/>
            </segmentGroup>
            <segmentGroup neuroLexId="GO:0030425" id="dendrite_group">
                <include segmentGroup="Dendrite2"/>
                <include segmentGroup="Neurite3"/>
                <include segmentGroup="Neurite4"/>
            </segmentGroup>
        </morphology>
        <biophysicalProperties id="biophys_IL1R">
            <membraneProperties>
                <channelDensity id="Leak_all" ionChannel="Leak" condDensity="0.005 mS_per_cm2" erev="-50 mV" ion="non_specific"/>
                <channelDensity id="k_slow_all" ionChannel="k_slow" condDensity="1.8333751019872582 mS_per_cm2" erev="-60 mV" ion="k"/>
                <channelDensity id="k_fast_all" ionChannel="k_fast" condDensity="0.0711643917483308 mS_per_cm2" erev="-60 mV" ion="k"/>
                <channelDensity id="ca_boyle_all" ionChannel="ca_boyle" condDensity="1.6862775772264702 mS_per_cm2" erev="40 mV" ion="ca"/>
                <spikeThresh value="-26 mV"/>
                <specificCapacitance value="1 uF_per_cm2"/>
                <initMembPotential value="-45 mV"/>
            </membraneProperties>
            <intracellularProperties>
                <species id="ca" concentrationModel="CaPool" ion="ca" initialConcentration="0 mM" initialExtConcentration="2E-6 mol_per_cm3"/>
                <resistivity value="3 kohm_cm"/>
            </intracellularProperties>
        </biophysicalProperties>
    </cell>
</neuroml>
