<neuroml xmlns="http://www.neuroml.org/schema/neuroml2"  xmlns:xs="http://www.w3.org/2001/XMLSchema" xmlns:xsi="http://www.w3.org/2001/XMLSchema-instance" xsi:schemaLocation="http://www.neuroml.org/schema/neuroml2 https://raw.github.com/NeuroML/NeuroML2/development/Schemas/NeuroML2/NeuroML_v2beta5.xsd" id="RMFR">
    <cell id="RMFR">
        <notes>Cell model created by c302 with custom electrical parameters</notes>
        <morphology id="morphology_RMFR">
            <segment id="0" name="Seg0_soma_0">
                <proximal x="-5.400000e+00" y="-2.650500e+02" z="3.410000e+01" diameter="2.3345237"/>
                <distal x="-5.400000e+00" y="-2.650500e+02" z="3.410000e+01" diameter="2.3345237"/>
            </segment>
            <segment id="1" name="Seg0_axon_0">
                <parent segment="0"/>
                <proximal x="-5.400000e+00" y="-2.650500e+02" z="3.410000e+01" diameter="0.36055514"/>
                <distal x="-5.300000e+00" y="-2.650500e+02" z="3.410000e+01" diameter="0.36055514"/>
            </segment>
            <segment id="2" name="Seg2_axon_0">
                <parent segment="1"/>
                <distal x="-5.300000e+00" y="-2.651000e+02" z="3.375000e+01" diameter="0.41231057"/>
            </segment>
            <segment id="3" name="Seg3_axon_0">
                <parent segment="2"/>
                <distal x="-5.300000e+00" y="-2.657500e+02" z="3.355000e+01" diameter="0.37416574"/>
            </segment>
            <segment id="4" name="Seg4_axon_0">
                <parent segment="3"/>
                <distal x="-4.150000e+00" y="-2.672250e+02" z="3.385000e+01" diameter="0.42720017"/>
            </segment>
            <segment id="5" name="Seg5_axon_0">
                <parent segment="4"/>
                <distal x="-2.625000e+00" y="-2.705250e+02" z="3.537500e+01" diameter="0.4330127"/>
            </segment>
            <segment id="6" name="Seg6_axon_0">
                <parent segment="5"/>
                <distal x="-2.450000e+00" y="-2.729000e+02" z="3.680000e+01" diameter="0.41231057"/>
            </segment>
            <segment id="7" name="Seg7_axon_0">
                <parent segment="6"/>
                <distal x="-4.850000e+00" y="-2.731500e+02" z="3.812500e+01" diameter="0.40311286"/>
            </segment>
            <segment id="8" name="Seg8_axon_0">
                <parent segment="7"/>
                <distal x="-7.125000e+00" y="-2.734250e+02" z="3.982500e+01" diameter="0.4555217"/>
            </segment>
            <segment id="9" name="Seg9_axon_0">
                <parent segment="8"/>
                <distal x="-8.700000e+00" y="-2.737750e+02" z="4.245000e+01" diameter="0.41533118"/>
            </segment>
            <segment id="10" name="Seg10_axon_0">
                <parent segment="9"/>
                <distal x="-9.224999e+00" y="-2.742000e+02" z="4.550000e+01" diameter="0.47169906"/>
            </segment>
            <segment id="11" name="Seg11_axon_0">
                <parent segment="10"/>
                <distal x="-8.650000e+00" y="-2.746500e+02" z="4.852500e+01" diameter="0.4924429"/>
            </segment>
            <segment id="12" name="Seg12_axon_0">
                <parent segment="11"/>
                <distal x="-7.100000e+00" y="-2.750000e+02" z="5.110000e+01" diameter="0.48989794"/>
            </segment>
            <segment id="13" name="Seg13_axon_0">
                <parent segment="12"/>
                <distal x="-4.850000e+00" y="-2.753000e+02" z="5.282500e+01" diameter="0.48218253"/>
            </segment>
            <segment id="14" name="Seg14_axon_0">
                <parent segment="13"/>
                <distal x="-2.100000e+00" y="-2.753500e+02" z="5.340000e+01" diameter="0.5"/>
            </segment>
            <segment id="15" name="Seg15_axon_0">
                <parent segment="14"/>
                <distal x="6.000000e-01" y="-2.753000e+02" z="5.282500e+01" diameter="0.3774917"/>
            </segment>
            <segment id="16" name="Seg16_axon_0">
                <parent segment="15"/>
                <distal x="2.900000e+00" y="-2.750000e+02" z="5.110000e+01" diameter="0.34641016"/>
            </segment>
            <segment id="17" name="Seg17_axon_0">
                <parent segment="16"/>
                <distal x="4.425000e+00" y="-2.746500e+02" z="4.852500e+01" diameter="0.36742347"/>
            </segment>
            <segment id="18" name="Seg18_axon_0">
                <parent segment="17"/>
                <distal x="4.850000e+00" y="-2.742500e+02" z="4.630000e+01" diameter="0.42426404"/>
            </segment>
            <segment id="19" name="Seg19_neurite_0">
                <parent segment="18"/>
                <proximal x="4.850000e+00" y="-2.742500e+02" z="4.630000e+01" diameter="0.42426404"/>
                <distal x="4.725000e+00" y="-2.742000e+02" z="4.615000e+01" diameter="0.5024938"/>
            </segment>
            <segment id="20" name="Seg20_neurite_0">
                <parent segment="19"/>
                <distal x="4.375000e+00" y="-2.741500e+02" z="4.600000e+01" diameter="0.39051247"/>
            </segment>
            <segment id="21" name="Seg21_neurite_0">
                <parent segment="20"/>
                <distal x="3.950000e+00" y="-2.741000e+02" z="4.497500e+01" diameter="0.5024938"/>
            </segment>
            <segment id="22" name="Seg22_neurite_0">
                <parent segment="21"/>
                <distal x="3.450000e+00" y="-2.739500e+02" z="4.280000e+01" diameter="0.46904156"/>
            </segment>
            <segment id="23" name="Seg23_neurite_0">
                <parent segment="18"/>
                <proximal x="4.850000e+00" y="-2.742500e+02" z="4.630000e+01" diameter="0.42426404"/>
                <distal x="4.875000e+00" y="-2.742000e+02" z="4.600000e+01" diameter="0.32015622"/>
            </segment>
            <segment id="24" name="Seg24_neurite_0">
                <parent segment="23"/>
                <distal x="4.475000e+00" y="-2.737750e+02" z="4.245000e+01" diameter="0.44158804"/>
            </segment>
            <segment id="25" name="Seg25_neurite_0">
                <parent segment="24"/>
                <distal x="2.900000e+00" y="-2.734250e+02" z="3.982500e+01" diameter="0.47434163"/>
            </segment>
            <segment id="26" name="Seg26_neurite_0">
                <parent segment="25"/>
                <distal x="6.500000e-01" y="-2.731500e+02" z="3.812500e+01" diameter="0.47169906"/>
            </segment>
            <segment id="27" name="Seg27_neurite_0">
                <parent segment="26"/>
                <distal x="-9.250000e-01" y="-2.731500e+02" z="3.742500e+01" diameter="0.46368092"/>
            </segment>
            <segmentGroup neuroLexId="sao864921383" id="Soma">
                <member segment="0"/>
            </segmentGroup>
            <segmentGroup neuroLexId="sao864921383" id="Axon">
                <member segment="1"/>
                <member segment="2"/>
                <member segment="3"/>
                <member segment="4"/>
                <member segment="5"/>
                <member segment="6"/>
                <member segment="7"/>
                <member segment="8"/>
                <member segment="9"/>
                <member segment="10"/>
                <member segment="11"/>
                <member segment="12"/>
                <member segment="13"/>
                <member segment="14"/>
                <member segment="15"/>
                <member segment="16"/>
                <member segment="17"/>
                <member segment="18"/>
            </segmentGroup>
            <segmentGroup neuroLexId="sao864921383" id="Neurite2">
                <member segment="19"/>
                <member segment="20"/>
                <member segment="21"/>
                <member segment="22"/>
            </segmentGroup>
            <segmentGroup neuroLexId="sao864921383" id="Neurite3">
                <member segment="23"/>
                <member segment="24"/>
                <member segment="25"/>
                <member segment="26"/>
                <member segment="27"/>
            </segmentGroup>
            <segmentGroup id="all">
                <include segmentGroup="Soma"/>
                <include segmentGroup="Axon"/>
                <include segmentGroup="Neurite2"/>
                <include segmentGroup="Neurite3"/>
            </segmentGroup>
            <segmentGroup neuroLexId="GO:0043025" id="soma_group">
                <include segmentGroup="Soma"/>
            </segmentGroup>
            <segmentGroup neuroLexId="GO:0030424" id="axon_group">
                <include segmentGroup="Axon"/>
            </segmentGroup>
            <segmentGroup neuroLexId="GO:0030425" id="dendrite_group">
                <include segmentGroup="Neurite2"/>
                <include segmentGroup="Neurite3"/>
            </segmentGroup>
        </morphology>
        <biophysicalProperties id="biophys_RMFR">
            <membraneProperties>
                <channelDensity id="Leak_all" ionChannel="Leak" condDensity="0.005 mS_per_cm2" erev="-50 mV" ion="non_specific"/>
                <channelDensity id="k_slow_all" ionChannel="k_slow" condDensity="1.8333751019872582 mS_per_cm2" erev="-60 mV" ion="k"/>
                <channelDensity id="k_fast_all" ionChannel="k_fast" condDensity="0.0711643917483308 mS_per_cm2" erev="-60 mV" ion="k"/>
                <channelDensity id="ca_boyle_all" ionChannel="ca_boyle" condDensity="1.6862775772264702 mS_per_cm2" erev="40 mV" ion="ca"/>
                <spikeThresh value="-26 mV"/>
                <specificCapacitance value="1 uF_per_cm2"/>
                <initMembPotential value="-45 mV"/>
            </membraneProperties>
            <intracellularProperties>
                <species id="ca" concentrationModel="CaPool" ion="ca" initialConcentration="0 mM" initialExtConcentration="2E-6 mol_per_cm3"/>
                <resistivity value="3 kohm_cm"/>
            </intracellularProperties>
        </biophysicalProperties>
    </cell>
</neuroml>
