<neuroml xmlns="http://www.neuroml.org/schema/neuroml2"  xmlns:xs="http://www.w3.org/2001/XMLSchema" xmlns:xsi="http://www.w3.org/2001/XMLSchema-instance" xsi:schemaLocation="http://www.neuroml.org/schema/neuroml2 https://raw.github.com/NeuroML/NeuroML2/development/Schemas/NeuroML2/NeuroML_v2beta5.xsd" id="SIBVL">
    <cell id="SIBVL">
        <notes>Cell model created by c302 with custom electrical parameters</notes>
        <morphology id="morphology_SIBVL">
            <segment id="0" name="Seg0_soma_0">
                <proximal x="-2.667000e+00" y="-2.698670e+02" z="3.540800e+01" diameter="2.1213202"/>
                <distal x="-2.667000e+00" y="-2.698670e+02" z="3.540800e+01" diameter="2.1213202"/>
            </segment>
            <segment id="30" name="Seg0_axon_0">
                <parent segment="0"/>
                <proximal x="-2.667000e+00" y="-2.698670e+02" z="3.540800e+01" diameter="0.4387482"/>
                <distal x="-6.600000e+00" y="-2.699500e+02" z="3.292500e+01" diameter="0.4387482"/>
            </segment>
            <segment id="31" name="Seg31_axon_0">
                <parent segment="30"/>
                <distal x="-6.550000e+00" y="-2.638000e+02" z="3.105000e+01" diameter="0.37416574"/>
            </segment>
            <segment id="32" name="Seg32_axon_0">
                <parent segment="31"/>
                <distal x="-6.500000e+00" y="-2.597750e+02" z="2.630000e+01" diameter="0.32015622"/>
            </segment>
            <segment id="33" name="Seg33_axon_0">
                <parent segment="32"/>
                <distal x="-9.600000e+00" y="-2.507750e+02" z="2.105000e+01" diameter="0.33541018"/>
            </segment>
            <segment id="34" name="Seg34_axon_0">
                <parent segment="33"/>
                <distal x="-1.167500e+01" y="-2.415000e+02" z="1.560000e+01" diameter="0.32015622"/>
            </segment>
            <segment id="35" name="Seg35_axon_0">
                <parent segment="34"/>
                <distal x="-1.220000e+01" y="-2.280500e+02" z="6.300000e+00" diameter="0.3"/>
            </segment>
            <segment id="36" name="Seg36_axon_0">
                <parent segment="35"/>
                <distal x="-1.360000e+01" y="-2.139250e+02" z="-2.550000e+00" diameter="0.3640055"/>
            </segment>
            <segment id="37" name="Seg37_axon_0">
                <parent segment="36"/>
                <distal x="-1.460000e+01" y="-1.967750e+02" z="-1.410000e+01" diameter="0.28722814"/>
            </segment>
            <segment id="38" name="Seg38_axon_0">
                <parent segment="37"/>
                <distal x="-1.455000e+01" y="-1.653000e+02" z="-3.555000e+01" diameter="0.31622776"/>
            </segment>
            <segment id="39" name="Seg39_axon_0">
                <parent segment="38"/>
                <distal x="-1.425000e+01" y="-1.337500e+02" z="-5.207500e+01" diameter="0.35000002"/>
            </segment>
            <segment id="40" name="Seg40_axon_0">
                <parent segment="39"/>
                <distal x="-1.450000e+01" y="-1.159250e+02" z="-5.790000e+01" diameter="0.32015622"/>
            </segment>
            <segment id="41" name="Seg41_axon_0">
                <parent segment="40"/>
                <distal x="-1.455000e+01" y="-1.001250e+02" z="-6.125000e+01" diameter="0.35000002"/>
            </segment>
            <segment id="42" name="Seg42_axon_0">
                <parent segment="41"/>
                <distal x="-1.435000e+01" y="-8.502500e+01" z="-6.355000e+01" diameter="0.35000002"/>
            </segment>
            <segment id="43" name="Seg43_axon_0">
                <parent segment="42"/>
                <distal x="-1.560000e+01" y="-5.060000e+01" z="-6.370000e+01" diameter="0.28284273"/>
            </segment>
            <segment id="44" name="Seg44_axon_0">
                <parent segment="43"/>
                <distal x="-1.540000e+01" y="-3.855000e+01" z="-6.020000e+01" diameter="0.3"/>
            </segment>
            <segment id="45" name="Seg45_axon_0">
                <parent segment="44"/>
                <distal x="-1.565000e+01" y="-3.500000e-01" z="-4.800000e+01" diameter="0.37416574"/>
            </segment>
            <segment id="46" name="Seg46_axon_0">
                <parent segment="45"/>
                <distal x="-1.615000e+01" y="3.345000e+01" z="-3.020000e+01" diameter="0.37416574"/>
            </segment>
            <segment id="47" name="Seg47_axon_0">
                <parent segment="46"/>
                <distal x="-1.625000e+01" y="3.460000e+01" z="-2.962500e+01" diameter="0.22912878"/>
            </segment>
            <segment id="48" name="Seg48_axon_0">
                <parent segment="47"/>
                <distal x="-1.905000e+01" y="3.765000e+01" z="-2.547500e+01" diameter="0.35000002"/>
            </segment>
            <segment id="49" name="Seg49_axon_0">
                <parent segment="48"/>
                <distal x="-2.145000e+01" y="3.995000e+01" z="-2.177500e+01" diameter="0.35000002"/>
            </segment>
            <segment id="50" name="Seg50_axon_0">
                <parent segment="49"/>
                <distal x="-2.367500e+01" y="4.270000e+01" z="-1.697500e+01" diameter="0.35355338"/>
            </segment>
            <segment id="51" name="Seg51_axon_0">
                <parent segment="50"/>
                <distal x="-2.510000e+01" y="4.470000e+01" z="-1.280000e+01" diameter="0.34641016"/>
            </segment>
            <segment id="52" name="Seg52_axon_0">
                <parent segment="51"/>
                <distal x="-2.455000e+01" y="4.690000e+01" z="-8.474999e+00" diameter="0.33541018"/>
            </segment>
            <segment id="53" name="Seg53_axon_0">
                <parent segment="52"/>
                <distal x="-2.450000e+01" y="4.785000e+01" z="-7.900001e+00" diameter="0.3"/>
            </segment>
            <segment id="54" name="Seg54_axon_0">
                <parent segment="53"/>
                <distal x="-2.300000e+01" y="8.305000e+01" z="1.200000e+01" diameter="0.3"/>
            </segment>
            <segment id="55" name="Seg55_axon_0">
                <parent segment="54"/>
                <distal x="-2.280000e+01" y="8.765000e+01" z="1.460000e+01" diameter="0.3"/>
            </segment>
            <segment id="56" name="Seg56_axon_0">
                <parent segment="55"/>
                <distal x="-2.280000e+01" y="9.375000e+01" z="1.560000e+01" diameter="0.3"/>
            </segment>
            <segment id="57" name="Seg57_axon_0">
                <parent segment="56"/>
                <distal x="-2.280000e+01" y="1.215000e+02" z="2.000000e+01" diameter="0.28284273"/>
            </segment>
            <segment id="58" name="Seg58_axon_0">
                <parent segment="57"/>
                <distal x="-2.280000e+01" y="1.710000e+02" z="1.750000e+01" diameter="0.28284273"/>
            </segment>
            <segment id="59" name="Seg59_axon_0">
                <parent segment="58"/>
                <distal x="-2.310000e+01" y="2.245000e+02" z="1.050000e+00" diameter="0.36055514"/>
            </segment>
            <segment id="60" name="Seg60_axon_0">
                <parent segment="59"/>
                <distal x="-2.130000e+01" y="2.528000e+02" z="-6.900000e+00" diameter="0.28284273"/>
            </segment>
            <segment id="61" name="Seg61_axon_0">
                <parent segment="60"/>
                <distal x="-1.800000e+01" y="2.897000e+02" z="-1.290000e+01" diameter="0.28284273"/>
            </segment>
            <segment id="62" name="Seg62_axon_0">
                <parent segment="61"/>
                <distal x="-1.670000e+01" y="3.200250e+02" z="-1.540000e+01" diameter="0.28722814"/>
            </segment>
            <segment id="63" name="Seg63_axon_0">
                <parent segment="62"/>
                <distal x="-1.540000e+01" y="3.530000e+02" z="-1.230000e+01" diameter="0.28284273"/>
            </segment>
            <segment id="64" name="Seg64_axon_0">
                <parent segment="63"/>
                <distal x="-1.080000e+01" y="3.874500e+02" z="-9.500000e-01" diameter="0.24494897"/>
            </segment>
            <segment id="65" name="Seg65_axon_0">
                <parent segment="64"/>
                <distal x="-9.300000e+00" y="3.965250e+02" z="3.800000e+00" diameter="0.3774917"/>
            </segment>
            <segment id="66" name="Seg66_axon_0">
                <parent segment="65"/>
                <distal x="-9.099999e+00" y="3.972250e+02" z="4.300000e+00" diameter="0.32015622"/>
            </segment>
            <segment id="22" name="Seg0_dendrit_2">
                <parent segment="0"/>
                <proximal x="-2.667000e+00" y="-2.698670e+02" z="3.540800e+01" diameter="0.42426404"/>
                <distal x="-4.550000e+00" y="-2.727500e+02" z="3.690000e+01" diameter="0.42426404"/>
            </segment>
            <segment id="23" name="Seg23_dendrite_0">
                <parent segment="22"/>
                <distal x="-4.700000e+00" y="-2.731500e+02" z="3.770000e+01" diameter="0.41231057"/>
            </segment>
            <segment id="24" name="Seg24_dendrite_0">
                <parent segment="23"/>
                <distal x="-7.125000e+00" y="-2.734250e+02" z="3.982500e+01" diameter="0.38405728"/>
            </segment>
            <segment id="25" name="Seg25_dendrite_0">
                <parent segment="24"/>
                <distal x="-8.700000e+00" y="-2.737750e+02" z="4.245000e+01" diameter="0.41533118"/>
            </segment>
            <segment id="26" name="Seg26_dendrite_0">
                <parent segment="25"/>
                <distal x="-9.200000e+00" y="-2.742000e+02" z="4.550000e+01" diameter="0.4472136"/>
            </segment>
            <segment id="27" name="Seg27_dendrite_0">
                <parent segment="26"/>
                <distal x="-8.650000e+00" y="-2.746500e+02" z="4.852500e+01" diameter="0.4924429"/>
            </segment>
            <segment id="28" name="Seg28_dendrite_0">
                <parent segment="27"/>
                <distal x="-7.100000e+00" y="-2.750000e+02" z="5.110000e+01" diameter="0.48989794"/>
            </segment>
            <segment id="29" name="Seg29_dendrite_0">
                <parent segment="28"/>
                <distal x="-4.850000e+00" y="-2.753000e+02" z="5.282500e+01" diameter="0.48218253"/>
            </segment>
            <segment id="1" name="Seg0_dendrit_3">
                <parent segment="0"/>
                <proximal x="-2.667000e+00" y="-2.698670e+02" z="3.540800e+01" diameter="0.36055514"/>
                <distal x="3.150000e+00" y="-2.669000e+02" z="3.640000e+01" diameter="0.36055514"/>
            </segment>
            <segment id="2" name="Seg2_dendrite_0">
                <parent segment="1"/>
                <distal x="2.500000e+00" y="-2.677000e+02" z="3.642500e+01" diameter="0.32015622"/>
            </segment>
            <segment id="3" name="Seg3_dendrite_0">
                <parent segment="2"/>
                <distal x="1.000000e-01" y="-2.720000e+02" z="3.362500e+01" diameter="0.25"/>
            </segment>
            <segment id="4" name="Seg4_dendrite_0">
                <parent segment="3"/>
                <distal x="1.000000e-01" y="-2.722500e+02" z="3.365000e+01" diameter="0.24494897"/>
            </segment>
            <segment id="5" name="Seg5_dendrite_0">
                <parent segment="4"/>
                <distal x="1.000000e-01" y="-2.724000e+02" z="3.405000e+01" diameter="0.3"/>
            </segment>
            <segment id="6" name="Seg6_dendrite_0">
                <parent segment="5"/>
                <distal x="1.000000e-01" y="-2.731000e+02" z="3.730000e+01" diameter="0.28284273"/>
            </segment>
            <segment id="7" name="Seg7_dendrite_0">
                <parent segment="6"/>
                <distal x="5.750000e-01" y="-2.731500e+02" z="3.810000e+01" diameter="0.3640055"/>
            </segment>
            <segment id="8" name="Seg8_dendrite_0">
                <parent segment="7"/>
                <distal x="2.900000e+00" y="-2.734250e+02" z="3.982500e+01" diameter="0.43011624"/>
            </segment>
            <segment id="9" name="Seg9_neurite_0">
                <parent segment="8"/>
                <proximal x="2.900000e+00" y="-2.734250e+02" z="3.982500e+01" diameter="0.43011624"/>
                <distal x="2.925000e+00" y="-2.734750e+02" z="4.007500e+01" diameter="0.4555217"/>
            </segment>
            <segment id="10" name="Seg10_neurite_0">
                <parent segment="9"/>
                <distal x="2.625000e+00" y="-2.734750e+02" z="4.037500e+01" diameter="0.5361903"/>
            </segment>
            <segment id="11" name="Seg11_neurite_0">
                <parent segment="10"/>
                <distal x="2.800000e+00" y="-2.736000e+02" z="4.165000e+01" diameter="0.45825756"/>
            </segment>
            <segment id="12" name="Seg12_neurite_0">
                <parent segment="11"/>
                <distal x="3.875000e+00" y="-2.740000e+02" z="4.430000e+01" diameter="0.53150725"/>
            </segment>
            <segment id="13" name="Seg13_neurite_0">
                <parent segment="12"/>
                <distal x="3.650000e+00" y="-2.744250e+02" z="4.702500e+01" diameter="0.41833004"/>
            </segment>
            <segment id="14" name="Seg14_neurite_0">
                <parent segment="13"/>
                <distal x="2.950000e+00" y="-2.747250e+02" z="4.885000e+01" diameter="0.40311286"/>
            </segment>
            <segment id="15" name="Seg15_neurite_0">
                <parent segment="8"/>
                <proximal x="2.900000e+00" y="-2.734250e+02" z="3.982500e+01" diameter="0.43011624"/>
                <distal x="3.125000e+00" y="-2.734750e+02" z="4.010000e+01" diameter="0.35355338"/>
            </segment>
            <segment id="16" name="Seg16_neurite_0">
                <parent segment="15"/>
                <distal x="4.475000e+00" y="-2.737750e+02" z="4.245000e+01" diameter="0.44158804"/>
            </segment>
            <segment id="17" name="Seg17_neurite_0">
                <parent segment="16"/>
                <distal x="4.975000e+00" y="-2.742000e+02" z="4.550000e+01" diameter="0.42720017"/>
            </segment>
            <segment id="18" name="Seg18_neurite_0">
                <parent segment="17"/>
                <distal x="4.450000e+00" y="-2.746500e+02" z="4.852500e+01" diameter="0.4924429"/>
            </segment>
            <segment id="19" name="Seg19_neurite_0">
                <parent segment="18"/>
                <distal x="2.900000e+00" y="-2.750000e+02" z="5.110000e+01" diameter="0.48989794"/>
            </segment>
            <segment id="20" name="Seg20_neurite_0">
                <parent segment="19"/>
                <distal x="6.000000e-01" y="-2.753000e+02" z="5.282500e+01" diameter="0.5123476"/>
            </segment>
            <segment id="21" name="Seg21_neurite_0">
                <parent segment="20"/>
                <distal x="-2.100000e+00" y="-2.753500e+02" z="5.340000e+01" diameter="0.5"/>
            </segment>
            <segmentGroup neuroLexId="sao864921383" id="Soma">
                <member segment="0"/>
            </segmentGroup>
            <segmentGroup neuroLexId="sao864921383" id="Axon">
                <member segment="30"/>
                <member segment="31"/>
                <member segment="32"/>
                <member segment="33"/>
                <member segment="34"/>
                <member segment="35"/>
                <member segment="36"/>
                <member segment="37"/>
                <member segment="38"/>
                <member segment="39"/>
                <member segment="40"/>
                <member segment="41"/>
                <member segment="42"/>
                <member segment="43"/>
                <member segment="44"/>
                <member segment="45"/>
                <member segment="46"/>
                <member segment="47"/>
                <member segment="48"/>
                <member segment="49"/>
                <member segment="50"/>
                <member segment="51"/>
                <member segment="52"/>
                <member segment="53"/>
                <member segment="54"/>
                <member segment="55"/>
                <member segment="56"/>
                <member segment="57"/>
                <member segment="58"/>
                <member segment="59"/>
                <member segment="60"/>
                <member segment="61"/>
                <member segment="62"/>
                <member segment="63"/>
                <member segment="64"/>
                <member segment="65"/>
                <member segment="66"/>
            </segmentGroup>
            <segmentGroup neuroLexId="sao864921383" id="Dendrite2">
                <member segment="22"/>
                <member segment="23"/>
                <member segment="24"/>
                <member segment="25"/>
                <member segment="26"/>
                <member segment="27"/>
                <member segment="28"/>
                <member segment="29"/>
            </segmentGroup>
            <segmentGroup neuroLexId="sao864921383" id="Dendrite3">
                <member segment="1"/>
                <member segment="2"/>
                <member segment="3"/>
                <member segment="4"/>
                <member segment="5"/>
                <member segment="6"/>
                <member segment="7"/>
                <member segment="8"/>
            </segmentGroup>
            <segmentGroup neuroLexId="sao864921383" id="Neurite4">
                <member segment="9"/>
                <member segment="10"/>
                <member segment="11"/>
                <member segment="12"/>
                <member segment="13"/>
                <member segment="14"/>
            </segmentGroup>
            <segmentGroup neuroLexId="sao864921383" id="Neurite5">
                <member segment="15"/>
                <member segment="16"/>
                <member segment="17"/>
                <member segment="18"/>
                <member segment="19"/>
                <member segment="20"/>
                <member segment="21"/>
            </segmentGroup>
            <segmentGroup id="all">
                <include segmentGroup="Soma"/>
                <include segmentGroup="Axon"/>
                <include segmentGroup="Dendrite2"/>
                <include segmentGroup="Dendrite3"/>
                <include segmentGroup="Neurite4"/>
                <include segmentGroup="Neurite5"/>
            </segmentGroup>
            <segmentGroup neuroLexId="GO:0043025" id="soma_group">
                <include segmentGroup="Soma"/>
            </segmentGroup>
            <segmentGroup neuroLexId="GO:0030424" id="axon_group">
                <include segmentGroup="Axon"/>
            </segmentGroup>
            <segmentGroup neuroLexId="GO:0030425" id="dendrite_group">
                <include segmentGroup="Dendrite2"/>
                <include segmentGroup="Dendrite3"/>
                <include segmentGroup="Neurite4"/>
                <include segmentGroup="Neurite5"/>
            </segmentGroup>
        </morphology>
        <biophysicalProperties id="biophys_SIBVL">
            <membraneProperties>
                <channelDensity id="Leak_all" ionChannel="Leak" condDensity="0.005 mS_per_cm2" erev="-50 mV" ion="non_specific"/>
                <channelDensity id="k_slow_all" ionChannel="k_slow" condDensity="1.8333751019872582 mS_per_cm2" erev="-60 mV" ion="k"/>
                <channelDensity id="k_fast_all" ionChannel="k_fast" condDensity="0.0711643917483308 mS_per_cm2" erev="-60 mV" ion="k"/>
                <channelDensity id="ca_boyle_all" ionChannel="ca_boyle" condDensity="1.6862775772264702 mS_per_cm2" erev="40 mV" ion="ca"/>
                <spikeThresh value="-26 mV"/>
                <specificCapacitance value="1 uF_per_cm2"/>
                <initMembPotential value="-45 mV"/>
            </membraneProperties>
            <intracellularProperties>
                <species id="ca" concentrationModel="CaPool" ion="ca" initialConcentration="0 mM" initialExtConcentration="2E-6 mol_per_cm3"/>
                <resistivity value="3 kohm_cm"/>
            </intracellularProperties>
        </biophysicalProperties>
    </cell>
</neuroml>
