<?xml version="1.0" encoding="UTF-8"?>
<neuroml xmlns="http://www.neuroml.org/schema/neuroml2" xmlns:xsi="http://www.w3.org/2001/XMLSchema-instance" xsi:schemaLocation="http://www.neuroml.org/schema/neuroml2  https://raw.githubusercontent.com/NeuroML/NeuroML2/development/Schemas/NeuroML2/NeuroML_v2beta4.xsd" id="URBR">

    <include href="LeakConductance.channel.nml"/>

    <cell id="URBR">

        <notes>
Interneuron
</notes>

        <morphology id="morphology_URBR">

            <segment id="0" name="Seg0_soma_0">
                <proximal x="-9.325" y="-279.95" z="47.55" diameter="3.7536647"/>
                <distal x="-9.325" y="-279.95" z="47.55" diameter="3.7536647"/>
            </segment>

            <segment id="6" name="Seg0_axon_0">
                <parent segment="0"/>
                <proximal x="-9.325" y="-279.95" z="47.55" diameter="0.8831761"/>
                <distal x="-9.35" y="-278.5" z="47.15" diameter="0.8831761"/>
            </segment>

            <segment id="7" name="Seg7_axon_0">
                <parent segment="6"/>
                <distal x="-9.35" y="-274.9" z="46.55" diameter="0.8602325"/>
            </segment>

            <segment id="8" name="Seg8_axon_0">
                <parent segment="7"/>
                <distal x="-9.0" y="-274.7" z="46.524998" diameter="0.68007356"/>
            </segment>

            <segment id="9" name="Seg9_axon_0">
                <parent segment="8"/>
                <distal x="-8.6" y="-274.7" z="46.524998" diameter="0.60207975"/>
            </segment>

            <segment id="1" name="Seg0_dendrit_2">
                <parent segment="0"/>
                <proximal x="-9.325" y="-279.95" z="47.55" diameter="0.8062257"/>
                <distal x="-9.3" y="-281.4" z="47.95" diameter="0.8062257"/>
            </segment>

            <segment id="2" name="Seg2_dendrite_0">
                <parent segment="1"/>
                <distal x="-11.8" y="-290.94998" z="51.55" diameter="0.78740084"/>
            </segment>

            <segment id="3" name="Seg3_dendrite_0">
                <parent segment="2"/>
                <distal x="-12.2" y="-298.35" z="53.149998" diameter="0.78740084"/>
            </segment>

            <segment id="4" name="Seg4_dendrite_0">
                <parent segment="3"/>
                <distal x="-6.5" y="-340.19998" z="58.25" diameter="0.78102493"/>
            </segment>

            <segment id="5" name="Seg5_dendrite_0">
                <parent segment="4"/>
                <distal x="-6.5" y="-340.75" z="58.149998" diameter="0.78740084"/>
            </segment>

            <segment id="10" name="Seg10_neurite_0">
                <parent segment="9"/>
                <proximal x="-8.6" y="-274.7" z="46.524998" diameter="0.60207975"/>
                <distal x="-8.4" y="-274.7" z="46.8" diameter="0.56568545"/>
            </segment>

            <segment id="11" name="Seg11_neurite_0">
                <parent segment="10"/>
                <distal x="-7.8" y="-274.925" z="49.024998" diameter="0.587367"/>
            </segment>

            <segment id="12" name="Seg12_neurite_0">
                <parent segment="9"/>
                <proximal x="-8.6" y="-274.7" z="46.524998" diameter="0.60207975"/>
                <distal x="-8.4" y="-274.7" z="46.25" diameter="0.5744563"/>
            </segment>

            <segment id="13" name="Seg13_neurite_0">
                <parent segment="12"/>
                <distal x="-8.125" y="-274.475" z="44.175" diameter="0.622495"/>
            </segment>

            <segmentGroup id="Soma" neuroLexId="sao864921383">    <!--
                This group contains an unbranched set of segments, and all of the segmentGroups marked with
                neuroLexId = sao864921383 form a non-overlapping set of all of the segments.
                These segmentGroups correspond to the 'cables' of NeuroML v1.8.1. -->

                <member segment="0"/>
            </segmentGroup>

            <segmentGroup id="Axon" neuroLexId="sao864921383">    <!--
                This group contains an unbranched set of segments, and all of the segmentGroups marked with
                neuroLexId = sao864921383 form a non-overlapping set of all of the segments.
                These segmentGroups correspond to the 'cables' of NeuroML v1.8.1. -->

                <member segment="6"/>

                <member segment="7"/>

                <member segment="8"/>

                <member segment="9"/>
            </segmentGroup>

            <segmentGroup id="Dendrite2" neuroLexId="sao864921383">    <!--
                This group contains an unbranched set of segments, and all of the segmentGroups marked with
                neuroLexId = sao864921383 form a non-overlapping set of all of the segments.
                These segmentGroups correspond to the 'cables' of NeuroML v1.8.1. -->

                <member segment="1"/>

                <member segment="2"/>

                <member segment="3"/>

                <member segment="4"/>

                <member segment="5"/>
            </segmentGroup>

            <segmentGroup id="Neurite3" neuroLexId="sao864921383">    <!--
                This group contains an unbranched set of segments, and all of the segmentGroups marked with
                neuroLexId = sao864921383 form a non-overlapping set of all of the segments.
                These segmentGroups correspond to the 'cables' of NeuroML v1.8.1. -->

                <member segment="10"/>

                <member segment="11"/>
            </segmentGroup>

            <segmentGroup id="Neurite4" neuroLexId="sao864921383">    <!--
                This group contains an unbranched set of segments, and all of the segmentGroups marked with
                neuroLexId = sao864921383 form a non-overlapping set of all of the segments.
                These segmentGroups correspond to the 'cables' of NeuroML v1.8.1. -->

                <member segment="12"/>

                <member segment="13"/>
            </segmentGroup>

            <segmentGroup id="all">
                <include segmentGroup="Soma"/>
                <include segmentGroup="Axon"/>
                <include segmentGroup="Dendrite2"/>
                <include segmentGroup="Neurite3"/>
                <include segmentGroup="Neurite4"/>
            </segmentGroup>

            <segmentGroup id="soma_group" neuroLexId="GO:0043025">    <!--Soma group-->

                <include segmentGroup="Soma"/>
            </segmentGroup>

            <segmentGroup id="axon_group" neuroLexId="GO:0030424">    <!--Axon group-->

                <include segmentGroup="Axon"/>
            </segmentGroup>

            <segmentGroup id="dendrite_group" neuroLexId="GO:0030425">    <!--Dendrite group-->

                <include segmentGroup="Dendrite2"/>
                <include segmentGroup="Neurite3"/>
                <include segmentGroup="Neurite4"/>
            </segmentGroup>

        </morphology>

            <!--Adding the biophysical parameters-->

        <biophysicalProperties id="biophys">

            <membraneProperties>

                <channelDensity condDensity="0.025 mS_per_cm2" id="LeakConductance_all" ionChannel="LeakConductance" ion="non_specific" erev="-65.0 mV"/>

                <spikeThresh value="0 mV"/>

                <specificCapacitance value="1.0 uF_per_cm2"/>

                <initMembPotential value="-65.0 mV"/>

            </membraneProperties>

            <intracellularProperties>

                <resistivity value="0.03 kohm_cm"/>

            </intracellularProperties>

        </biophysicalProperties>

    </cell>

</neuroml>
