<neuroml xmlns="http://www.neuroml.org/schema/neuroml2"  xmlns:xs="http://www.w3.org/2001/XMLSchema" xmlns:xsi="http://www.w3.org/2001/XMLSchema-instance" xsi:schemaLocation="http://www.neuroml.org/schema/neuroml2 https://raw.github.com/NeuroML/NeuroML2/development/Schemas/NeuroML2/NeuroML_v2.3.1.xsd" id="IClamp_GenericMuscleCell">
    <notes>Generated by NeuroMLlite v0.6.1
    Generated network: IClamp_GenericMuscleCell
    Generation seed: 1234
    NeuroMLlite parameters:
        stim_amp = 4pA
        stim_delay = 500ms
        stim_duration = 2000ms</notes>
    <include href="GenericMuscleCell.cell.nml"/>
    <pulseGenerator id="iclamp_0" delay="500ms" duration="2000ms" amplitude="4pA"/>
    <network id="IClamp_GenericMuscleCell" type="networkWithTemperature" temperature="34.0degC">
        <notes>A network model: IClamp_GenericMuscleCell</notes>
        <property tag="recommended_dt_ms" value="0.025"/>
        <property tag="recommended_duration_ms" value="3000.0"/>
        <population id="pop_GenericMuscleCell" component="GenericMuscleCell" size="1" type="populationList">
            <property tag="region" value="Worm"/>
            <instance id="0">
                <location x="966.453535692138757" y="44.073259917535268" z="7.491470058587191"/>
            </instance>
        </population>
        <inputList id="Stim_iclamp_0" population="pop_GenericMuscleCell" component="iclamp_0">
            <input id="0" target="../pop_GenericMuscleCell/0/GenericMuscleCell" destination="synapses"/>
        </inputList>
    </network>
</neuroml>
