<neuroml xmlns="http://www.neuroml.org/schema/neuroml2"  xmlns:xs="http://www.w3.org/2001/XMLSchema" xmlns:xsi="http://www.w3.org/2001/XMLSchema-instance" xsi:schemaLocation="http://www.neuroml.org/schema/neuroml2 https://raw.github.com/NeuroML/NeuroML2/development/Schemas/NeuroML2/NeuroML_v2beta4.xsd" id="cell_C">

    <include href="../custom_synapses.xml"/>

    <outputSynapse id="neuron_to_neuron_syn_w2d" sign="1"/>
    <outputSynapse id="neuron_to_neuron_exc_syn_w2d" sign="1"/>
    <!--<outputSynapse id="neuron_to_neuron_inh_syn_w2d" sign="1"/>-->

    <gradedSynapse id="neuron_to_neuron_exc_syn" conductance="0.09 nS" delta="5 mV" Vth="0 mV" k="0.025per_ms" erev="0 mV"/>

    <gradedSynapse id="neuron_to_neuron_inh_syn" conductance="0.09 nS" delta="5 mV" Vth="0 mV" k="0.025per_ms" erev="-70 mV"/>

    <!--
    <gradedSynapse2 id="neuron_to_neuron_exc_syn_x" conductance="100 pS" ar="1 per_s" ad="5 per_s" beta="0.125per_mV" vth="0 mV" erev="0 mV"/>

    <gradedSynapse2 id="neuron_to_neuron_inh_syn_x" conductance="100 pS" ar="1 per_s" ad="5 per_s" beta="0.125per_mV" vth="0 mV" erev="-45 mV"/>-->

</neuroml>
